# OpenSim document version 40600
Model optimized_scale_and_markers:
  gravity: 0 -9.80665 0
  length_units: meters
  force_units: N
  credits:
    Rajagopal et al. (2016), Lai et al. (2017), Uhlrich et al. (2022). Notes: P. van den Bos changed the fiber-damping from 0.01 to default of 0.1 as suggested in M. Millard (2013) "Flexing Computational Muscle: Modeling and Simulation of Musculotendon Dynamics".
  publications:
    [1] Rajagopal, A., Dembia, C.L., DeMers, M.S., Delp, D.D., Hicks, J.L., Delp, S.L. (2016) Full-body musculoskeletal model for muscle-driven simulation of human gait. IEEE Transactions on Biomedical Engineering. [2] Lai, A.K.M., Arnold, A.S., Wakeling, J.M. (2017) Why are antagonist muscles co-activated in my simulation? A musculoskeletal model for analysing human locomotor tasks. Annals of Biomedical Engineering. [3] Uhlrich, S.D., Jackson, R.W., Seth, A., Kolesar, J.A., Delp, S.L. (2022) Muscle coordination retraining inspired by musculoskeletal simulations reduces knee contact force. Scientific Reports.
  Ground
  BodySet:
    Body pelvis: mass=8.656394 [kg] mass_center=(-0.08141433 0 0) inertia=(0.08454139 0.08454139 0.05218676 0 0 0)
        meshes=(r_pelvis.vtp l_pelvis.vtp sacrum.vtp)
      WrapCylinder Gmax1_at_pelvis_r: xyz_body_rotation=(-0.6 0.45 0) translation=(-0.08866908 -0.1054225 0.06329775)
          quadrant=-x radius=0.04393395 length=0.1606608
      WrapCylinder Gmax2_at_pelvis_r: xyz_body_rotation=(-0.75 0.39 0) translation=(-0.09212372 -0.08838449 0.07056143)
          quadrant=all radius=0.04395036 length=0.1068821
      WrapCylinder Gmax3_at_pelvis_r: xyz_body_rotation=(-0.1 0 0) translation=(-0.09557836 -0.09370885 0.07056143)
          quadrant=all radius=0.04445379 length=0.1037939
      WrapCylinder Gmax1_at_pelvis_l: xyz_body_rotation=(0.6 -0.45 0) translation=(-0.08866908 -0.1054225 -0.06329775)
          quadrant=-x radius=0.04393395 length=0.1606608
      WrapCylinder Gmax2_at_pelvis_l: xyz_body_rotation=(0.75 -0.39 0)
          translation=(-0.09212372 -0.08838449 -0.07056143) quadrant=all radius=0.04395036 length=0.1068821
      WrapCylinder Gmax3_at_pelvis_l: xyz_body_rotation=(0.1 0 0) translation=(-0.09557836 -0.09370885 -0.07056143)
          quadrant=all radius=0.04445379 length=0.1037939
      WrapCylinder PS_at_brim_r: xyz_body_rotation=(-0.25 -0.27 0.1) translation=(-0.08521444 -0.0638924 0.06807103)
          quadrant=-y radius=0.0553666 length=0.1049454
      WrapCylinder PS_at_brim_l: xyz_body_rotation=(0.25 0.27 0.1) translation=(-0.08521444 -0.0638924 -0.06807103)
          quadrant=-y radius=0.0553666 length=0.1049454
      WrapCylinder IL_at_brim_r: xyz_body_rotation=(-0.32 -0.24 0.9) translation=(-0.0817598 -0.06921677 0.07844771)
          quadrant=-y radius=0.0609922 length=0.1048367
      WrapCylinder IL_at_brim_l: xyz_body_rotation=(0.32 0.24 0.9) translation=(-0.0817598 -0.06921677 -0.07844771)
          quadrant=-y radius=0.0609922 length=0.1048367
    Body femur_r: mass=6.770821 mass_center=(0 -0.1831357 0) inertia=(0.1132338 0.02988854 0.1132338 0 0 0)
        meshes=r_femur.vtp
      WrapCylinder GasLat_at_condyles_r: translation=(0.005466172 -0.4416801 0) quadrant=all radius=0.02821668
          length=0.1070018
      WrapCylinder GasMed_at_condyles_r: translation=(0.005466172 -0.4416801 0) quadrant=all radius=0.02713143
          length=0.1070018
      WrapCylinder KnExt_at_fem_r: xyz_body_rotation=(-0.0623366 0.0507601 0)
          translation=(0.003922831 -0.4338505 0.002237526) quadrant=all radius=0.02713033 length=0.1070107
      WrapCylinder KnExtVL_at_fem_r: xyz_body_rotation=(-0.0623366 0.0507601 0)
          translation=(0.002064333 -0.4338505 0.002237526) quadrant=all radius=0.02713033 length=0.1070107
      WrapCylinder AB_at_femshaft_r: xyz_body_rotation=(1.66157 0.186644 0)
          translation=(0.01600867 -0.1212951 0.02500098) quadrant=all radius=0.01784273 length=0.07544363
      WrapCylinder AL_at_femshaft_r: xyz_body_rotation=(1.77711 0.136489 0)
          translation=(0.03359805 -0.2498283 0.01617194) quadrant=all radius=0.02174066 length=0.1077269
      WrapCylinder AMprox_at_femshaft_r: xyz_body_rotation=(1.61126 0.18656 0)
          translation=(0.005666223 -0.07852727 0.02718168) quadrant=all radius=0.02281659 length=0.07544682
      WrapCylinder AMmid_at_femshaft_r: xyz_body_rotation=(1.61139 0.13656 0)
          translation=(0.02515806 -0.1731289 0.02202547) quadrant=all radius=0.02314368 length=0.1293067
      WrapCylinder AMdist_at_femshaft_r: xyz_body_rotation=(1.71188 0.186636 0)
          translation=(0.03455332 -0.2808827 0.01002029) quadrant=all radius=0.02357492 length=0.2155371
      WrapCylinder AMisch_at_condyles_r: xyz_body_rotation=(1.71115 -0.463363 0)
          translation=(-0.02476296 -0.4059482 -0.003375234) quadrant=all radius=0.04320384 length=0.259289
      WrapCylinder PECT_at_femshaft_r: xyz_body_rotation=(1.81295 0.276344 0)
          translation=(0.00665313 -0.09103232 0.0325719) quadrant=all radius=0.01621839 length=0.05390414
    Body tibia_r: mass=2.707724 mass_center=(0 -0.2043074 0) inertia=(0.04400068 0.004303405 0.04400068 0 0 0)
        meshes=(r_tibia.vtp r_fibula.vtp)
      WrapCylinder GasLat_at_shank_r: xyz_body_rotation=(2.96723 -0.279725 -1.47812)
          translation=(-0.008413868 -0.08097884 -0.003353273) quadrant=-y radius=0.06106669 length=0.1027886
      WrapCylinder GasMed_at_shank_r: xyz_body_rotation=(2.96723 0.0279725 -1.47812)
          translation=(-0.008413868 -0.08097884 -0.003353273) quadrant=-y radius=0.06576429 length=0.1018606
      WrapCylinder GR_at_condyles_r: xyz_body_rotation=(0 -0.4 0) translation=(-0.003411027 -0.02188617 0) quadrant=all
          radius=0.03984992 length=0.1035109
      WrapCylinder SM_at_condyles_r: xyz_body_rotation=(0 -0.1 0) translation=(-0.001137009 -0.02188617 0) quadrant=all
          radius=0.03847684 length=0.1017398
      WrapCylinder ST_at_condyles_r: xyz_body_rotation=(0 -0.2 0) translation=(-0.002274018 -0.02243333 0) quadrant=all
          radius=0.04732562 length=0.1021104
      WrapCylinder BF_at_gastroc_r: translation=(-0.04434336 -0.06565852 0) quadrant=y radius=0.03235974
          length=0.1524215
    Body patella_r: mass=0.04979339 mass_center=(0.0018 0.0264 0) inertia=(1.657854e-6 7.572986e-6 7.572986e-6 0 0 0)
        meshes=r_patella.vtp
    Body talus_r: mass=0.09032538 mass_center=(0 0 0) inertia=(0.001263394 0.001159312 0.001263394 0 0 0)
        meshes=r_talus.vtp
    Body calcn_r: mass=0.7128583 mass_center=(0.1106848 0.03037956 0)
        inertia=(0.0007121344 0.002591796 0.002591796 0 0 0) meshes=r_foot.vtp
    Body toes_r: mass=0.09075518 mass_center=(0.02958075 0.005740334 -0.01551914)
        inertia=(3.554909e-5 6.371236e-5 6.371236e-5 0 0 0) meshes=r_bofoot.vtp
    Body femur_l: mass=7.276329 mass_center=(0 -0.187671 0) inertia=(0.1277663 0.0336839 0.1277663 0 0 0)
        meshes=l_femur.vtp
      WrapCylinder GasLat_at_condyles_l: translation=(0.005349221 -0.4526183 0) quadrant=all radius=0.02825902
          length=0.114665
      WrapCylinder GasMed_at_condyles_l: translation=(0.005349221 -0.4526183 0) quadrant=all radius=0.02717213
          length=0.114665
      WrapCylinder KnExt_at_fem_l: xyz_body_rotation=(0.0623366 -0.0507601 0)
          translation=(0.0038389 -0.4445949 -0.00239777) quadrant=all radius=0.02717681 length=0.1146297
      WrapCylinder KnExtVL_at_fem_l: xyz_body_rotation=(0.0623366 -0.0507601 0)
          translation=(0.002020165 -0.4445949 -0.00239777) quadrant=all radius=0.02717681 length=0.1146297
      WrapCylinder AB_at_femshaft_l: xyz_body_rotation=(-1.66157 -0.186644 0)
          translation=(0.01566616 -0.1242989 -0.02679147) quadrant=all radius=0.01829348 length=0.07721945
      WrapCylinder AL_at_femshaft_l: xyz_body_rotation=(-1.77711 -0.136489 0)
          translation=(0.0328792 -0.2560153 -0.01733012) quadrant=all radius=0.02226528 length=0.1105124
      WrapCylinder AMprox_at_femshaft_l: xyz_body_rotation=(-1.61126 -0.18656 0)
          translation=(0.005544992 -0.08047201 -0.02912834) quadrant=all radius=0.02339626 length=0.07720005
      WrapCylinder AMmid_at_femshaft_l: xyz_body_rotation=(-1.61139 -0.13656 0)
          translation=(0.02461979 -0.1774165 -0.02360287) quadrant=all radius=0.02372302 length=0.1324073
      WrapCylinder AMdist_at_femshaft_l: xyz_body_rotation=(-1.71188 -0.186636 0)
          translation=(0.03381403 -0.2878388 -0.01073792) quadrant=all radius=0.02416449 length=0.2207247
      WrapCylinder AMisch_at_condyles_l: xyz_body_rotation=(-1.71115 0.463363 0)
          translation=(-0.02423315 -0.4160015 0.003616957) quadrant=all radius=0.04445559 length=0.2634948
      WrapCylinder PECT_at_femshaft_l: xyz_body_rotation=(-1.81295 -0.276344 0)
          translation=(0.006510783 -0.09328674 -0.03490459) quadrant=all radius=0.01662667 length=0.05518846
    Body tibia_l: mass=2.883474 mass_center=(0 -0.1956028 0) inertia=(0.04339737 0.005097355 0.04339737 0 0 0)
        meshes=(l_tibia.vtp l_fibula.vtp)
      WrapCylinder GasLat_at_shank_l: xyz_body_rotation=(-2.96723 0.279725 -1.47812)
          translation=(-0.008148659 -0.07752868 0.003851229) quadrant=-y radius=0.0593565 length=0.1159236
      WrapCylinder GasMed_at_shank_l: xyz_body_rotation=(-2.96723 -0.0279725 -1.47812)
          translation=(-0.008148659 -0.07752868 0.003851229) quadrant=-y radius=0.06352315 length=0.116376
      WrapCylinder GR_at_condyles_l: xyz_body_rotation=(0 0.4 0) translation=(-0.00330351 -0.0209537 0) quadrant=all
          radius=0.03887767 length=0.1157467
      WrapCylinder SM_at_condyles_l: xyz_body_rotation=(0 0.1 0) translation=(-0.00110117 -0.0209537 0) quadrant=all
          radius=0.03708768 length=0.1166414
      WrapCylinder ST_at_condyles_l: xyz_body_rotation=(0 0.2 0) translation=(-0.00220234 -0.02147754 0) quadrant=all
          radius=0.04573158 length=0.1164561
      WrapCylinder BF_at_gastroc_l: translation=(-0.04294563 -0.06286109 0) quadrant=all radius=0.03116503
          length=0.1750559
    Body patella_l: mass=0.04979339 mass_center=(0.0018 0.0264 0) inertia=(1.657854e-6 7.572986e-6 7.572986e-6 0 0 0)
        meshes=l_patella.vtp
    Body talus_l: mass=0.1229415 mass_center=(0 0 0) inertia=(0.002280595 0.001746489 0.002280595 0 0 0)
        meshes=l_talus.vtp
    Body calcn_l: mass=0.6624363 mass_center=(0.1100828 0.02843019 0)
        inertia=(0.0006183187 0.002364211 0.002364211 0 0 0) meshes=l_foot.vtp
    Body toes_l: mass=0.09780219 mass_center=(0.02956379 0.005993533 0.01602685)
        inertia=(4.130777e-5 7.010196e-5 7.010196e-5 0 0 0) meshes=l_bofoot.vtp
    Body torso: mass=19.07738 mass_center=(-0.03438494 0.3178059 0) inertia=(1.102273 0.6659849 1.102273 0 0 0)
        meshes=(hat_spine.vtp hat_jaw.vtp hat_skull.vtp hat_ribs_scap.vtp)
    Body humerus_r: mass=1.432692 mass_center=(0 -0.1651754 0) inertia=(0.00879051 0.003530278 0.00879051 0 0 0)
        meshes=humerus_rv.vtp
    Body ulna_r: mass=0.4434418 mass_center=(0 -0.1341919 0) inertia=(0.002656626 0.0005119829 0.002656626 0 0 0)
        meshes=ulna_rv.vtp
    Body radius_r: mass=0.32156 mass_center=(0 -0.1088995 0) inertia=(0.001312311 0.0003317468 0.001312311 0 0 0)
        meshes=radius_rv.vtp
    Body hand_r: mass=0.3204436 mass_center=(0 -0.07261292 0) inertia=(0.0007104324 0.0004356575 0.001067241 0 0 0)
        meshes=(pisiform_rvs.vtp lunate_rvs.vtp scaphoid_rvs.vtp triquetrum_rvs.vtp hamate_rvs.vtp capitate_rvs.vtp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)
    Body humerus_l: mass=1.285929 mass_center=(0 -0.146108 0) inertia=(0.006541505 0.003215203 0.006541505 0 0 0)
        meshes=humerus_lv.vtp
    Body ulna_l: mass=0.4441558 mass_center=(0 -0.1275233 0) inertia=(0.002441704 0.0005404923 0.002441704 0 0 0)
        meshes=ulna_lv.vtp
    Body radius_l: mass=0.3253669 mass_center=(0 -0.1074667 0) inertia=(0.001301775 0.0003441767 0.001301775 0 0 0)
        meshes=radius_lv.vtp
    Body hand_l: mass=0.3204436 mass_center=(0 -0.07261292 0) inertia=(0.0007104324 0.0004356575 0.001067241 0 0 0)
        meshes=(pisiform_lvs.vtp lunate_lvs.vtp scaphoid_lvs.vtp triquetrum_lvs.vtp hamate_lvs.vtp capitate_lvs.vtp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)
  JointSet:
    CustomJoint ground_pelvis: socket_parent_frame=ground_offset socket_child_frame=pelvis_offset
      Coordinate pelvis_tilt: default_value=0 range=(-3.141593 3.141593) clamped=true
      Coordinate pelvis_list: default_value=0 range=(-3.141593 3.141593) clamped=true
      Coordinate pelvis_rotation: default_value=0 range=(-3.141593 3.141593) clamped=true
      Coordinate pelvis_tx: default_value=0 range=(-5 5) clamped=true
      Coordinate pelvis_ty: default_value=0.94 range=(-1 2) clamped=true
      Coordinate pelvis_tz: default_value=0 range=(-3 3) clamped=true
      PhysicalOffsetFrame ground_offset: socket_parent=/ground translation=(0 0 0) [meters]
      PhysicalOffsetFrame pelvis_offset: socket_parent=/bodyset/pelvis translation=(0 0 0)
      SpatialTransform:
        TransformAxis rotation1: coordinates=pelvis_tilt axis=(0 0 1) LinearFunction(coefficients=1 0)
        TransformAxis rotation2: coordinates=pelvis_list axis=(1 0 0) LinearFunction(coefficients=1 0)
        TransformAxis rotation3: coordinates=pelvis_rotation axis=(0 1 0) LinearFunction(coefficients=1 0)
        TransformAxis translation1: coordinates=pelvis_tx axis=(1 0 0) LinearFunction(coefficients=1 0)
        TransformAxis translation2: coordinates=pelvis_ty axis=(0 1 0) LinearFunction(coefficients=1 0)
        TransformAxis translation3: coordinates=pelvis_tz axis=(0 0 1) LinearFunction(coefficients=1 0)
    CustomJoint hip_r: socket_parent_frame=pelvis_offset socket_child_frame=femur_r_offset
      Coordinate hip_flexion_r: default_value=7.262396e-9 range=(-0.5235988 2.094395) clamped=true
      Coordinate hip_adduction_r: default_value=-6.248872e-9 range=(-0.8726646 0.5235988) clamped=true
      Coordinate hip_rotation_r: default_value=0 range=(-0.6981317 0.6981317) clamped=true
      PhysicalOffsetFrame pelvis_offset: socket_parent=/bodyset/pelvis translation=(-0.06480443 -0.08358191 0.08017024)
      PhysicalOffsetFrame femur_r_offset: socket_parent=/bodyset/femur_r translation=(0 0 0)
      SpatialTransform: axes_held_at_zero=(translation1 translation2 translation3)
        TransformAxis rotation1: coordinates=hip_flexion_r axis=(0 0 1) LinearFunction(coefficients=1 0)
        TransformAxis rotation2: coordinates=hip_adduction_r axis=(1 0 0) LinearFunction(coefficients=1 0)
        TransformAxis rotation3: coordinates=hip_rotation_r axis=(0 1 0) LinearFunction(coefficients=1 0)
    CustomJoint walker_knee_r: socket_parent_frame=femur_r_offset socket_child_frame=tibia_r_offset
      Coordinate knee_angle_r: default_value=0.0001098396 range=(0 2.443461) clamped=true
      PhysicalOffsetFrame femur_r_offset: socket_parent=/bodyset/femur_r
          translation=(-0.004931306 -0.4412774 -0.001869723) orientation=(-1.64157 1.44618 1.5708) [radians]
      PhysicalOffsetFrame tibia_r_offset: socket_parent=/bodyset/tibia_r
          translation=(-0.009197881 -0.003868162 -0.001508709) orientation=(-1.64157 1.44618 1.5708)
      SpatialTransform:
        TransformAxis rotation1: coordinates=knee_angle_r axis=(1 0 0) LinearFunction(coefficients=1 0)
        TransformAxis rotation2: coordinates=knee_angle_r axis=(0 0 1)
          PolynomialFunction: coefficients=(0.01083209 -0.02521833 -0.03284781 0.07910001 -1.47e-8)
        TransformAxis rotation3: coordinates=knee_angle_r axis=(0 1 0)
          PolynomialFunction: coefficients=(0.02516576 -0.1694801 0.3694993 -4.43e-8)
        TransformAxis translation1: coordinates=knee_angle_r axis=(1 0 0)
          MultiplierFunction: scale=1.093234
            PolynomialFunction: coefficients=(0.0001590448 -0.00101515 0.001817511 2.64143e-5 -2.9e-9)
        TransformAxis translation2: coordinates=knee_angle_r axis=(0 1 0)
          MultiplierFunction: scale=1.077269
            PolynomialFunction: coefficients=(-0.0005796878 0.005079766 -0.01144238 0.003936909 -4.323e-7)
        TransformAxis translation3: coordinates=knee_angle_r axis=(0 0 1)
          MultiplierFunction: scale=1.070018
            PolynomialFunction: coefficients=(0.001208087 -0.004453611 0.0006116494 0.00626543 -6.882e-7)
    CustomJoint patellofemoral_r: socket_parent_frame=femur_r_offset socket_child_frame=patella_r_offset
      Coordinate knee_angle_r_beta: default_value=0.0001098396 range=(-99999.9 99999.9) clamped=false
      PhysicalOffsetFrame femur_r_offset: socket_parent=/bodyset/femur_r
          translation=(-0.008844267 -0.4394825 -0.002942551)
      PhysicalOffsetFrame patella_r_offset: socket_parent=/bodyset/patella_r translation=(0 0 0)
      SpatialTransform: axes_held_at_zero=(rotation2 rotation3)
        TransformAxis rotation1: coordinates=knee_angle_r_beta axis=(0 0 1)
          SimmSpline: x=(0 0.174533 0.349066 0.523599 0.698132 0.872665 1.0472 1.22173 1.39626 1.5708 1.74533 1.91986 2.0944)
              y=(0.00113686 -0.00629212 -0.105582 -0.253683 -0.414245 -0.579047 -0.747244 -0.91799 -1.09044 -1.26379 -1.43763 -1.61186 -1.78634)
        TransformAxis translation1: coordinates=knee_angle_r_beta axis=(1 0 0)
          MultiplierFunction: scale=1.093234
            SimmSpline: x=(0 0.174533 0.349066 0.523599 0.698132 0.872665 1.0472 1.22173 1.39626 1.5708 1.74533 1.91986 2.0944)
                y=(0.0524 0.0488 0.0437 0.0371 0.0296 0.0216 0.0136 0.0057 -0.0019 -0.0088 -0.0148 -0.0196 -0.0227)
        TransformAxis translation2: coordinates=knee_angle_r_beta axis=(0 1 0)
          MultiplierFunction: scale=1.077269
            SimmSpline: x=(0 0.174533 0.349066 0.523599 0.698132 0.872665 1.0472 1.22173 1.39626 1.5708 1.74533 1.91986 2.0944)
                y=(-0.0108 -0.019 -0.0263 -0.0322 -0.0367 -0.0395 -0.0408 -0.0404 -0.0384 -0.0349 -0.0301 -0.0245 -0.0187)
        TransformAxis translation3: axis=(0 0 1) MultiplierFunction(scale=1.070018, Constant(value=0.00275))
    PinJoint ankle_r: socket_parent_frame=tibia_r_offset socket_child_frame=talus_r_offset
      Coordinate ankle_angle_r: default_value=0 range=(-0.8726646 0.8726646) clamped=true
      PhysicalOffsetFrame tibia_r_offset: socket_parent=/bodyset/tibia_r translation=(-0.01137009 -0.4377235 0)
          orientation=(0.175895 -0.105208 0.0186622)
      PhysicalOffsetFrame talus_r_offset: socket_parent=/bodyset/talus_r translation=(0 0 0)
          orientation=(0.175895 -0.105208 0.0186622)
    PinJoint subtalar_r: socket_parent_frame=talus_r_offset socket_child_frame=calcn_r_offset
      Coordinate subtalar_angle_r: default_value=1.851175e-13 range=(-0.6108652 0.6108652) clamped=true
      PhysicalOffsetFrame talus_r_offset: socket_parent=/bodyset/talus_r
          translation=(-0.05227633 -0.05147546 0.009415641) orientation=(-1.76819 0.906223 1.8196)
      PhysicalOffsetFrame calcn_r_offset: socket_parent=/bodyset/calcn_r translation=(0 0 0)
          orientation=(-1.76819 0.906223 1.8196)
    PinJoint mtp_r: socket_parent_frame=calcn_r_offset socket_child_frame=toes_r_offset
      Coordinate mtp_angle_r: default_value=0 range=(-0.5235988 0.5235988) clamped=true
      PhysicalOffsetFrame calcn_r_offset: socket_parent=/bodyset/calcn_r
          translation=(0.1979044 -0.002025304 0.0009512711)
      PhysicalOffsetFrame toes_r_offset: socket_parent=/bodyset/toes_r translation=(0 0 0)
    CustomJoint hip_l: socket_parent_frame=pelvis_offset socket_child_frame=femur_l_offset
      Coordinate hip_flexion_l: default_value=7.262396e-9 range=(-0.5235988 2.094395) clamped=true
      Coordinate hip_adduction_l: default_value=-6.248872e-9 range=(-0.8726646 0.5235988) clamped=true
      Coordinate hip_rotation_l: default_value=0 range=(-0.6981317 0.6981317) clamped=true
      PhysicalOffsetFrame pelvis_offset: socket_parent=/bodyset/pelvis
          translation=(-0.06480443 -0.08358191 -0.08017024)
      PhysicalOffsetFrame femur_l_offset: socket_parent=/bodyset/femur_l translation=(0 0 0)
      SpatialTransform: axes_held_at_zero=(translation1 translation2 translation3)
        TransformAxis rotation1: coordinates=hip_flexion_l axis=(0 0 1) LinearFunction(coefficients=1 0)
        TransformAxis rotation2: coordinates=hip_adduction_l axis=(1 0 0) LinearFunction(coefficients=-1 0)
        TransformAxis rotation3: coordinates=hip_rotation_l axis=(0 1 0) LinearFunction(coefficients=-1 0)
    CustomJoint walker_knee_l: socket_parent_frame=femur_l_offset socket_child_frame=tibia_l_offset
      Coordinate knee_angle_l: default_value=8.473224e-5 range=(0 2.443461) clamped=true
      PhysicalOffsetFrame femur_l_offset: socket_parent=/bodyset/femur_l
          translation=(-0.004825952 -0.4522058 0.002003616) orientation=(1.64157 -1.44618 1.5708)
      PhysicalOffsetFrame tibia_l_offset: socket_parent=/bodyset/tibia_l
          translation=(-0.008907959 -0.003703356 0.00173275) orientation=(1.64157 -1.44618 1.5708)
      SpatialTransform:
        TransformAxis rotation1: coordinates=knee_angle_l axis=(-1 0 0) LinearFunction(coefficients=1 0)
        TransformAxis rotation2: coordinates=knee_angle_l axis=(0 0 1)
          PolynomialFunction: coefficients=(0.01083209 -0.02521833 -0.03284781 0.07910001 -1.47e-8)
        TransformAxis rotation3: coordinates=knee_angle_l axis=(0 1 0)
          PolynomialFunction: coefficients=(-0.02516576 0.1694801 -0.3694993 4.43e-8)
        TransformAxis translation1: coordinates=knee_angle_l axis=(1 0 0)
          MultiplierFunction: scale=1.069844
            PolynomialFunction: coefficients=(0.0001590448 -0.00101515 0.001817511 2.64143e-5 -2.3e-9)
        TransformAxis translation2: coordinates=knee_angle_l axis=(0 1 0)
          MultiplierFunction: scale=1.103947
            PolynomialFunction: coefficients=(-0.0005796878 0.005079766 -0.01144238 0.003936909 -3.335e-7)
        TransformAxis translation3: coordinates=knee_angle_l axis=(0 0 1)
          MultiplierFunction: scale=1.14665
            PolynomialFunction: coefficients=(-0.001208087 0.004453611 -0.0006116494 -0.00626543 5.309e-7)
    CustomJoint patellofemoral_l: socket_parent_frame=femur_l_offset socket_child_frame=patella_l_offset
      Coordinate knee_angle_l_beta: default_value=8.473224e-5 range=(-99999.9 99999.9) clamped=false
      PhysicalOffsetFrame femur_l_offset: socket_parent=/bodyset/femur_l
          translation=(-0.008655039 -0.4503663 0.003153286)
      PhysicalOffsetFrame patella_l_offset: socket_parent=/bodyset/patella_l translation=(0 0 0)
      SpatialTransform: axes_held_at_zero=(rotation2 rotation3)
        TransformAxis rotation1: coordinates=knee_angle_l_beta axis=(0 0 1)
          SimmSpline: x=(0 0.174533 0.349066 0.523599 0.698132 0.872665 1.0472 1.22173 1.39626 1.5708 1.74533 1.91986 2.0944)
              y=(0.00113686 -0.00629212 -0.105582 -0.253683 -0.414245 -0.579047 -0.747244 -0.91799 -1.09044 -1.26379 -1.43763 -1.61186 -1.78634)
        TransformAxis translation1: coordinates=knee_angle_l_beta axis=(1 0 0)
          MultiplierFunction: scale=1.069844
            SimmSpline: x=(0 0.174533 0.349066 0.523599 0.698132 0.872665 1.0472 1.22173 1.39626 1.5708 1.74533 1.91986 2.0944)
                y=(0.0524 0.0488 0.0437 0.0371 0.0296 0.0216 0.0136 0.0057 -0.0019 -0.0088 -0.0148 -0.0196 -0.0227)
        TransformAxis translation2: coordinates=knee_angle_l_beta axis=(0 1 0)
          MultiplierFunction: scale=1.103947
            SimmSpline: x=(0 0.174533 0.349066 0.523599 0.698132 0.872665 1.0472 1.22173 1.39626 1.5708 1.74533 1.91986 2.0944)
                y=(-0.0108 -0.019 -0.0263 -0.0322 -0.0367 -0.0395 -0.0408 -0.0404 -0.0384 -0.0349 -0.0301 -0.0245 -0.0187)
        TransformAxis translation3: axis=(0 0 1) MultiplierFunction(scale=1.14665, Constant(value=-0.00275))
    PinJoint ankle_l: socket_parent_frame=tibia_l_offset socket_child_frame=talus_l_offset
      Coordinate ankle_angle_l: default_value=0 range=(-0.8726646 0.8726646) clamped=true
      PhysicalOffsetFrame tibia_l_offset: socket_parent=/bodyset/tibia_l translation=(-0.0110117 -0.4190739 0)
          orientation=(-0.175895 0.105208 0.0186622)
      PhysicalOffsetFrame talus_l_offset: socket_parent=/bodyset/talus_l translation=(0 0 0)
          orientation=(-0.175895 0.105208 0.0186622)
    PinJoint subtalar_l: socket_parent_frame=talus_l_offset socket_child_frame=calcn_l_offset
      Coordinate subtalar_angle_l: default_value=0 range=(-0.6108652 0.6108652) clamped=true
      PhysicalOffsetFrame talus_l_offset: socket_parent=/bodyset/talus_l
          translation=(-0.05597032 -0.06330123 -0.009733611) orientation=(1.76819 -0.906223 1.8196)
      PhysicalOffsetFrame calcn_l_offset: socket_parent=/bodyset/calcn_l translation=(0 0 0)
          orientation=(1.76819 -0.906223 1.8196)
    PinJoint mtp_l: socket_parent_frame=calcn_l_offset socket_child_frame=toes_l_offset
      Coordinate mtp_angle_l: default_value=0 range=(-0.5235988 0.5235988) clamped=true
      PhysicalOffsetFrame calcn_l_offset: socket_parent=/bodyset/calcn_l
          translation=(0.196828 -0.001895346 -0.0009497636)
      PhysicalOffsetFrame toes_l_offset: socket_parent=/bodyset/toes_l translation=(0 0 0)
    CustomJoint back: socket_parent_frame=pelvis_offset socket_child_frame=torso_offset
      Coordinate lumbar_extension: default_value=0 range=(-1.570796 1.570796) clamped=true
      Coordinate lumbar_bending: default_value=0 range=(-1.570796 1.570796) clamped=true
      Coordinate lumbar_rotation: default_value=0 range=(-1.570796 1.570796) clamped=true
      PhysicalOffsetFrame pelvis_offset: socket_parent=/bodyset/pelvis translation=(-0.1159607 0.08678718 0)
      PhysicalOffsetFrame torso_offset: socket_parent=/bodyset/torso translation=(0 0 0)
      SpatialTransform: axes_held_at_zero=(translation1 translation2 translation3)
        TransformAxis rotation1: coordinates=lumbar_extension axis=(0 0 1) LinearFunction(coefficients=1 0)
        TransformAxis rotation2: coordinates=lumbar_bending axis=(1 0 0) LinearFunction(coefficients=1 0)
        TransformAxis rotation3: coordinates=lumbar_rotation axis=(0 1 0) LinearFunction(coefficients=1 0)
    CustomJoint acromial_r: socket_parent_frame=torso_offset socket_child_frame=humerus_r_offset
      Coordinate arm_flex_r: default_value=0 range=(-1.570796 1.570796) clamped=true
      Coordinate arm_add_r: default_value=-6.188182e-10 range=(-2.094395 1.570796) clamped=true
      Coordinate arm_rot_r: default_value=0 range=(-1.570796 1.570796) clamped=true
      PhysicalOffsetFrame torso_offset: socket_parent=/bodyset/torso translation=(0.00361615 0.3689528 0.1838563)
      PhysicalOffsetFrame humerus_r_offset: socket_parent=/bodyset/humerus_r translation=(0 0 0)
      SpatialTransform: axes_held_at_zero=(translation1 translation2 translation3)
        TransformAxis rotation1: coordinates=arm_flex_r axis=(0 0 1) LinearFunction(coefficients=1 0)
        TransformAxis rotation2: coordinates=arm_add_r axis=(1 0 0) LinearFunction(coefficients=1 0)
        TransformAxis rotation3: coordinates=arm_rot_r axis=(0 1 0) LinearFunction(coefficients=1 0)
    PinJoint elbow_r: socket_parent_frame=humerus_r_offset socket_child_frame=ulna_r_offset
      Coordinate elbow_flex_r: default_value=0.0001098405 range=(0 2.618) clamped=true
      PhysicalOffsetFrame humerus_r_offset: socket_parent=/bodyset/humerus_r
          translation=(0.01358834 -0.2874448 -0.0112795) orientation=(-0.0228627 0.228018 0.0051689)
      PhysicalOffsetFrame ulna_r_offset: socket_parent=/bodyset/ulna_r translation=(0 0 0)
          orientation=(-0.0228627 0.228018 0.0051689)
    PinJoint radioulnar_r: socket_parent_frame=ulna_r_offset socket_child_frame=radius_r_offset
      Coordinate pro_sup_r: default_value=0.000109842 range=(0 2.09) clamped=true
      PhysicalOffsetFrame ulna_r_offset: socket_parent=/bodyset/ulna_r
          translation=(-0.007080997 -0.01448193 0.02812297) orientation=(-1.56884 0.056428 1.53614)
      PhysicalOffsetFrame radius_r_offset: socket_parent=/bodyset/radius_r translation=(0 0 0)
          orientation=(-1.56884 0.056428 1.53614)
    UniversalJoint radius_hand_r: socket_parent_frame=radius_r_offset socket_child_frame=hand_r_offset
      Coordinate wrist_flex_r: default_value=0 range=(-1.22173 1.22173) clamped=true
      Coordinate wrist_dev_r: default_value=0 range=(-0.4363323 0.6108652) clamped=true
      PhysicalOffsetFrame radius_r_offset: socket_parent=/bodyset/radius_r
          translation=(-0.008568364 -0.2130925 0.0141709) orientation=(-1.5708 0 -1.5708)
      PhysicalOffsetFrame hand_r_offset: socket_parent=/bodyset/hand_r translation=(0 0 0)
          orientation=(-1.5708 0 -1.5708)
    CustomJoint acromial_l: socket_parent_frame=torso_offset socket_child_frame=humerus_l_offset
      Coordinate arm_flex_l: default_value=0 range=(-1.570796 1.570796) clamped=true
      Coordinate arm_add_l: default_value=-6.188182e-10 range=(-2.094395 1.570796) clamped=true
      Coordinate arm_rot_l: default_value=0 range=(-1.570796 1.570796) clamped=true
      PhysicalOffsetFrame torso_offset: socket_parent=/bodyset/torso translation=(0.00361615 0.3689528 -0.1838563)
      PhysicalOffsetFrame humerus_l_offset: socket_parent=/bodyset/humerus_l translation=(0 0 0)
      SpatialTransform: axes_held_at_zero=(translation1 translation2 translation3)
        TransformAxis rotation1: coordinates=arm_flex_l axis=(0 0 1) LinearFunction(coefficients=1 0)
        TransformAxis rotation2: coordinates=arm_add_l axis=(-1 0 0) LinearFunction(coefficients=1 0)
        TransformAxis rotation3: coordinates=arm_rot_l axis=(0 -1 0) LinearFunction(coefficients=1 0)
    PinJoint elbow_l: socket_parent_frame=humerus_l_offset socket_child_frame=ulna_l_offset
      Coordinate elbow_flex_l: default_value=0.0001098405 range=(0 2.618) clamped=true
      PhysicalOffsetFrame humerus_l_offset: socket_parent=/bodyset/humerus_l
          translation=(0.01348774 -0.254263 0.01153062) orientation=(0.0228627 -0.228018 0.0051689)
      PhysicalOffsetFrame ulna_l_offset: socket_parent=/bodyset/ulna_l translation=(0 0 0)
          orientation=(0.0228627 -0.228018 0.0051689)
    PinJoint radioulnar_l: socket_parent_frame=ulna_l_offset socket_child_frame=radius_l_offset
      Coordinate pro_sup_l: default_value=0.000109842 range=(0 2.09) clamped=true
      PhysicalOffsetFrame ulna_l_offset: socket_parent=/bodyset/ulna_l
          translation=(-0.007123358 -0.01376226 -0.02946498) orientation=(1.56884 -0.056428 1.53614)
      PhysicalOffsetFrame radius_l_offset: socket_parent=/bodyset/radius_l translation=(0 0 0)
          orientation=(1.56884 -0.056428 1.53614)
    UniversalJoint radius_hand_l: socket_parent_frame=radius_l_offset socket_child_frame=hand_l_offset
      Coordinate wrist_flex_l: default_value=0 range=(-1.22173 1.22173) clamped=true
      Coordinate wrist_dev_l: default_value=0 range=(-0.4363323 0.6108652) clamped=true
      PhysicalOffsetFrame radius_l_offset: socket_parent=/bodyset/radius_l
          translation=(-0.008945932 -0.2102888 -0.01391659) orientation=(1.5708 0 1.5708)
      PhysicalOffsetFrame hand_l_offset: socket_parent=/bodyset/hand_l translation=(0 0 0)
          orientation=(1.5708 0 1.5708)
  ConstraintSet:
    CoordinateCouplerConstraint patellofemoral_knee_angle_r_con: independent_coordinate_names=knee_angle_r
        dependent_coordinate_name=knee_angle_r_beta scale_factor=1
        coupled_coordinates_function=LinearFunction(coefficients=1 0)
    CoordinateCouplerConstraint patellofemoral_knee_angle_l_con: independent_coordinate_names=knee_angle_l
        dependent_coordinate_name=knee_angle_l_beta scale_factor=1
        coupled_coordinates_function=LinearFunction(coefficients=1 0)
  ForceSet:
    Millard2012EquilibriumMuscle [values shared by the 80 below unless stated]: fiber_damping=0.1
        default_activation=0.01 minimum_activation=0.01
      ActiveForceLengthCurve: min_norm_active_fiber_length=0.25 transition_norm_fiber_length=0.77
          max_norm_active_fiber_length=1.9 shallow_ascending_slope=0.75 minimum_value=0
      ForceVelocityCurve: concentric_slope_at_vmax=0 concentric_slope_near_vmax=0.25 isometric_slope=5
          eccentric_slope_at_vmax=0 eccentric_slope_near_vmax=0.15 max_eccentric_velocity_force_multiplier=1.4
      TendonForceLengthCurve
    Millard2012EquilibriumMuscle addbrev_r: max_isometric_force=625.8197 optimal_fiber_length=0.1106047
        tendon_slack_length=0.03803074 pennation_angle_at_optimal=0.1147809 [radians]
      PathPoint P1: pelvis (-0.02199454 -0.1000981 0.01598009)
      PathPoint P2: femur_r (-0.002186469 -0.1271177 0.02664346)
      PathWrap: wrap_object=AB_at_femshaft_r method=hybrid
      FiberForceLengthCurve: strain_at_zero_force=-0.1844454 strain_at_one_norm_force=0.5059595
          stiffness_at_low_force=0.2 stiffness_at_one_norm_force=2.896851 curviness=0.75
    Millard2012EquilibriumMuscle addlong_r: max_isometric_force=916.8 optimal_fiber_length=0.1165404
        tendon_slack_length=0.1419588 pennation_angle_at_optimal=0.1377704
      PathPoint P1: pelvis (-0.008728722 -0.09466724 0.01959117)
      PathPoint P2: femur_r (0.01230982 -0.2578658 0.01693839)
      PathWrap: wrap_object=AL_at_femshaft_r method=hybrid
      FiberForceLengthCurve: strain_at_zero_force=-0.1942012 strain_at_one_norm_force=0.5013184
          stiffness_at_low_force=0.2 stiffness_at_one_norm_force=2.875548 curviness=0.75
    Millard2012EquilibriumMuscle addmagDist_r: max_isometric_force=597.2951 optimal_fiber_length=0.1911416
        tendon_slack_length=0.09425556 pennation_angle_at_optimal=0.194705
      PathPoint P1: pelvis (-0.0852605 -0.1359524 0.04131994)
      PathPoint P2: femur_r (0.01229889 -0.282783 0.02065136)
      PathWrap: wrap_object=AMdist_at_femshaft_r method=hybrid
      FiberForceLengthCurve: strain_at_zero_force=9.713794e-8 strain_at_one_norm_force=0.7000001
          stiffness_at_low_force=0.2 stiffness_at_one_norm_force=2.857143 curviness=0.75
    Millard2012EquilibriumMuscle addmagIsch_r: max_isometric_force=597.2951 optimal_fiber_length=0.1687266
        tendon_slack_length=0.2336928 pennation_angle_at_optimal=0.1680443
      PathPoint P1: pelvis (-0.1032016 -0.138178 0.04328114)
      PathPoint P2: femur_r (0.005258458 -0.4179479 -0.0350217)
      PathWrap: wrap_object=AMisch_at_condyles_r method=hybrid
      FiberForceLengthCurve: strain_at_zero_force=0.005651991 strain_at_one_norm_force=0.7000408
          stiffness_at_low_force=0.2 stiffness_at_one_norm_force=2.880231 curviness=0.75
    Millard2012EquilibriumMuscle addmagMid_r: max_isometric_force=597.2951 optimal_fiber_length=0.14762
        tendon_slack_length=0.0499868 pennation_angle_at_optimal=0.2073076
      PathPoint P1: pelvis (-0.06064044 -0.1285835 0.02961505)
      PathPoint P2: femur_r (0.002645627 -0.1749484 0.03126594)
      PathWrap: wrap_object=AMmid_at_femshaft_r method=hybrid
      FiberForceLengthCurve: strain_at_zero_force=1.776572e-8 strain_at_one_norm_force=0.7000001
          stiffness_at_low_force=0.2 stiffness_at_one_norm_force=2.857143 curviness=0.75
    Millard2012EquilibriumMuscle addmagProx_r: max_isometric_force=597.2951 optimal_fiber_length=0.1126014
        tendon_slack_length=0.04299765 pennation_angle_at_optimal=0.3114833
      PathPoint P1: pelvis (-0.03567491 -0.1145271 0.01416417)
      PathPoint P2: femur_r (-0.01669369 -0.0849534 0.03426199)
      PathWrap: wrap_object=AMprox_at_femshaft_r method=hybrid
      FiberForceLengthCurve: strain_at_zero_force=8.055312e-8 strain_at_one_norm_force=0.7000001
          stiffness_at_low_force=0.2 stiffness_at_one_norm_force=2.857143 curviness=0.75
    Millard2012EquilibriumMuscle bflh_r: max_isometric_force=1313.184 optimal_fiber_length=0.1054073
        tendon_slack_length=0.3590957 pennation_angle_at_optimal=0.1759182
      PathPoint P1: pelvis (-0.1197608 -0.1268264 0.06080735)
      PathPoint P2: tibia_r (-0.03906763 -0.03992038 0.03676406)
      PathPoint P3: tibia_r (-0.03074473 -0.05480298 0.03532114)
      FiberForceLengthCurve: strain_at_zero_force=0.1368428 strain_at_one_norm_force=0.7054016
          stiffness_at_low_force=0.2 stiffness_at_one_norm_force=3.517666 curviness=0.75
    Millard2012EquilibriumMuscle bfsh_r: max_isometric_force=557.1148 optimal_fiber_length=0.1191199
        tendon_slack_length=0.1142786 pennation_angle_at_optimal=0.2642232
      PathPoint P1: femur_r (0.005466172 -0.2274114 0.02503843)
      PathPoint P2: tibia_r (-0.03258668 -0.0359371 0.03255723)
      PathWrap: wrap_object=BF_at_gastroc_r method=hybrid
      FiberForceLengthCurve: strain_at_zero_force=0.04380442 strain_at_one_norm_force=0.6994891
          stiffness_at_low_force=0.2 stiffness_at_one_norm_force=3.050247 curviness=0.75
    Millard2012EquilibriumMuscle edl_r: max_isometric_force=603.4982 optimal_fiber_length=0.07535026
        tendon_slack_length=0.40108 pennation_angle_at_optimal=0.2182582
      PathPoint P1: tibia_r (-0.01819215 -0.1266115 0.02083094)
      PathPoint P2: tibia_r (0.01864695 -0.4114601 0.0113808)
      PathPoint P3: calcn_r (0.1017193 0.03645547 0.0007046452)
      PathPoint P4: calcn_r (0.1788666 0.005569586 0.01145048)
      PathPoint P5: toes_r (0.0002564805 0.004496595 0.01356816)
      PathPoint P6: toes_r (0.03787362 -0.000382689 0.0221702)
      FiberForceLengthCurve: strain_at_zero_force=0.1015352 strain_at_one_norm_force=0.7074931
          stiffness_at_low_force=0.2 stiffness_at_one_norm_force=3.30056 curviness=0.75
    Millard2012EquilibriumMuscle ehl_r: max_isometric_force=285.8675 optimal_fiber_length=0.08070025
        tendon_slack_length=0.352573 pennation_angle_at_optimal=0.1972681
      PathPoint P1: tibia_r (-0.01591813 -0.1696178 0.01920511)
      PathPoint P2: tibia_r (0.008072765 -0.3183344 0.01666475)
      PathPoint P3: tibia_r (0.02274018 -0.4041282 -0.002845201)
      PathPoint P4: calcn_r (0.1073643 0.03939216 -0.01858502)
      PathPoint P5: calcn_r (0.1431154 0.03129095 -0.02263673)
      PathPoint P6: calcn_r (0.1919274 0.01407586 -0.02466258)
      PathPoint P7: toes_r (0.02547706 0.003922562 -0.02172679)
      PathPoint P8: toes_r (0.04813284 0.003252856 -0.01649463)
      FiberForceLengthCurve: strain_at_zero_force=0.08168779 strain_at_one_norm_force=0.7147756
          stiffness_at_low_force=0.2 stiffness_at_one_norm_force=3.159119 curviness=0.75
    Millard2012EquilibriumMuscle fdl_r: max_isometric_force=423.177 optimal_fiber_length=0.04822077
        tendon_slack_length=0.4095229 pennation_angle_at_optimal=0.2248391
      PathPoint P1: tibia_r (-0.002615121 -0.2004773 -0.001829058)
      PathPoint P2: tibia_r (-0.02001136 -0.3988755 -0.01260018)
      PathPoint P3: calcn_r (0.04825857 0.03189854 -0.02466258)
      PathPoint P4: calcn_r (0.07836484 0.01782267 -0.02316521)
      PathPoint P5: calcn_r (0.1835154 -0.008202481 0.01021736)
      PathPoint P6: toes_r (-0.001624376 -0.007462435 0.01303607)
      PathPoint P7: toes_r (0.02436565 -0.006792729 0.01906637)
      PathPoint P8: toes_r (0.03770263 -0.005740334 0.02146075)
      FiberForceLengthCurve: strain_at_zero_force=-0.006468795 strain_at_one_norm_force=0.6998542
          stiffness_at_low_force=0.2 stiffness_at_one_norm_force=2.831566 curviness=0.75
    Millard2012EquilibriumMuscle fhl_r: max_isometric_force=907.8393 optimal_fiber_length=0.05692531
        tendon_slack_length=0.3827495 pennation_angle_at_optimal=0.2580255
      PathPoint P1: tibia_r (-0.03524728 -0.236699 0.02032286)
      PathPoint P2: tibia_r (-0.02751562 -0.4017207 -0.007722689)
      PathPoint P3: calcn_r (0.04139612 0.02794919 -0.02122744)
      PathPoint P4: calcn_r (0.1148908 0.006886033 -0.02254865)
      PathPoint P5: calcn_r (0.191042 -0.005367055 -0.0236937)
      PathPoint P6: toes_r (0.01325149 -0.006123023 -0.02350041)
      PathPoint P7: toes_r (0.04804734 -0.009758569 -0.01605122)
      FiberForceLengthCurve: strain_at_zero_force=0.007614866 strain_at_one_norm_force=0.7001852
          stiffness_at_low_force=0.2 stiffness_at_one_norm_force=2.887793 curviness=0.75
    Millard2012EquilibriumMuscle gaslat_r: max_isometric_force=1575.059 optimal_fiber_length=0.07677184
        tendon_slack_length=0.4161256 pennation_angle_at_optimal=0.2102268
      PathPoint P1: femur_r (0.002186469 -0.4104393 0.02203168)
      PathPoint P2: calcn_r (0.004870131 0.03139221 -0.004668275)
      PathWrap: wrap_object=GasLat_at_shank_r method=hybrid
      PathWrap pathwrap_0: wrap_object=GasLat_at_condyles_r method=hybrid
      FiberForceLengthCurve: strain_at_zero_force=-0.1932361 strain_at_one_norm_force=0.6636807
          stiffness_at_low_force=0.2 stiffness_at_one_norm_force=2.333949 curviness=0.75
    Millard2012EquilibriumMuscle gasmed_r: max_isometric_force=3115.515 optimal_fiber_length=0.06650307
        tendon_slack_length=0.4362151 pennation_angle_at_optimal=0.1656816
      PathPoint P1: femur_r (0.006559407 -0.4147484 -0.02354041)
      PathPoint P2: calcn_r (0.004870131 0.03139221 -0.004668275)
      PathWrap: wrap_object=GasMed_at_shank_r method=hybrid
      PathWrap pathwrap_0: wrap_object=GasMed_at_condyles_r method=hybrid
      FiberForceLengthCurve: strain_at_zero_force=0.1506325 strain_at_one_norm_force=0.550636
          stiffness_at_low_force=0.2 stiffness_at_one_norm_force=4.999956 curviness=0.75
    Millard2012EquilibriumMuscle glmax1_r: max_isometric_force=983.7836 optimal_fiber_length=0.1581267
        tendon_slack_length=0.09390792 pennation_angle_at_optimal=0.3540118
      PathPoint P1: pelvis (-0.1417554 0.03673813 0.05842071)
      PathPoint P2: pelvis (-0.1447494 -0.02576993 0.08083434)
      PathPoint P3: femur_r (-0.04853961 -0.03511895 0.03231456)
      PathPoint P4: femur_r (-0.03028259 -0.0609734 0.05029087)
      PathWrap: wrap_object=Gmax1_at_pelvis_r method=hybrid
      FiberForceLengthCurve: strain_at_zero_force=2.229005e-7 strain_at_one_norm_force=0.6999999
          stiffness_at_low_force=0.2 stiffness_at_one_norm_force=2.857144 curviness=0.75
    Millard2012EquilibriumMuscle glmax2_r: max_isometric_force=1406.046 optimal_fiber_length=0.1696509
        tendon_slack_length=0.1177831 pennation_angle_at_optimal=0.3673821
      PathPoint P1: pelvis (-0.1516587 0.009264398 0.04794027)
      PathPoint P2: pelvis (-0.1547678 -0.06485079 0.08436241)
      PathPoint P3: femur_r (-0.04919555 -0.06291248 0.02696447)
      PathPoint P4: femur_r (-0.01705446 -0.1094505 0.04483377)
      PathWrap: wrap_object=Gmax2_at_pelvis_r method=hybrid
      FiberForceLengthCurve: strain_at_zero_force=1.628612e-7 strain_at_one_norm_force=0.7000001
          stiffness_at_low_force=0.2 stiffness_at_one_norm_force=2.857143 curviness=0.75
    Millard2012EquilibriumMuscle glmax3_r: max_isometric_force=947.7541 optimal_fiber_length=0.1805197
        tendon_slack_length=0.1113385 pennation_angle_at_optimal=0.3824161
      PathPoint P1: pelvis (-0.149701 -0.05590585 0.009339013)
      PathPoint P2: pelvis (-0.1465919 -0.1344935 0.04513856)
      PathPoint P3: femur_r (-0.03071989 -0.1211927 0.01005817)
      PathPoint P4: femur_r (-0.006559407 -0.1528644 0.04397776)
      PathWrap: wrap_object=Gmax3_at_pelvis_r method=hybrid
      FiberForceLengthCurve: strain_at_zero_force=0.03977768 strain_at_one_norm_force=0.7004988
          stiffness_at_low_force=0.2 stiffness_at_one_norm_force=3.026996 curviness=0.75
    Millard2012EquilibriumMuscle glmed1_r: max_isometric_force=1093.467 optimal_fiber_length=0.08184099
        tendon_slack_length=0.06258429 pennation_angle_at_optimal=0.3165559
      PathPoint P1: pelvis (-0.05642578 0.02768671 0.1193318)
      PathPoint P2_0: femur_r (-0.01530528 -0.01939083 0.06313109)
      FiberForceLengthCurve: strain_at_zero_force=6.185261e-8 strain_at_one_norm_force=0.7000001
          stiffness_at_low_force=0.2 stiffness_at_one_norm_force=2.857143 curviness=0.75
    Millard2012EquilibriumMuscle glmed2_r: max_isometric_force=765.0917 optimal_fiber_length=0.0896421
        tendon_slack_length=0.08051781 pennation_angle_at_optimal=0.3165559
      PathPoint P1: pelvis (-0.09788145 0.05856803 0.08508878)
      PathPoint P2_0: femur_r (-0.02405116 -0.01077269 0.05992103)
      FiberForceLengthCurve: strain_at_zero_force=-0.1329608 strain_at_one_norm_force=0.6904088
          stiffness_at_low_force=0.2 stiffness_at_one_norm_force=2.429043 curviness=0.75
    Millard2012EquilibriumMuscle glmed3_r: max_isometric_force=871.1993 optimal_fiber_length=0.08339123
        tendon_slack_length=0.05167907 pennation_angle_at_optimal=0.3165559
      PathPoint P1: pelvis (-0.1151546 0.01703797 0.06641076)
      PathPoint P2_0: femur_r (-0.03378095 -0.005063162 0.05542696)
      FiberForceLengthCurve: strain_at_zero_force=-0.1914236 strain_at_one_norm_force=0.6558113
          stiffness_at_low_force=0.2 stiffness_at_one_norm_force=2.360621 curviness=0.75
    Millard2012EquilibriumMuscle glmin1_r: max_isometric_force=374.0459 optimal_fiber_length=0.0873231
        tendon_slack_length=0.02072984 pennation_angle_at_optimal=0.1745329
      PathPoint P1: pelvis (-0.03454639 0 0.1224448)
      PathPoint P2: femur_r (0.005466172 -0.01615903 0.05992103)
      FiberForceLengthCurve: strain_at_zero_force=-8.172674e-8 strain_at_one_norm_force=0.7000001
          stiffness_at_low_force=0.2 stiffness_at_one_norm_force=2.857142 curviness=0.75
    Millard2012EquilibriumMuscle glmin2_r: max_isometric_force=394.8197 optimal_fiber_length=0.07343795
        tendon_slack_length=0.03422828 pennation_angle_at_optimal=0
      PathPoint P1: pelvis (-0.07093526 0.01064873 0.1048045)
      PathPoint P2: femur_r (0.004372938 -0.009695417 0.05564096)
      FiberForceLengthCurve: strain_at_zero_force=0.001146607 strain_at_one_norm_force=0.6999804
          stiffness_at_low_force=0.2 stiffness_at_one_norm_force=2.861911 curviness=0.75
    Millard2012EquilibriumMuscle glmin3_r: max_isometric_force=446.7738 optimal_fiber_length=0.03786415
        tendon_slack_length=0.05062855 pennation_angle_at_optimal=0.01745329
      PathPoint P1: pelvis (-0.09085701 -0.01650554 0.08280591)
      PathPoint P2: femur_r (-0.004372938 -0.001077269 0.05457094)
      FiberForceLengthCurve: strain_at_zero_force=-0.0351512 strain_at_one_norm_force=0.6990981
          stiffness_at_low_force=0.2 stiffness_at_one_norm_force=2.723871 curviness=0.75
    Millard2012EquilibriumMuscle grac_r: max_isometric_force=281.3115 optimal_fiber_length=0.2467701
        tendon_slack_length=0.1863383 pennation_angle_at_optimal=0.1720016
      PathPoint P1: pelvis (-0.05453724 -0.1377094 0.02548513)
      PathPoint P2: tibia_r (-0.02094371 -0.05203438 -0.030088)
      PathPoint P3: tibia_r (0.002023876 -0.07618577 -0.01598393)
      PathWrap: wrap_object=GR_at_condyles_r method=hybrid
      FiberForceLengthCurve: strain_at_zero_force=-0.1885953 strain_at_one_norm_force=0.7244614
          stiffness_at_low_force=0.2 stiffness_at_one_norm_force=2.190445 curviness=0.75
    Millard2012EquilibriumMuscle iliacus_r: max_isometric_force=1021.141 optimal_fiber_length=0.1157127
        tendon_slack_length=0.1043376 pennation_angle_at_optimal=0.279914
      PathPoint P1: pelvis (-0.06966856 0.03290459 0.08747542)
      PathPoint P2: pelvis (-0.01554588 -0.05931344 0.07844771)
      PathPoint P3: femur_r (-0.002514439 -0.06086567 0.01487326)
      PathPoint P4: femur_r (-0.01333746 -0.06862201 0.02097236)
      PathWrap: wrap_object=IL_at_brim_r method=hybrid range=(2 3)
      FiberForceLengthCurve: strain_at_zero_force=-0.1607227 strain_at_one_norm_force=0.5020882
          stiffness_at_low_force=0.2 stiffness_at_one_norm_force=3.017452 curviness=0.75
    Millard2012EquilibriumMuscle perbrev_r: max_isometric_force=521.2016 optimal_fiber_length=0.05107073
        tendon_slack_length=0.1659546 pennation_angle_at_optimal=0.2052361
      PathPoint P1: tibia_r (-0.02762932 -0.277079 0.0255052)
      PathPoint P2: tibia_r (-0.03854461 -0.4260144 0.02530197)
      PathPoint P3: tibia_r (-0.03240476 -0.4381612 0.02591165)
      PathPoint P4: calcn_r (0.05213254 0.0273416 0.02052279)
      PathPoint P5: calcn_r (0.07493361 0.02217708 0.03021166)
      FiberForceLengthCurve: strain_at_zero_force=-0.02868018 strain_at_one_norm_force=0.6992207
          stiffness_at_low_force=0.2 stiffness_at_one_norm_force=2.747627 curviness=0.75
    Millard2012EquilibriumMuscle perlong_r: max_isometric_force=1115.371 optimal_fiber_length=0.05570204
        tendon_slack_length=0.364279 pennation_angle_at_optimal=0.2479525
      PathPoint P1: tibia_r (-0.02274018 -0.1502486 0.02865524)
      PathPoint P2: tibia_r (-0.03604319 -0.4267804 0.02408259)
      PathPoint P3: tibia_r (-0.03092665 -0.4392555 0.02438744)
      PathPoint P4: calcn_r (0.04847994 0.023291 0.01946582)
      PathPoint P5: calcn_r (0.07537635 0.01073411 0.02501491)
      PathPoint P6: calcn_r (0.09430345 0.006987299 0.01039352)
      PathPoint P7: calcn_r (0.1331538 0.008607542 -0.01620684)
      FiberForceLengthCurve: strain_at_zero_force=-0.08769079 strain_at_one_norm_force=0.6966414
          stiffness_at_low_force=0.2 stiffness_at_one_norm_force=2.54994 curviness=0.75
    Millard2012EquilibriumMuscle piri_r: max_isometric_force=1029.787 optimal_fiber_length=0.02770157
        tendon_slack_length=0.1224263 pennation_angle_at_optimal=0.1745329
      PathPoint P1: pelvis (-0.1172389 -0.006953623 0.0140189)
      PathPoint P2: pelvis (-0.1174808 -0.03264902 0.06321474)
      PathPoint P3: femur_r (-0.01617987 -0.003878167 0.04675981)
      FiberForceLengthCurve: strain_at_zero_force=-0.1828826 strain_at_one_norm_force=0.7031405
          stiffness_at_low_force=0.2 stiffness_at_one_norm_force=2.257277 curviness=0.75
    Millard2012EquilibriumMuscle psoas_r: max_isometric_force=1426.79 optimal_fiber_length=0.1262517
        tendon_slack_length=0.1075064 pennation_angle_at_optimal=0.2155251
      PathPoint P1: pelvis (-0.06978371 0.06602215 0.04046906)
      PathPoint P2: pelvis (-0.0236067 -0.06964272 0.06807103)
      PathPoint P3: femur_r (-0.0144307 -0.05030844 0.004922085)
      PathPoint P4: femur_r (-0.02569101 -0.05644887 0.009416162)
      PathWrap: wrap_object=PS_at_brim_r method=hybrid range=(2 3)
      FiberForceLengthCurve: strain_at_zero_force=-0.07629291 strain_at_one_norm_force=0.5032605
          stiffness_at_low_force=0.2 stiffness_at_one_norm_force=3.450933 curviness=0.75
    Millard2012EquilibriumMuscle recfem_r: max_isometric_force=2191.741 optimal_fiber_length=0.08173448
        tendon_slack_length=0.4850258 pennation_angle_at_optimal=0.2170149
      PathPoint P1: pelvis (-0.02763711 -0.04131708 0.09681443)
      PathPoint P2: patella_r (0.01 0.049 0.0007)
      PathPoint P3: patella_r (0.0121 0.0437 -0.001)
      PathPoint P4: patella_r (0.005 0.00247 3e-5)
      PathPoint P5: tibia_r (0.0370665 -0.06907276 -0.0004775873)
      PathWrap: wrap_object=KnExt_at_fem_r method=hybrid
      FiberForceLengthCurve: strain_at_zero_force=0.1997943 strain_at_one_norm_force=0.8997465
          stiffness_at_low_force=0.2 stiffness_at_one_norm_force=2.857338 curviness=0.75
    Millard2012EquilibriumMuscle sart_r: max_isometric_force=249.4131 optimal_fiber_length=0.4348874
        tendon_slack_length=0.1338113 pennation_angle_at_optimal=0.02613542
      PathPoint P1: pelvis (-0.02245516 -0.01661202 0.1095777)
      PathPoint P2: femur_r (-0.003279703 -0.3843694 -0.04504778)
      PathPoint P3: tibia_r (-0.02853893 -0.04388178 -0.03708923)
      PathPoint P4: tibia_r (-0.01807845 -0.06554909 -0.02682618)
      PathPoint P5: tibia_r (0.01546332 -0.088639 -0.002641972)
      FiberForceLengthCurve: strain_at_zero_force=-0.07294162 strain_at_one_norm_force=0.7021361
          stiffness_at_low_force=0.2 stiffness_at_one_norm_force=2.580386 curviness=0.75
    Millard2012EquilibriumMuscle semimem_r: max_isometric_force=2200.987 optimal_fiber_length=0.09286818
        tendon_slack_length=0.3617539 pennation_angle_at_optimal=0.2545615
      PathPoint P1: pelvis (-0.1136576 -0.1213956 0.06371282)
      PathPoint P2: tibia_r (-0.03069925 -0.04486666 -0.01991641)
      PathWrap: wrap_object=SM_at_condyles_r method=hybrid
      FiberForceLengthCurve: strain_at_zero_force=0.1537347 strain_at_one_norm_force=0.7044745
          stiffness_at_low_force=0.2 stiffness_at_one_norm_force=3.631479 curviness=0.75
    Millard2012EquilibriumMuscle semiten_r: max_isometric_force=591.2951 optimal_fiber_length=0.2092167
        tendon_slack_length=0.2679697 pennation_angle_at_optimal=0.241295
      PathPoint P1: pelvis (-0.1195305 -0.1334286 0.05343991)
      PathPoint P2: tibia_r (-0.03547469 -0.05559088 -0.02326968)
      PathPoint P3: tibia_r (0.002160317 -0.08459006 -0.01188888)
      PathWrap: wrap_object=ST_at_condyles_r method=hybrid
      FiberForceLengthCurve: strain_at_zero_force=0.114169 strain_at_one_norm_force=0.7136122
          stiffness_at_low_force=0.2 stiffness_at_one_norm_force=3.336429 curviness=0.75
    Millard2012EquilibriumMuscle soleus_r: max_isometric_force=6194.843 optimal_fiber_length=0.04921545
        tendon_slack_length=0.3146993 pennation_angle_at_optimal=0.3814289
      PathPoint P1: tibia_r (-0.008641269 -0.1002387 0.009958204)
      PathPoint P2: calcn_r (0.004870131 0.03139221 -0.004668275)
      FiberForceLengthCurve: strain_at_zero_force=0.04016445 strain_at_one_norm_force=0.7659521
          stiffness_at_low_force=0.2 stiffness_at_one_norm_force=2.755627 curviness=0.75
    Millard2012EquilibriumMuscle tfl_r: max_isometric_force=411.2066 optimal_fiber_length=0.1003016
        tendon_slack_length=0.4745888 pennation_angle_at_optimal=0.05235988
      PathPoint P1: pelvis (-0.02303093 0.01171361 0.1338592)
      PathPoint P2: femur_r (0.03214109 -0.1071882 0.0638801)
      PathPoint P3: femur_r (0.01169761 -0.4362938 0.0346686)
      PathPoint P4: tibia_r (0.0122797 -0.04486666 0.03515856)
      FiberForceLengthCurve: strain_at_zero_force=0.1571908 strain_at_one_norm_force=0.6394004
          stiffness_at_low_force=0.2 stiffness_at_one_norm_force=4.147574 curviness=0.75
    Millard2012EquilibriumMuscle tibant_r: max_isometric_force=1227.452 optimal_fiber_length=0.07604104
        tendon_slack_length=0.2677146 pennation_angle_at_optimal=0.1951828
      PathPoint P1: tibia_r (0.01750994 -0.1435733 0.01646152)
      PathPoint P2: tibia_r (0.02853893 -0.2085752 0.01300663)
      PathPoint P3: tibia_r (0.02649231 -0.4004075 -0.01341309)
      PathPoint P4: calcn_r (0.1290585 0.0180252 -0.0268646)
      FiberForceLengthCurve: strain_at_zero_force=0.1588072 strain_at_one_norm_force=0.7083715
          stiffness_at_low_force=0.2 stiffness_at_one_norm_force=3.639246 curviness=0.75
    Millard2012EquilibriumMuscle tibpost_r: max_isometric_force=1730.154 optimal_fiber_length=0.04228495
        tendon_slack_length=0.314094 pennation_angle_at_optimal=0.2264891
      PathPoint P1: tibia_r (-0.004661737 -0.1426979 0.01046628)
      PathPoint P2: tibia_r (-0.01864695 -0.3999698 -0.01778251)
      PathPoint P3: calcn_r (0.04615556 0.03382258 -0.02519107)
      PathPoint P4: calcn_r (0.08544867 0.01610117 -0.02475066)
      FiberForceLengthCurve: strain_at_zero_force=-0.07310113 strain_at_one_norm_force=0.698029
          stiffness_at_low_force=0.2 stiffness_at_one_norm_force=2.593596 curviness=0.75
    Millard2012EquilibriumMuscle vasint_r: max_isometric_force=1697.361 optimal_fiber_length=0.1262111
        tendon_slack_length=0.221139 pennation_angle_at_optimal=0.06309973
      PathPoint P1: femur_r (0.0317038 -0.2072665 0.03317057)
      PathPoint P2: femur_r (0.03662335 -0.2245028 0.03049553)
      PathPoint P3: patella_r (0.0058 0.048 -0.0006)
      PathPoint P4: patella_r (0.005 0.00247 -0.00039)
      PathPoint P5: tibia_r (0.03703239 -0.06916031 0.0004369416)
      PathWrap: wrap_object=KnExt_at_fem_r method=hybrid
      FiberForceLengthCurve: strain_at_zero_force=0.1756531 strain_at_one_norm_force=0.7074754
          stiffness_at_low_force=0.2 stiffness_at_one_norm_force=3.760655 curviness=0.75
    Millard2012EquilibriumMuscle vaslat_r: max_isometric_force=5148.767 optimal_fiber_length=0.1262242
        tendon_slack_length=0.2384235 pennation_angle_at_optimal=0.2528673
      PathPoint P1: femur_r (0.005247525 -0.1997256 0.03734364)
      PathPoint P2: femur_r (0.02940801 -0.2791203 0.04376375)
      PathPoint P3: patella_r (0.0103 0.0423 0.0141)
      PathPoint P4: patella_r (0.005 0.00247 0.00733)
      PathPoint P5: tibia_r (0.03699828 -0.06935728 0.005192492)
      PathWrap: wrap_object=KnExtVL_at_fem_r method=hybrid
      FiberForceLengthCurve: strain_at_zero_force=0.1934746 strain_at_one_norm_force=0.711135
          stiffness_at_low_force=0.2 stiffness_at_one_norm_force=3.863536 curviness=0.75
    Millard2012EquilibriumMuscle vasmed_r: max_isometric_force=2747.823 optimal_fiber_length=0.118568
        tendon_slack_length=0.2242013 pennation_angle_at_optimal=0.4222225
      PathPoint P1: femur_r (0.01530528 -0.2261187 0.02011635)
      PathPoint P2: femur_r (0.03891915 -0.2982957 0.0009630166)
      PathPoint P3: patella_r (0.0063 0.0445 -0.017)
      PathPoint P4: patella_r (0.005 0.00247 -0.0085)
      PathPoint P5: tibia_r (0.03627059 -0.0695652 -0.006889451)
      PathWrap: wrap_object=KnExt_at_fem_r method=hybrid
      FiberForceLengthCurve: strain_at_zero_force=0.1780858 strain_at_one_norm_force=0.706013
          stiffness_at_low_force=0.2 stiffness_at_one_norm_force=3.788401 curviness=0.75
    Millard2012EquilibriumMuscle addbrev_l: max_isometric_force=625.8197 optimal_fiber_length=0.1133661
        tendon_slack_length=0.03898023 pennation_angle_at_optimal=0.1147809
      PathPoint P1: pelvis (-0.02199454 -0.1000981 -0.01598009)
      PathPoint P2: femur_l (-0.002139688 -0.1302658 -0.02855158)
      PathWrap: wrap_object=AB_at_femshaft_l method=hybrid
      FiberForceLengthCurve: strain_at_zero_force=-0.1844454 strain_at_one_norm_force=0.5059595
          stiffness_at_low_force=0.2 stiffness_at_one_norm_force=2.896851 curviness=0.75
    Millard2012EquilibriumMuscle addlong_l: max_isometric_force=916.8 optimal_fiber_length=0.1191546
        tendon_slack_length=0.1451433 pennation_angle_at_optimal=0.1377704
      PathPoint P1: pelvis (-0.008728722 -0.09466724 -0.01959117)
      PathPoint P2: femur_l (0.01204645 -0.2642518 -0.01815146)
      PathWrap: wrap_object=AL_at_femshaft_l method=hybrid
      FiberForceLengthCurve: strain_at_zero_force=-0.1942012 strain_at_one_norm_force=0.5013184
          stiffness_at_low_force=0.2 stiffness_at_one_norm_force=2.875548 curviness=0.75
    Millard2012EquilibriumMuscle addmagDist_l: max_isometric_force=597.2951 optimal_fiber_length=0.1969304
        tendon_slack_length=0.09711011 pennation_angle_at_optimal=0.194705
      PathPoint P1: pelvis (-0.0852605 -0.1359524 -0.04131994)
      PathPoint P2: femur_l (0.01203575 -0.2897861 -0.02213034)
      PathWrap: wrap_object=AMdist_at_femshaft_l method=hybrid
      FiberForceLengthCurve: strain_at_zero_force=9.713794e-8 strain_at_one_norm_force=0.7000001
          stiffness_at_low_force=0.2 stiffness_at_one_norm_force=2.857143 curviness=0.75
    Millard2012EquilibriumMuscle addmagIsch_l: max_isometric_force=597.2951 optimal_fiber_length=0.1734031
        tendon_slack_length=0.2401699 pennation_angle_at_optimal=0.1680443
      PathPoint P1: pelvis (-0.1032016 -0.138178 -0.04328114)
      PathPoint P2: femur_l (0.00514595 -0.4282984 0.03752984)
      PathWrap: wrap_object=AMisch_at_condyles_l method=hybrid
      FiberForceLengthCurve: strain_at_zero_force=0.005651991 strain_at_one_norm_force=0.7000408
          stiffness_at_low_force=0.2 stiffness_at_one_norm_force=2.880231 curviness=0.75
    Millard2012EquilibriumMuscle addmagMid_l: max_isometric_force=597.2951 optimal_fiber_length=0.1525807
        tendon_slack_length=0.05166656 pennation_angle_at_optimal=0.2073076
      PathPoint P1: pelvis (-0.06064044 -0.1285835 -0.02961505)
      PathPoint P2: femur_l (0.002589023 -0.179281 -0.0335051)
      PathWrap: wrap_object=AMmid_at_femshaft_l method=hybrid
      FiberForceLengthCurve: strain_at_zero_force=1.776572e-8 strain_at_one_norm_force=0.7000001
          stiffness_at_low_force=0.2 stiffness_at_one_norm_force=2.857143 curviness=0.75
    Millard2012EquilibriumMuscle addmagProx_l: max_isometric_force=597.2951 optimal_fiber_length=0.115656
        tendon_slack_length=0.04416406 pennation_angle_at_optimal=0.3114833
      PathPoint P1: pelvis (-0.03567491 -0.1145271 -0.01416417)
      PathPoint P2: femur_l (-0.01633652 -0.08705727 -0.03671572)
      PathWrap: wrap_object=AMprox_at_femshaft_l method=hybrid
      FiberForceLengthCurve: strain_at_zero_force=8.055312e-8 strain_at_one_norm_force=0.7000001
          stiffness_at_low_force=0.2 stiffness_at_one_norm_force=2.857143 curviness=0.75
    Millard2012EquilibriumMuscle bflh_l: max_isometric_force=1313.184 optimal_fiber_length=0.107589
        tendon_slack_length=0.3665289 pennation_angle_at_optimal=0.1759182
      PathPoint P1: pelvis (-0.1197608 -0.1268264 -0.06080735)
      PathPoint P2: tibia_l (-0.0378362 -0.03821954 -0.04222347)
      PathPoint P3: tibia_l (-0.02977564 -0.05246806 -0.04056628)
      FiberForceLengthCurve: strain_at_zero_force=0.1368428 strain_at_one_norm_force=0.7054016
          stiffness_at_low_force=0.2 stiffness_at_one_norm_force=3.517666 curviness=0.75
    Millard2012EquilibriumMuscle bfsh_l: max_isometric_force=557.1148 optimal_fiber_length=0.1209778
        tendon_slack_length=0.1160611 pennation_angle_at_optimal=0.2642232
      PathPoint P1: femur_l (0.005349221 -0.2330432 -0.0268316)
      PathPoint P2: tibia_l (-0.03155953 -0.03440597 -0.03739193)
      PathWrap: wrap_object=BF_at_gastroc_l method=hybrid
      FiberForceLengthCurve: strain_at_zero_force=0.04380442 strain_at_one_norm_force=0.6994891
          stiffness_at_low_force=0.2 stiffness_at_one_norm_force=3.050247 curviness=0.75
    Millard2012EquilibriumMuscle edl_l: max_isometric_force=603.4982 optimal_fiber_length=0.07500359
        tendon_slack_length=0.3992347 pennation_angle_at_optimal=0.2182582
      PathPoint P1: tibia_l (-0.01761872 -0.1212171 -0.0239243)
      PathPoint P2: tibia_l (0.01805919 -0.3939295 -0.01307084)
      PathPoint P3: calcn_l (0.1011661 0.03411623 -0.0007035286)
      PathPoint P4: calcn_l (0.1778938 0.005212202 -0.01143234)
      PathPoint P5: toes_l (0.0002563334 0.004694934 -0.01401204)
      PathPoint P6: toes_l (0.03785191 -0.0003995689 -0.02289549)
      FiberForceLengthCurve: strain_at_zero_force=0.1015352 strain_at_one_norm_force=0.7074931
          stiffness_at_low_force=0.2 stiffness_at_one_norm_force=3.30056 curviness=0.75
    Millard2012EquilibriumMuscle ehl_l: max_isometric_force=285.8675 optimal_fiber_length=0.08072976
        tendon_slack_length=0.3527019 pennation_angle_at_optimal=0.1972681
      PathPoint P1: tibia_l (-0.01541638 -0.1623911 -0.02205704)
      PathPoint P2: tibia_l (0.007818308 -0.3047715 -0.01913944)
      PathPoint P3: tibia_l (0.0220234 -0.38691 0.003267709)
      PathPoint P4: calcn_l (0.1067803 0.03686448 0.01855557)
      PathPoint P5: calcn_l (0.142337 0.0292831 0.02260086)
      PathPoint P6: calcn_l (0.1908835 0.01317265 0.0246235)
      PathPoint P7: toes_l (0.02546246 0.004095581 0.02243758)
      PathPoint P8: toes_l (0.04810524 0.003396335 0.01703425)
      FiberForceLengthCurve: strain_at_zero_force=0.08168779 strain_at_one_norm_force=0.7147756
          stiffness_at_low_force=0.2 stiffness_at_one_norm_force=3.159119 curviness=0.75
    Millard2012EquilibriumMuscle fdl_l: max_isometric_force=423.177 optimal_fiber_length=0.04846965
        tendon_slack_length=0.4116365 pennation_angle_at_optimal=0.2248391
      PathPoint P1: tibia_l (-0.002532691 -0.1919359 0.00210067)
      PathPoint P2: tibia_l (-0.01938059 -0.3818811 0.01447128)
      PathPoint P3: calcn_l (0.04799609 0.0298517 0.0246235)
      PathPoint P4: calcn_l (0.0779386 0.01667905 0.0231285)
      PathPoint P5: calcn_l (0.1825172 -0.007676151 -0.01020116)
      PathPoint P6: toes_l (-0.001623445 -0.007791593 -0.01346255)
      PathPoint P7: toes_l (0.02435168 -0.007092347 -0.01969012)
      PathPoint P8: toes_l (0.03768102 -0.005993533 -0.02216284)
      FiberForceLengthCurve: strain_at_zero_force=-0.006468795 strain_at_one_norm_force=0.6998542
          stiffness_at_low_force=0.2 stiffness_at_one_norm_force=2.831566 curviness=0.75
    Millard2012EquilibriumMuscle fhl_l: max_isometric_force=907.8393 optimal_fiber_length=0.05749595
        tendon_slack_length=0.3865862 pennation_angle_at_optimal=0.2580255
      PathPoint P1: tibia_l (-0.03413627 -0.2266142 -0.02334078)
      PathPoint P2: tibia_l (-0.02664832 -0.3846051 0.008869497)
      PathPoint P3: calcn_l (0.04117096 0.02615578 0.0211938)
      PathPoint P4: calcn_l (0.1142659 0.006444176 0.02251291)
      PathPoint P5: calcn_l (0.1900029 -0.005022667 0.02365615)
      PathPoint P6: toes_l (0.01324389 -0.006393102 0.02426922)
      PathPoint P7: toes_l (0.0480198 -0.01018901 0.01657634)
      FiberForceLengthCurve: strain_at_zero_force=0.007614866 strain_at_one_norm_force=0.7001852
          stiffness_at_low_force=0.2 stiffness_at_one_norm_force=2.887793 curviness=0.75
    Millard2012EquilibriumMuscle gaslat_l: max_isometric_force=1575.059 optimal_fiber_length=0.07601741
        tendon_slack_length=0.4120364 pennation_angle_at_optimal=0.2102268
      PathPoint P1: femur_l (0.002139688 -0.4206039 -0.02360952)
      PathPoint P2: calcn_l (0.004843642 0.02937786 0.004660877)
      PathWrap: wrap_object=GasLat_at_shank_l method=hybrid
      PathWrap pathwrap_0: wrap_object=GasLat_at_condyles_l method=hybrid
      FiberForceLengthCurve: strain_at_zero_force=-0.1932361 strain_at_one_norm_force=0.6636807
          stiffness_at_low_force=0.2 stiffness_at_one_norm_force=2.333949 curviness=0.75
    Millard2012EquilibriumMuscle gasmed_l: max_isometric_force=3115.515 optimal_fiber_length=0.06501401
        tendon_slack_length=0.4264478 pennation_angle_at_optimal=0.1656816
      PathPoint P1: femur_l (0.006419065 -0.4250197 0.02522629)
      PathPoint P2: calcn_l (0.004843642 0.02937786 0.004660877)
      PathWrap: wrap_object=GasMed_at_shank_l method=hybrid
      PathWrap pathwrap_0: wrap_object=GasMed_at_condyles_l method=hybrid
      FiberForceLengthCurve: strain_at_zero_force=0.1506325 strain_at_one_norm_force=0.550636
          stiffness_at_low_force=0.2 stiffness_at_one_norm_force=4.999956 curviness=0.75
    Millard2012EquilibriumMuscle glmax1_l: max_isometric_force=983.7836 optimal_fiber_length=0.1602333
        tendon_slack_length=0.09515893 pennation_angle_at_optimal=0.3540118
      PathPoint P1: pelvis (-0.1417554 0.03673813 -0.05842071)
      PathPoint P2: pelvis (-0.1447494 -0.02576993 -0.08083434)
      PathPoint P3: femur_l (-0.04750108 -0.03598868 -0.03462882)
      PathPoint P4: femur_l (-0.02963468 -0.06248341 -0.05389253)
      PathWrap: wrap_object=Gmax1_at_pelvis_l method=hybrid
      FiberForceLengthCurve: strain_at_zero_force=2.229005e-7 strain_at_one_norm_force=0.6999999
          stiffness_at_low_force=0.2 stiffness_at_one_norm_force=2.857144 curviness=0.75
    Millard2012EquilibriumMuscle glmax2_l: max_isometric_force=1406.046 optimal_fiber_length=0.1719697
        tendon_slack_length=0.119393 pennation_angle_at_optimal=0.3673821
      PathPoint P1: pelvis (-0.1516587 0.009264398 -0.04794027)
      PathPoint P2: pelvis (-0.1547678 -0.06485079 -0.08436241)
      PathPoint P3: femur_l (-0.04814299 -0.06447051 -0.02889557)
      PathPoint P4: femur_l (-0.01668957 -0.112161 -0.04804462)
      PathWrap: wrap_object=Gmax2_at_pelvis_l method=hybrid
      FiberForceLengthCurve: strain_at_zero_force=1.628612e-7 strain_at_one_norm_force=0.7000001
          stiffness_at_low_force=0.2 stiffness_at_one_norm_force=2.857143 curviness=0.75
    Millard2012EquilibriumMuscle glmax3_l: max_isometric_force=947.7541 optimal_fiber_length=0.1840924
        tendon_slack_length=0.113542 pennation_angle_at_optimal=0.3824161
      PathPoint P1: pelvis (-0.149701 -0.05590585 -0.009339013)
      PathPoint P2: pelvis (-0.1465919 -0.1344935 -0.04513856)
      PathPoint P3: femur_l (-0.03006262 -0.1241941 -0.01077851)
      PathPoint P4: femur_l (-0.006419065 -0.1566501 -0.0471273)
      PathWrap: wrap_object=Gmax3_at_pelvis_l method=hybrid
      FiberForceLengthCurve: strain_at_zero_force=0.03977768 strain_at_one_norm_force=0.7004988
          stiffness_at_low_force=0.2 stiffness_at_one_norm_force=3.026996 curviness=0.75
    Millard2012EquilibriumMuscle glmed1_l: max_isometric_force=1093.467 optimal_fiber_length=0.0826183
        tendon_slack_length=0.0631787 pennation_angle_at_optimal=0.3165559
      PathPoint P1: pelvis (-0.05642578 0.02768671 -0.1193318)
      PathPoint P2: femur_l (-0.01497782 -0.01987105 -0.06765233)
      FiberForceLengthCurve: strain_at_zero_force=6.185261e-8 strain_at_one_norm_force=0.7000001
          stiffness_at_low_force=0.2 stiffness_at_one_norm_force=2.857143 curviness=0.75
    Millard2012EquilibriumMuscle glmed2_l: max_isometric_force=765.0917 optimal_fiber_length=0.09062092
        tendon_slack_length=0.08139701 pennation_angle_at_optimal=0.3165559
      PathPoint P1: pelvis (-0.09788145 0.05856803 -0.08508878)
      PathPoint P2: femur_l (-0.02353657 -0.01103947 -0.06421238)
      FiberForceLengthCurve: strain_at_zero_force=-0.1329608 strain_at_one_norm_force=0.6904088
          stiffness_at_low_force=0.2 stiffness_at_one_norm_force=2.429043 curviness=0.75
    Millard2012EquilibriumMuscle glmed3_l: max_isometric_force=871.1993 optimal_fiber_length=0.08495906
        tendon_slack_length=0.05265068 pennation_angle_at_optimal=0.3165559
      PathPoint P1: pelvis (-0.1151546 0.01703797 -0.06641076)
      PathPoint P2: femur_l (-0.03305818 -0.005188552 -0.05939645)
      FiberForceLengthCurve: strain_at_zero_force=-0.1914236 strain_at_one_norm_force=0.6558113
          stiffness_at_low_force=0.2 stiffness_at_one_norm_force=2.360621 curviness=0.75
    Millard2012EquilibriumMuscle glmin1_l: max_isometric_force=374.0459 optimal_fiber_length=0.08834369
        tendon_slack_length=0.02097212 pennation_angle_at_optimal=0.1745329
      PathPoint P1: pelvis (-0.03454639 0 -0.1224448)
      PathPoint P2: femur_l (0.005349221 -0.01655921 -0.06421238)
      FiberForceLengthCurve: strain_at_zero_force=-8.172674e-8 strain_at_one_norm_force=0.7000001
          stiffness_at_low_force=0.2 stiffness_at_one_norm_force=2.857142 curviness=0.75
    Millard2012EquilibriumMuscle glmin2_l: max_isometric_force=394.8197 optimal_fiber_length=0.07439359
        tendon_slack_length=0.03467369 pennation_angle_at_optimal=0
      PathPoint P1: pelvis (-0.07093526 0.01064873 -0.1048045)
      PathPoint P2: femur_l (0.004279377 -0.009935525 -0.05962578)
      FiberForceLengthCurve: strain_at_zero_force=0.001146607 strain_at_one_norm_force=0.6999804
          stiffness_at_low_force=0.2 stiffness_at_one_norm_force=2.861911 curviness=0.75
    Millard2012EquilibriumMuscle glmin3_l: max_isometric_force=446.7738 optimal_fiber_length=0.03888971
        tendon_slack_length=0.05199984 pennation_angle_at_optimal=0.01745329
      PathPoint P1: pelvis (-0.09085701 -0.01650554 -0.08280591)
      PathPoint P2: femur_l (-0.004279377 -0.001103947 -0.05847913)
      FiberForceLengthCurve: strain_at_zero_force=-0.0351512 strain_at_one_norm_force=0.6990981
          stiffness_at_low_force=0.2 stiffness_at_one_norm_force=2.723871 curviness=0.75
    Millard2012EquilibriumMuscle grac_l: max_isometric_force=281.3115 optimal_fiber_length=0.2505424
        tendon_slack_length=0.1891868 pennation_angle_at_optimal=0.1720016
      PathPoint P1: pelvis (-0.05453724 -0.1377094 -0.02548513)
      PathPoint P2: tibia_l (-0.02028355 -0.04981741 0.03455603)
      PathPoint P3: tibia_l (0.001960083 -0.07293982 0.01835752)
      PathWrap: wrap_object=GR_at_condyles_l method=hybrid
      FiberForceLengthCurve: strain_at_zero_force=-0.1885953 strain_at_one_norm_force=0.7244614
          stiffness_at_low_force=0.2 stiffness_at_one_norm_force=2.190445 curviness=0.75
    Millard2012EquilibriumMuscle iliacus_l: max_isometric_force=1021.141 optimal_fiber_length=0.1163909
        tendon_slack_length=0.1049491 pennation_angle_at_optimal=0.279914
      PathPoint P1: pelvis (-0.06966856 0.03290459 -0.08747542)
      PathPoint P2: pelvis (-0.01554588 -0.05931344 -0.07844771)
      PathPoint P3: femur_l (-0.002460642 -0.06237302 -0.01593843)
      PathPoint P4: femur_l (-0.0130521 -0.07032143 -0.02247433)
      PathWrap: wrap_object=IL_at_brim_l method=hybrid range=(2 3)
      FiberForceLengthCurve: strain_at_zero_force=-0.1607227 strain_at_one_norm_force=0.5020882
          stiffness_at_low_force=0.2 stiffness_at_one_norm_force=3.017452 curviness=0.75
    Millard2012EquilibriumMuscle perbrev_l: max_isometric_force=521.2016 optimal_fiber_length=0.05147852
        tendon_slack_length=0.1672797 pennation_angle_at_optimal=0.2052361
      PathPoint P1: tibia_l (-0.02675843 -0.2652738 -0.02929268)
      PathPoint P2: tibia_l (-0.03732967 -0.4078637 -0.02905927)
      PathPoint P3: tibia_l (-0.03138335 -0.419493 -0.0297595)
      PathPoint P4: calcn_l (0.05184899 0.02558717 -0.02049027)
      PathPoint P5: calcn_l (0.07452604 0.02075404 -0.03016379)
      FiberForceLengthCurve: strain_at_zero_force=-0.02868018 strain_at_one_norm_force=0.6992207
          stiffness_at_low_force=0.2 stiffness_at_one_norm_force=2.747627 curviness=0.75
    Millard2012EquilibriumMuscle perlong_l: max_isometric_force=1115.371 optimal_fiber_length=0.05533118
        tendon_slack_length=0.3618537 pennation_angle_at_optimal=0.2479525
      PathPoint P1: tibia_l (-0.0220234 -0.1438471 -0.0329105)
      PathPoint P2: tibia_l (-0.03490709 -0.4085971 -0.02765882)
      PathPoint P3: tibia_l (-0.02995183 -0.4205407 -0.02800894)
      PathPoint P4: calcn_l (0.04821625 0.02179648 -0.01943498)
      PathPoint P5: calcn_l (0.07496637 0.01004533 -0.02497526)
      PathPoint P6: calcn_l (0.09379052 0.006538944 -0.01037705)
      PathPoint P7: calcn_l (0.1324296 0.008055221 0.01618116)
      FiberForceLengthCurve: strain_at_zero_force=-0.08769079 strain_at_one_norm_force=0.6966414
          stiffness_at_low_force=0.2 stiffness_at_one_norm_force=2.54994 curviness=0.75
    Millard2012EquilibriumMuscle piri_l: max_isometric_force=1029.787 optimal_fiber_length=0.02818175
        tendon_slack_length=0.1245484 pennation_angle_at_optimal=0.1745329
      PathPoint P1: pelvis (-0.1172389 -0.006953623 -0.0140189)
      PathPoint P2: pelvis (-0.1174808 -0.03264902 -0.06321474)
      PathPoint P3: femur_l (-0.01583369 -0.00397421 -0.05010859)
      FiberForceLengthCurve: strain_at_zero_force=-0.1828826 strain_at_one_norm_force=0.7031405
          stiffness_at_low_force=0.2 stiffness_at_one_norm_force=2.257277 curviness=0.75
    Millard2012EquilibriumMuscle psoas_l: max_isometric_force=1426.79 optimal_fiber_length=0.1265901
        tendon_slack_length=0.1077946 pennation_angle_at_optimal=0.2155251
      PathPoint P1: pelvis (-0.06978371 0.06602215 -0.04046906)
      PathPoint P2: pelvis (-0.0236067 -0.06964272 -0.06807103)
      PathPoint P3: femur_l (-0.01412194 -0.05155433 -0.005274588)
      PathPoint P4: femur_l (-0.02514134 -0.05784683 -0.01009052)
      PathWrap: wrap_object=PS_at_brim_l method=hybrid range=(2 3)
      FiberForceLengthCurve: strain_at_zero_force=-0.07629291 strain_at_one_norm_force=0.5032605
          stiffness_at_low_force=0.2 stiffness_at_one_norm_force=3.450933 curviness=0.75
    Millard2012EquilibriumMuscle recfem_l: max_isometric_force=2191.741 optimal_fiber_length=0.08295169
        tendon_slack_length=0.4922478 pennation_angle_at_optimal=0.2170149
      PathPoint P1: pelvis (-0.02763711 -0.04131708 -0.09681443)
      PathPoint P2: patella_l (0.01 0.049 -0.0007)
      PathPoint P3: patella_l (0.0121 0.0437 0.001)
      PathPoint P4: patella_l (0.005 0.00247 -3e-5)
      PathPoint P5: tibia_l (0.03589814 -0.06612987 0.0005485083)
      PathWrap: wrap_object=KnExt_at_fem_l method=hybrid
      FiberForceLengthCurve: strain_at_zero_force=0.1997943 strain_at_one_norm_force=0.8997465
          stiffness_at_low_force=0.2 stiffness_at_one_norm_force=2.857338 curviness=0.75
    Millard2012EquilibriumMuscle sart_l: max_isometric_force=249.4131 optimal_fiber_length=0.4416368
        tendon_slack_length=0.1358881 pennation_angle_at_optimal=0.02613542
      PathPoint P1: pelvis (-0.02245516 -0.01661202 -0.1095777)
      PathPoint P2: femur_l (-0.003209532 -0.3938884 0.04827395)
      PathPoint P3: tibia_l (-0.02763937 -0.04201216 0.04259692)
      PathPoint P4: tibia_l (-0.0175086 -0.06275632 0.03080983)
      PathPoint P5: tibia_l (0.01497591 -0.08486247 0.003034301)
      FiberForceLengthCurve: strain_at_zero_force=-0.07294162 strain_at_one_norm_force=0.7021361
          stiffness_at_low_force=0.2 stiffness_at_one_norm_force=2.580386 curviness=0.75
    Millard2012EquilibriumMuscle semimem_l: max_isometric_force=2200.987 optimal_fiber_length=0.09474467
        tendon_slack_length=0.3690635 pennation_angle_at_optimal=0.2545615
      PathPoint P1: pelvis (-0.1136576 -0.1213956 -0.06371282)
      PathPoint P2: tibia_l (-0.02973159 -0.04295508 0.02287396)
      PathWrap: wrap_object=SM_at_condyles_l method=hybrid
      FiberForceLengthCurve: strain_at_zero_force=0.1537347 strain_at_one_norm_force=0.7044745
          stiffness_at_low_force=0.2 stiffness_at_one_norm_force=3.631479 curviness=0.75
    Millard2012EquilibriumMuscle semiten_l: max_isometric_force=591.2951 optimal_fiber_length=0.2122658
        tendon_slack_length=0.271875 pennation_angle_at_optimal=0.241295
      PathPoint P1: pelvis (-0.1195305 -0.1334286 -0.05343991)
      PathPoint P2: tibia_l (-0.03435651 -0.05322239 0.02672519)
      PathPoint P3: tibia_l (0.002092223 -0.08098604 0.01365436)
      PathWrap: wrap_object=ST_at_condyles_l method=hybrid
      FiberForceLengthCurve: strain_at_zero_force=0.114169 strain_at_one_norm_force=0.7136122
          stiffness_at_low_force=0.2 stiffness_at_one_norm_force=3.336429 curviness=0.75
    Millard2012EquilibriumMuscle soleus_l: max_isometric_force=6194.843 optimal_fiber_length=0.04921659
        tendon_slack_length=0.3147066 pennation_angle_at_optimal=0.3814289
      PathPoint P1: tibia_l (-0.008368893 -0.09596793 -0.01143698)
      PathPoint P2: calcn_l (0.004843642 0.02937786 0.004660877)
      FiberForceLengthCurve: strain_at_zero_force=0.04016445 strain_at_one_norm_force=0.7659521
          stiffness_at_low_force=0.2 stiffness_at_one_norm_force=2.755627 curviness=0.75
    Millard2012EquilibriumMuscle tfl_l: max_isometric_force=411.2066 optimal_fiber_length=0.1019738
        tendon_slack_length=0.482501 pennation_angle_at_optimal=0.05235988
      PathPoint P1: pelvis (-0.02303093 0.01171361 -0.1338592)
      PathPoint P2: femur_l (0.03145342 -0.1098427 -0.06845498)
      PathPoint P3: femur_l (0.01144733 -0.4470986 -0.03715145)
      PathPoint P4: tibia_l (0.01189264 -0.04295508 -0.04037955)
      FiberForceLengthCurve: strain_at_zero_force=0.1571908 strain_at_one_norm_force=0.6394004
          stiffness_at_low_force=0.2 stiffness_at_one_norm_force=4.147574 curviness=0.75
    Millard2012EquilibriumMuscle tibant_l: max_isometric_force=1227.452 optimal_fiber_length=0.07570391
        tendon_slack_length=0.2665277 pennation_angle_at_optimal=0.1951828
      PathPoint P1: tibia_l (0.01695802 -0.1374562 -0.01890603)
      PathPoint P2: tibia_l (0.02763937 -0.1996887 -0.0149381)
      PathPoint P3: tibia_l (0.02565726 -0.3833479 0.01540492)
      PathPoint P4: calcn_l (0.1283565 0.01686858 0.02682203)
      FiberForceLengthCurve: strain_at_zero_force=0.1588072 strain_at_one_norm_force=0.7083715
          stiffness_at_low_force=0.2 stiffness_at_one_norm_force=3.639246 curviness=0.75
    Millard2012EquilibriumMuscle tibpost_l: max_isometric_force=1730.154 optimal_fiber_length=0.04246819
        tendon_slack_length=0.3154551 pennation_angle_at_optimal=0.2264891
      PathPoint P1: tibia_l (-0.004514797 -0.1366181 -0.0120205)
      PathPoint P2: tibia_l (-0.01805919 -0.3829288 0.02042318)
      PathPoint P3: calcn_l (0.04590452 0.03165228 0.02515115)
      PathPoint P4: calcn_l (0.0849839 0.015068 0.02471144)
      FiberForceLengthCurve: strain_at_zero_force=-0.07310113 strain_at_one_norm_force=0.698029
          stiffness_at_low_force=0.2 stiffness_at_one_norm_force=2.593596 curviness=0.75
    Millard2012EquilibriumMuscle vasint_l: max_isometric_force=1697.361 optimal_fiber_length=0.1276086
        tendon_slack_length=0.2235877 pennation_angle_at_optimal=0.06309973
      PathPoint P1: femur_l (0.03102548 -0.2123994 -0.03554614)
      PathPoint P2: femur_l (0.03583978 -0.2300626 -0.03267951)
      PathPoint P3: patella_l (0.0058 0.048 0.0006)
      PathPoint P4: patella_l (0.005 0.00247 0.00039)
      PathPoint P5: tibia_l (0.03586511 -0.06621368 -0.0005018268)
      PathWrap: wrap_object=KnExt_at_fem_l method=hybrid
      FiberForceLengthCurve: strain_at_zero_force=0.1756531 strain_at_one_norm_force=0.7074754
          stiffness_at_low_force=0.2 stiffness_at_one_norm_force=3.760655 curviness=0.75
    Millard2012EquilibriumMuscle vaslat_l: max_isometric_force=5148.767 optimal_fiber_length=0.1276123
        tendon_slack_length=0.2410454 pennation_angle_at_optimal=0.2528673
      PathPoint P1: femur_l (0.005135252 -0.2046718 -0.04001807)
      PathPoint P2: femur_l (0.02877881 -0.2860327 -0.04689797)
      PathPoint P3: patella_l (0.0103 0.0423 -0.0141)
      PathPoint P4: patella_l (0.005 0.00247 -0.00733)
      PathPoint P5: tibia_l (0.03583207 -0.06640226 -0.005963569)
      PathWrap: wrap_object=KnExtVL_at_fem_l method=hybrid
      FiberForceLengthCurve: strain_at_zero_force=0.1934746 strain_at_one_norm_force=0.711135
          stiffness_at_low_force=0.2 stiffness_at_one_norm_force=3.863536 curviness=0.75
    Millard2012EquilibriumMuscle vasmed_l: max_isometric_force=2747.823 optimal_fiber_length=0.1196289
        tendon_slack_length=0.2262073 pennation_angle_at_optimal=0.4222225
      PathPoint P1: femur_l (0.01497782 -0.2317185 -0.02155701)
      PathPoint P2: femur_l (0.03808645 -0.305683 -0.001031985)
      PathPoint P3: patella_l (0.0063 0.0445 0.017)
      PathPoint P4: patella_l (0.005 0.00247 0.0085)
      PathPoint P5: tibia_l (0.03512733 -0.06660132 0.007912525)
      PathWrap: wrap_object=KnExt_at_fem_l method=hybrid
      FiberForceLengthCurve: strain_at_zero_force=0.1780858 strain_at_one_norm_force=0.706013
          stiffness_at_low_force=0.2 stiffness_at_one_norm_force=3.788401 curviness=0.75
    CoordinateActuator lumbar_ext: coordinate=lumbar_extension optimal_force=10
    CoordinateActuator lumbar_bend: coordinate=lumbar_bending optimal_force=10
    CoordinateActuator lumbar_rot: coordinate=lumbar_rotation optimal_force=10
    CoordinateActuator shoulder_flex_r: coordinate=arm_flex_r optimal_force=10
    CoordinateActuator shoulder_add_r: coordinate=arm_add_r optimal_force=10
    CoordinateActuator shoulder_rot_r: coordinate=arm_rot_r optimal_force=10
    CoordinateActuator elbow_flex_r: coordinate=elbow_flex_r optimal_force=10
    CoordinateActuator pro_sup_r: coordinate=pro_sup_r optimal_force=10
    CoordinateActuator wrist_flex_r: coordinate=wrist_flex_r optimal_force=10
    CoordinateActuator wrist_dev_r: coordinate=wrist_dev_r optimal_force=10
    CoordinateActuator shoulder_flex_l: coordinate=arm_flex_l optimal_force=10
    CoordinateActuator shoulder_add_l: coordinate=arm_add_l optimal_force=10
    CoordinateActuator shoulder_rot_l: coordinate=arm_rot_l optimal_force=10
    CoordinateActuator elbow_flex_l: coordinate=elbow_flex_l optimal_force=10
    CoordinateActuator pro_sup_l: coordinate=pro_sup_l optimal_force=10
    CoordinateActuator wrist_flex_l: coordinate=wrist_flex_l optimal_force=10
    CoordinateActuator wrist_dev_l: coordinate=wrist_dev_l optimal_force=10
    ExpressionBasedCoordinateForce PassiveShoulderDampingX_r: coordinate=arm_flex_r
        expression=-2.44*exp(5.05*(q-1.81))+1.51*exp(-11.88*(q+0.50))-1.0*qdot
    ExpressionBasedCoordinateForce PassiveShoulderDampingY_r: coordinate=arm_add_r
        expression=-15.03*exp(20.94*(q-0.10))+5.03*exp(-14.93*(q+1.57))-1.0*qdot
    ExpressionBasedCoordinateForce PassiveShoulderDampingZ_r: coordinate=arm_rot_r
        expression=-0.43*exp(14.94*(q-0.15))+0.43*exp(-14.93*(q+0.15))-1.0*qdot
    ExpressionBasedCoordinateForce PassiveElbowDamping_r: coordinate=elbow_flex_r
        expression=6.09*exp(-6.94*(q-0.30))-11.03*exp(11.33*(q-2.40))-1.0*qdot
    ExpressionBasedCoordinateForce PassiveShoulderDampingX_l: coordinate=arm_flex_l
        expression=-2.44*exp(5.05*(q-1.81))+1.51*exp(-11.88*(q+0.50))-1.0*qdot
    ExpressionBasedCoordinateForce PassiveShoulderDampingY_l: coordinate=arm_add_l
        expression=-15.03*exp(20.94*(q-0.10))+5.03*exp(-14.93*(q+1.57))-1.0*qdot
    ExpressionBasedCoordinateForce PassiveShoulderDampingZ_l: coordinate=arm_rot_l
        expression=-0.43*exp(14.94*(q-0.15))+0.43*exp(-14.93*(q+0.15))-1.0*qdot
    ExpressionBasedCoordinateForce PassiveElbowDamping_l: coordinate=elbow_flex_l
        expression=6.09*exp(-6.94*(q-0.30))-11.03*exp(11.33*(q-2.40))-1.0*qdot
    ExpressionBasedCoordinateForce PassiveHipDampingX_r: coordinate=hip_flexion_r
        expression=-2.44*exp(5.05*(q-1.81))+1.51*exp(-21.88*(q+0.47))-0.1*qdot
    ExpressionBasedCoordinateForce PassiveHipDampingY_r: coordinate=hip_adduction_r
        expression=-0.03*exp(14.94*(q-0.50))+0.03*exp(-14.94*(q+0.50))-0.1*qdot
    ExpressionBasedCoordinateForce PassiveHipDampingZ_r: coordinate=hip_rotation_r
        expression=-0.03*exp(14.94*(q-0.92))+0.03*exp(-14.94*(q+0.92))-0.1*qdot
    ExpressionBasedCoordinateForce PassiveHipDampingX_l: coordinate=hip_flexion_l
        expression=-2.44*exp(5.05*(q-1.81))+1.51*exp(-21.88*(q+0.47))-0.1*qdot
    ExpressionBasedCoordinateForce PassiveHipDampingY_l: coordinate=hip_adduction_l
        expression=-0.03*exp(14.94*(q-0.50))+0.03*exp(-14.94*(q+0.50))-0.1*qdot
    ExpressionBasedCoordinateForce PassiveHipDampingZ_l: coordinate=hip_rotation_l
        expression=-0.03*exp(14.94*(q-0.92))+0.03*exp(-14.94*(q+0.92))-0.1*qdot
    ExpressionBasedCoordinateForce PassiveKneeDamping_r: coordinate=knee_angle_r
        expression=6.09*exp(33.94*(-q-0.13))-11.03*exp(-11.33*(-q+2.40))-0.1*qdot
    ExpressionBasedCoordinateForce PassiveKneeDamping_l: coordinate=knee_angle_l
        expression=6.09*exp(33.94*(-q-0.13))-11.03*exp(-11.33*(-q+2.40))-0.1*qdot
    ExpressionBasedBushingForce PassiveAnkleBushing_r: socket_frame1=/bodyset/tibia_r socket_frame2=/bodyset/calcn_r
        Mx_expression=9.52095038*theta_x-29.57608094*theta_x^2+169.01588105*theta_x^3
        My_expression=3.61796125*theta_y-10.1612135*theta_y^2+64.5279144*theta_y^3
        Mz_expression=5.98187224*theta_z+15.74951827*theta_z^2+33.6780792*theta_z^3 Fx_expression=0 Fy_expression=0
        Fz_expression=0 rotational_damping=(2 2 2) translational_damping=(0 0 0) moment_visual_scale=1
        force_visual_scale=1 visual_aspect_ratio=1
      PhysicalOffsetFrame tibia_r_offset_bushing: socket_parent=/bodyset/tibia_r translation=(-0.01137009 -0.4377235 0)
          orientation=(0.175895 -0.105208 0.0186622)
      PhysicalOffsetFrame calcn_r_offset_bushing: socket_parent=/bodyset/calcn_r
          translation=(0.05398098 0.04248075 -0.006975988) orientation=(0.175895 -0.105208 0.0186622)
    ExpressionBasedBushingForce PassiveAnkleBushing_l: socket_frame1=/bodyset/tibia_l socket_frame2=/bodyset/calcn_l
        Mx_expression=9.52095038*theta_x+29.57608094*theta_x^2+169.01588105*theta_x^3
        My_expression=3.61796125*theta_y+10.1612135*theta_y^2+64.5279144*theta_y^3
        Mz_expression=5.98187224*theta_z+15.74951827*theta_z^2+33.6780792*theta_z^3 Fx_expression=0 Fy_expression=0
        Fz_expression=0 rotational_damping=(2 2 2) translational_damping=(0 0 0) moment_visual_scale=1
        force_visual_scale=1 visual_aspect_ratio=1
      PhysicalOffsetFrame tibia_l_offset_bushing: socket_parent=/bodyset/tibia_l translation=(-0.0110117 -0.4190739 0)
          orientation=(-0.175895 0.105208 0.0186622)
      PhysicalOffsetFrame calcn_l_offset_bushing: socket_parent=/bodyset/calcn_l
          translation=(0.05368737 0.03975488 0.006964933) orientation=(-0.175895 0.105208 0.0186622)
    ExpressionBasedCoordinateForce PassiveAnkleDamping_r: coordinate=ankle_angle_r expression=-0.1*qdot
    ExpressionBasedCoordinateForce PassiveAnkleDamping_l: coordinate=ankle_angle_l expression=-0.1*qdot
    ExpressionBasedCoordinateForce PassiveSubtalarDamping_r: coordinate=subtalar_angle_r expression=-2.0*qdot
    ExpressionBasedCoordinateForce PassiveSubtalarDamping_l: coordinate=subtalar_angle_l expression=-2.0*qdot
    ExpressionBasedCoordinateForce PassiveToeDamping_r: coordinate=mtp_angle_r expression=-25.0*q-2.0*qdot
    ExpressionBasedCoordinateForce PassiveToeDamping_l: coordinate=mtp_angle_l expression=-25.0*q-2.0*qdot
    SmoothSphereHalfSpaceForce [values shared by the 12 below unless stated]: socket_half_space=/contactgeometryset/floor
        stiffness=3067776 [N/m^2] dissipation=2 [s/m] static_friction=0.8 dynamic_friction=0.8 viscous_friction=0.5
        transition_velocity=0.2 [m/s] hertz_smoothing=300 hunt_crossley_smoothing=50
    SmoothSphereHalfSpaceForce contactHeel_r: socket_sphere=/contactgeometryset/heel_r
    SmoothSphereHalfSpaceForce contactLateralRearfoot_r: socket_sphere=/contactgeometryset/lateralRearfoot_r
    SmoothSphereHalfSpaceForce contactLateralMidfoot_r: socket_sphere=/contactgeometryset/lateralMidfoot_r
    SmoothSphereHalfSpaceForce contactLateralToe_r: socket_sphere=/contactgeometryset/lateralToe_r stiffness=306777.6
    SmoothSphereHalfSpaceForce contactMedialToe_r: socket_sphere=/contactgeometryset/medialToe_r
    SmoothSphereHalfSpaceForce contactMedialMidfoot_r: socket_sphere=/contactgeometryset/medialMidfoot_r
    SmoothSphereHalfSpaceForce contactHeel_l: socket_sphere=/contactgeometryset/heel_l
    SmoothSphereHalfSpaceForce contactLateralRearfoot_l: socket_sphere=/contactgeometryset/lateralRearfoot_l
    SmoothSphereHalfSpaceForce contactLateralMidfoot_l: socket_sphere=/contactgeometryset/lateralMidfoot_l
    SmoothSphereHalfSpaceForce contactLateralToe_l: socket_sphere=/contactgeometryset/lateralToe_l stiffness=306777.6
    SmoothSphereHalfSpaceForce contactMedialToe_l: socket_sphere=/contactgeometryset/medialToe_l
    SmoothSphereHalfSpaceForce contactMedialMidfoot_l: socket_sphere=/contactgeometryset/medialMidfoot_l
    ObjectGroup right_leg: members=(addbrev_r addlong_r addmagDist_r addmagIsch_r addmagMid_r addmagProx_r bflh_r bfsh_r edl_r ehl_r fdl_r fhl_r gaslat_r gasmed_r glmax1_r glmax2_r glmax3_r glmed1_r glmed2_r glmed3_r glmin1_r glmin2_r glmin3_r grac_r iliacus_r perbrev_r perlong_r piri_r psoas_r recfem_r sart_r semimem_r semiten_r soleus_r tfl_r tibant_r tibpost_r vasint_r vaslat_r vasmed_r)
    ObjectGroup left_leg: members=(addbrev_l addlong_l addmagDist_l addmagIsch_l addmagMid_l addmagProx_l bflh_l bfsh_l edl_l ehl_l fdl_l fhl_l gaslat_l gasmed_l glmax1_l glmax2_l glmax3_l glmed1_l glmed2_l glmed3_l glmin1_l glmin2_l glmin3_l grac_l iliacus_l perbrev_l perlong_l piri_l psoas_l recfem_l sart_l semimem_l semiten_l soleus_l tfl_l tibant_l tibpost_l vasint_l vaslat_l vasmed_l)
    ObjectGroup hip_add_r: members=(addbrev_r addlong_r addmagDist_r addmagIsch_r addmagMid_r addmagProx_r bflh_r grac_r semimem_r semiten_r)
    ObjectGroup hip_abd_r: members=(glmax1_r glmed1_r glmed2_r glmed3_r glmin1_r glmin2_r glmin3_r piri_r sart_r tfl_r)
    ObjectGroup hip_flex_r: members=(addbrev_r addlong_r glmin1_r grac_r iliacus_r psoas_r recfem_r sart_r tfl_r)
    ObjectGroup hip_ext_r: members=(addlong_r addmagDist_r addmagIsch_r addmagMid_r addmagProx_r bflh_r glmax1_r glmax2_r glmax3_r glmed1_r glmed2_r glmed3_r glmin3_r semimem_r semiten_r)
    ObjectGroup hip_inrot_r: members=(glmed1_r glmed2_r glmed3_r glmin1_r iliacus_r psoas_r tfl_r)
    ObjectGroup hip_exrot_r: members=(glmin3_r piri_r)
    ObjectGroup knee_flex_r: members=(bflh_r bfsh_r gaslat_r gasmed_r grac_r sart_r semimem_r semiten_r)
    ObjectGroup knee_ext_r: members=(recfem_r vasint_r vaslat_r vasmed_r)
    ObjectGroup ankle_df_r: members=(edl_r ehl_r tibant_r)
    ObjectGroup ankle_pf_r: members=(fdl_r fhl_r gaslat_r gasmed_r perbrev_r perlong_r soleus_r tibpost_r)
    ObjectGroup everter_r: members=(edl_r perbrev_r perlong_r)
    ObjectGroup inverter_r: members=(ehl_r fdl_r fhl_r tibant_r tibpost_r)
    ObjectGroup hip_add_l: members=(addbrev_l addlong_l addmagDist_l addmagIsch_l addmagMid_l addmagProx_l bflh_l grac_l semimem_l semiten_l)
    ObjectGroup hip_abd_l: members=(glmax1_l glmed1_l glmed2_l glmed3_l glmin1_l glmin2_l glmin3_l piri_l sart_l tfl_l)
    ObjectGroup hip_flex_l: members=(addbrev_l addlong_l glmin1_l grac_l iliacus_l psoas_l recfem_l sart_l tfl_l)
    ObjectGroup hip_ext_l: members=(addlong_l addmagDist_l addmagIsch_l addmagMid_l addmagProx_l bflh_l glmax1_l glmax2_l glmax3_l glmed1_l glmed2_l glmed3_l glmin3_l semimem_l semiten_l)
    ObjectGroup hip_exrot_l: members=(glmin3_l piri_l)
    ObjectGroup hip_inrot_l: members=(glmed1_l glmed2_l glmed3_l glmin1_l iliacus_l psoas_l tfl_l)
    ObjectGroup knee_flex_l: members=(bflh_l bfsh_l gaslat_l gasmed_l grac_l sart_l semimem_l semiten_l)
    ObjectGroup knee_ext_l: members=(recfem_l vasint_l vaslat_l vasmed_l)
    ObjectGroup ankle_df_l: members=(edl_l ehl_l tibant_l)
    ObjectGroup ankle_pf_l: members=(fdl_l fhl_l gaslat_l gasmed_l perbrev_l perlong_l soleus_l tibpost_l)
    ObjectGroup everter_l: members=(edl_l perbrev_l perlong_l)
    ObjectGroup inverter_l: members=(ehl_l fdl_l fhl_l tibant_l tibpost_l)
  MarkerSet:
    Marker RShoulder: torso (-0.0004742495 0.4280704 0.1809348) fixed=true
    Marker LShoulder: torso (-0.000110047 0.4288869 -0.1832303) fixed=true
    Marker LClavicle: torso (0.07170574 0.3937522 -0.03193434) fixed=true
    Marker C7: torso (-0.1228019 0.3608302 0.001694922)
    Marker RBiceps: humerus_r (0.04870997 -0.1813916 0.0261853)
    Marker RElbow: humerus_r (0.01481184 -0.3114747 0.04110374) fixed=true
    Marker RMElbow: humerus_r (-0.001476512 -0.3168868 -0.05357553) fixed=true
    Marker RForearm: radius_r (0.02471693 -0.08884726 0.0100757)
    Marker RWrist: radius_r (-0.03123556 -0.2139855 0.008799776) fixed=true
    Marker LBiceps: humerus_l (0.03634509 -0.1535138 -0.034309)
    Marker LElbow: humerus_l (0.01504566 -0.2752707 -0.04200934) fixed=true
    Marker LMElbow: humerus_l (-0.001181173 -0.2785077 0.05361202) fixed=true
    Marker LForearm: radius_l (0.005792097 -0.08629539 -0.02167468)
    Marker LWrist: radius_l (-0.03246539 -0.2119011 -0.007735174) fixed=true
    Marker RASI: pelvis (0.01684981 0.04035507 0.1403561) fixed=true
    Marker LASI: pelvis (0.01300951 0.03738502 -0.1388794) fixed=true
    Marker RPSI: pelvis (-0.1617018 0.05133278 0.05021718)
    Marker LPSI: pelvis (-0.1678195 0.05174188 -0.003437483)
    Marker RTH1: femur_r (0.04642746 -0.3532052 0.04582191)
    Marker RTH2: femur_r (-0.01695559 -0.2667535 0.06586371)
    Marker RTHI: femur_r (0.05741341 -0.2774647 0.0654285)
    Marker RTH3: femur_r (-0.02859376 -0.341552 0.04745342)
    Marker RKNE: femur_r (-0.003794039 -0.4376439 0.0523084) fixed=true
    Marker RSH1: tibia_r (0.01918563 -0.3392483 0.02278541)
    Marker RSH2: tibia_r (-0.06645678 -0.2759358 0.04239743)
    Marker RTIB: tibia_r (0.008497859 -0.2641232 0.03209679)
    Marker RANK: tibia_r (-0.007748952 -0.433031 0.05842548) fixed=true
    Marker RMAnkle: tibia_r (0.003051687 -0.4254683 -0.03861365) fixed=true
    Marker RTOE: toes_r (0.05534559 0.0168725 -0.01901734) fixed=true
    Marker RMT5: calcn_r (0.1861725 0.003573757 0.05930497) fixed=true
    Marker RHEE: calcn_r (-0.01999911 0.02161723 -0.01039886) fixed=true
    Marker RD1M: calcn_r (0.1936044 0.001759421 -0.04703183) fixed=true
    Marker RSTL: calcn_r (0.07041716 0.006534 -0.04847227) fixed=true
    Marker RLCA: calcn_r (0.06955134 0.005740673 0.05363796) fixed=true
    Marker LTH1: femur_l (0.05839179 -0.3031092 -0.05488586)
    Marker LTH2: femur_l (-0.01786967 -0.2261229 -0.0706255)
    Marker LTH3: femur_l (-0.01478862 -0.3072637 -0.06149336)
    Marker LTHI: femur_l (0.05513111 -0.2230505 -0.06682306)
    Marker LKNE: femur_l (-0.003370466 -0.4491418 -0.05632668) fixed=true
    Marker LSH1: tibia_l (0.01420906 -0.1808054 -0.04571456)
    Marker LSH2: tibia_l (-0.0680072 -0.1180886 -0.07175501)
    Marker LSH3: tibia_l (-0.05598294 -0.1916692 -0.06945151)
    Marker LTIB: tibia_l (0.003520193 -0.1074909 -0.05392838)
    Marker LANK: tibia_l (-0.008001992 -0.4140232 -0.06706463) fixed=true
    Marker LMAnkle: tibia_l (-0.001457806 -0.3927456 0.04434795) fixed=true
    Marker LTOE: toes_l (0.05611858 0.01686029 0.01915055) fixed=true
    Marker LHEE: calcn_l (-0.0201077 0.01938637 0.0102187) fixed=true
    Marker LD1M: calcn_l (0.1918692 0.002225248 0.04702343) fixed=true
    Marker LSTL: calcn_l (0.06985676 0.006301378 0.04834663) fixed=true
    Marker LLCA: calcn_l (0.06856235 0.00526137 -0.05347731) fixed=true
    Marker LMT5: calcn_l (0.1855918 0.003794255 -0.05873788) fixed=true
    Marker Pelvis_RightThigh_score: femur_r (0 0 0) fixed=true
    Marker Pelvis_LeftThigh_score: femur_l (0 0 0) fixed=true
  ContactGeometrySet:
    ContactHalfSpace floor: socket_frame=/ground orientation=(0 0 -1.570796)
    ContactSphere heel_r: socket_frame=/bodyset/calcn_r location=(0.0146421 -0.01 -0.0122799) radius=0.035
    ContactSphere lateralRearfoot_r: socket_frame=/bodyset/calcn_r location=(0.0849291 -0.01 0.0338649) radius=0.035
    ContactSphere lateralMidfoot_r: socket_frame=/bodyset/calcn_r location=(0.153362 -0.01 0.0594829) radius=0.035
    ContactSphere lateralToe_r: socket_frame=/bodyset/toes_r location=(0.023014 -0.01 0.0670461) radius=0.035
    ContactSphere medialToe_r: socket_frame=/bodyset/toes_r location=(0.074363 -0.01 -0.026039) radius=0.035
    ContactSphere medialMidfoot_r: socket_frame=/bodyset/calcn_r location=(0.203637 -0.01 -0.0398688) radius=0.035
    ContactSphere heel_l: socket_frame=/bodyset/calcn_l location=(0.0146421 -0.01 0.0122799) radius=0.035
    ContactSphere lateralRearfoot_l: socket_frame=/bodyset/calcn_l location=(0.0849291 -0.01 -0.0338649) radius=0.035
    ContactSphere lateralMidfoot_l: socket_frame=/bodyset/calcn_l location=(0.153362 -0.01 -0.0594829) radius=0.035
    ContactSphere lateralToe_l: socket_frame=/bodyset/toes_l location=(0.023014 -0.01 -0.0670461) radius=0.035
    ContactSphere medialToe_l: socket_frame=/bodyset/toes_l location=(0.074363 -0.01 0.026039) radius=0.035
    ContactSphere medialMidfoot_l: socket_frame=/bodyset/calcn_l location=(0.203637 -0.01 0.0398688) radius=0.035
