# OpenSim document version 20302
ScaleTool sub03:
  mass: 58
  height: 178
  GenericModelMaker:
    model_file: /home/lisca/biomec/src/data2opensim/vicon/../vicon/model/vicon2opensim2moco.osim
    marker_set_file: /home/lisca/biomec/src/data2opensim/vicon/../vicon/model/vicon2opensim2moco_MarkerSetFile.xml
  ModelScaler:
    apply: true
    scaling_order: measurements
    marker_file: /home/lisca/biomec/data/20250306_dataset/sub03/ses20250306/sub03_strist_cond00000_speed00000_0003_trc.trc
    time_range: 0.001 0.01
    preserve_mass_distribution: true
    output_scale_file: sub03_ScaleSet_Applied.xml
    MeasurementSet: file=/home/lisca/biomec/src/data2opensim/vicon/../vicon/model/vicon2opensim2moco_Scale_MeasurementSet.xml
  MarkerPlacer:
    marker_file: /home/lisca/biomec/data/20250306_dataset/sub03/ses20250306/sub03_strist_cond00000_speed00000_0003_trc.trc
    time_range: 0.001 0.01
    output_model_file: sub03_SCALED.osim
    output_motion_file: sub03_static_output.sto
    max_marker_movement: -1
    IKTaskSet: file=/home/lisca/biomec/src/data2opensim/vicon/../vicon/model/vicon2opensim2moco_Scale_Tasks.xml
