# OpenSim document version 40000
InverseKinematicsTool sub03_strifc_cond00000_speed02000_0001_0003_trc_segment_0:
  model_file: ../Models/match_markers_but_ignore_physics.osim
  marker_file: ../MarkerData/sub03_strifc_cond00000_speed02000_0001_0003_trc_segment_0.trc
  output_motion_file: sub03_strifc_cond00000_speed02000_0001_0003_trc_segment_0_ik_by_opensim.mot
  accuracy: 1e-5
  report_errors: true
  IKTaskSet IK_tasks:
    IKMarkerTask C7: weight=1 apply=true
    IKMarkerTask LANK: weight=1 apply=true
    IKMarkerTask LASI: weight=1 apply=true
    IKMarkerTask LBiceps: weight=1 apply=true
    IKMarkerTask LClavicle: weight=1 apply=true
    IKMarkerTask LD1M: weight=1 apply=true
    IKMarkerTask LElbow: weight=1 apply=true
    IKMarkerTask LForearm: weight=1 apply=true
    IKMarkerTask LHEE: weight=1 apply=true
    IKMarkerTask LKNE: weight=1 apply=true
    IKMarkerTask LLCA: weight=1 apply=true
    IKMarkerTask LMAnkle: weight=1 apply=true
    IKMarkerTask LMElbow: weight=1 apply=true
    IKMarkerTask LMT5: weight=1 apply=true
    IKMarkerTask LPSI: weight=1 apply=true
    IKMarkerTask LSH1: weight=1 apply=true
    IKMarkerTask LSH2: weight=1 apply=true
    IKMarkerTask LSH3: weight=1 apply=true
    IKMarkerTask LSTL: weight=1 apply=true
    IKMarkerTask LShoulder: weight=1 apply=true
    IKMarkerTask LTH1: weight=1 apply=true
    IKMarkerTask LTH2: weight=1 apply=true
    IKMarkerTask LTH3: weight=1 apply=true
    IKMarkerTask LTHI: weight=1 apply=true
    IKMarkerTask LTIB: weight=1 apply=true
    IKMarkerTask LTOE: weight=1 apply=true
    IKMarkerTask LWrist: weight=1 apply=true
    IKMarkerTask Pelvis_LeftThigh_score: weight=1 apply=true
    IKMarkerTask Pelvis_RightThigh_score: weight=1 apply=true
    IKMarkerTask RANK: weight=1 apply=true
    IKMarkerTask RASI: weight=1 apply=true
    IKMarkerTask RBiceps: weight=1 apply=true
    IKMarkerTask RD1M: weight=1 apply=true
    IKMarkerTask RElbow: weight=1 apply=true
    IKMarkerTask RForearm: weight=1 apply=true
    IKMarkerTask RHEE: weight=1 apply=true
    IKMarkerTask RKNE: weight=1 apply=true
    IKMarkerTask RLCA: weight=1 apply=true
    IKMarkerTask RMAnkle: weight=1 apply=true
    IKMarkerTask RMElbow: weight=1 apply=true
    IKMarkerTask RMT5: weight=1 apply=true
    IKMarkerTask RPSI: weight=1 apply=true
    IKMarkerTask RSH1: weight=1 apply=true
    IKMarkerTask RSH2: weight=1 apply=true
    IKMarkerTask RSTL: weight=1 apply=true
    IKMarkerTask RShoulder: weight=1 apply=true
    IKMarkerTask RTH1: weight=1 apply=true
    IKMarkerTask RTH2: weight=1 apply=true
    IKMarkerTask RTH3: weight=1 apply=true
    IKMarkerTask RTHI: weight=1 apply=true
    IKMarkerTask RTIB: weight=1 apply=true
    IKMarkerTask RTOE: weight=1 apply=true
    IKMarkerTask RWrist: weight=1 apply=true
