# OpenSim document version 40600
MocoStudy muscle_driven_state_tracking:
  MocoProblem problem:
    MocoPhase phases:
      ModelProcessor model:
        model: Model optimized_scale_and_markers:
          gravity: 0 -9.80665 0
          length_units: meters
          force_units: N
          credits:
            Rajagopal et al. (2016), Lai et al. (2017), Uhlrich et al. (2022). Notes: P. van den Bos changed the fiber-damping from 0.01 to default of 0.1 as suggested in M. Millard (2013) "Flexing Computational Muscle: Modeling and Simulation of Musculotendon Dynamics".
          publications:
            [1] Rajagopal, A., Dembia, C.L., DeMers, M.S., Delp, D.D., Hicks, J.L., Delp, S.L. (2016) Full-body musculoskeletal model for muscle-driven simulation of human gait. IEEE Transactions on Biomedical Engineering. [2] Lai, A.K.M., Arnold, A.S., Wakeling, J.M. (2017) Why are antagonist muscles co-activated in my simulation? A musculoskeletal model for analysing human locomotor tasks. Annals of Biomedical Engineering. [3] Uhlrich, S.D., Jackson, R.W., Seth, A., Kolesar, J.A., Delp, S.L. (2022) Muscle coordination retraining inspired by musculoskeletal simulations reduces knee contact force. Scientific Reports.
          Ground
          BodySet:
            Body pelvis: mass=16.09487 [kg] mass_center=(-0.1020197 0 0) inertia=(0.1732856 0.1732856 0.1399429 0 0 0)
                meshes=(r_pelvis.vtp l_pelvis.vtp sacrum.vtp)
              WrapCylinder Gmax1_at_pelvis_r: xyz_body_rotation=(-0.6 0.45 0)
                  translation=(-0.1111105 -0.1213362 0.06171747) quadrant=-x radius=0.05071455 length=0.1732092
              WrapCylinder Gmax2_at_pelvis_r: xyz_body_rotation=(-0.75 0.39 0)
                  translation=(-0.1154395 -0.1017263 0.0687998) quadrant=all radius=0.05046581 length=0.1165581
              WrapCylinder Gmax3_at_pelvis_r: xyz_body_rotation=(-0.1 0 0)
                  translation=(-0.1197685 -0.1078544 0.0687998) quadrant=all radius=0.05326612 length=0.1014169
              WrapCylinder Gmax1_at_pelvis_l: xyz_body_rotation=(0.6 -0.45 0)
                  translation=(-0.1111105 -0.1213362 -0.06171747) quadrant=-x radius=0.05071455 length=0.1732092
              WrapCylinder Gmax2_at_pelvis_l: xyz_body_rotation=(0.75 -0.39 0)
                  translation=(-0.1154395 -0.1017263 -0.0687998) quadrant=all radius=0.05046581 length=0.1165581
              WrapCylinder Gmax3_at_pelvis_l: xyz_body_rotation=(0.1 0 0)
                  translation=(-0.1197685 -0.1078544 -0.0687998) quadrant=all radius=0.05326612 length=0.1014169
              WrapCylinder PS_at_brim_r: xyz_body_rotation=(-0.25 -0.27 0.1)
                  translation=(-0.1067816 -0.07353707 0.06637157) quadrant=-y radius=0.06563965 length=0.1057288
              WrapCylinder PS_at_brim_l: xyz_body_rotation=(0.25 0.27 0.1)
                  translation=(-0.1067816 -0.07353707 -0.06637157) quadrant=-y radius=0.06563965 length=0.1057288
              WrapCylinder IL_at_brim_r: xyz_body_rotation=(-0.32 -0.24 0.9)
                  translation=(-0.1024526 -0.07966515 0.07648919) quadrant=-y radius=0.07216133 length=0.1059319
              WrapCylinder IL_at_brim_l: xyz_body_rotation=(0.32 0.24 0.9)
                  translation=(-0.1024526 -0.07966515 -0.07648919) quadrant=-y radius=0.07216133 length=0.1059319
            Body femur_r: mass=6.825197 mass_center=(0 -0.1679965 0) inertia=(0.09396692 0.02118385 0.09396692 0 0 0)
                meshes=r_femur.vtp
              WrapCylinder GasLat_at_condyles_r: translation=(0.004882675 -0.405168 0) quadrant=all radius=0.02554163
                  length=0.08422539
              WrapCylinder GasMed_at_condyles_r: translation=(0.004882675 -0.405168 0) quadrant=all radius=0.02455926
                  length=0.08422539
              WrapCylinder KnExt_at_fem_r: xyz_body_rotation=(-0.0623366 0.0507601 0)
                  translation=(0.003504081 -0.3979857 0.001761246) quadrant=all radius=0.02454825 length=0.08431992
              WrapCylinder KnExtVL_at_fem_r: xyz_body_rotation=(-0.0623366 0.0507601 0)
                  translation=(0.001843972 -0.3979857 0.001761246) quadrant=all radius=0.02454825 length=0.08431992
              WrapCylinder AB_at_femshaft_r: xyz_body_rotation=(1.66157 0.186644 0)
                  translation=(0.01429979 -0.111268 0.01967926) quadrant=all radius=0.01500905 length=0.06906829
              WrapCylinder AL_at_femshaft_r: xyz_body_rotation=(1.77711 0.136489 0)
                  translation=(0.03001156 -0.2291759 0.01272957) quadrant=all radius=0.01833339 length=0.09821603
              WrapCylinder AMprox_at_femshaft_r: xyz_body_rotation=(1.61126 0.18656 0)
                  translation=(0.005061372 -0.07203571 0.02139578) quadrant=all radius=0.01918302 length=0.06913131
              WrapCylinder AMmid_at_femshaft_r: xyz_body_rotation=(1.61139 0.13656 0)
                  translation=(0.02247251 -0.158817 0.01733712) quadrant=all radius=0.01945394 length=0.1185324
              WrapCylinder AMdist_at_femshaft_r: xyz_body_rotation=(1.71188 0.186636 0)
                  translation=(0.03086486 -0.2576631 0.007887371) quadrant=all radius=0.01984891 length=0.1970218
              WrapCylinder AMisch_at_condyles_r: xyz_body_rotation=(1.71115 -0.463363 0)
                  translation=(-0.02211959 -0.3723899 -0.002656781) quadrant=all radius=0.03644717 length=0.2360808
              WrapCylinder PECT_at_femshaft_r: xyz_body_rotation=(1.81295 0.276344 0)
                  translation=(0.005942929 -0.083507 0.02563863) quadrant=all radius=0.01370052 length=0.04899013
            Body tibia_r: mass=3.353184 mass_center=(0 -0.1883533 0) inertia=(0.04633721 0.004580458 0.04633721 0 0 0)
                meshes=(r_tibia.vtp r_fibula.vtp)
              WrapCylinder GasLat_at_shank_r: xyz_body_rotation=(2.96723 -0.279725 -1.47812)
                  translation=(-0.007755385 -0.07465532 -0.003126834) quadrant=-y radius=0.0563163 length=0.09572928
              WrapCylinder GasMed_at_shank_r: xyz_body_rotation=(2.96723 0.0279725 -1.47812)
                  translation=(-0.007755385 -0.07465532 -0.003126834) quadrant=-y radius=0.06062266 length=0.09495124
              WrapCylinder GR_at_condyles_r: xyz_body_rotation=(0 -0.4 0) translation=(-0.003144075 -0.02017711 0)
                  quadrant=all radius=0.03676022 length=0.09634196
              WrapCylinder SM_at_condyles_r: xyz_body_rotation=(0 -0.1 0) translation=(-0.001048025 -0.02017711 0)
                  quadrant=all radius=0.03546426 length=0.0948578
              WrapCylinder ST_at_condyles_r: xyz_body_rotation=(0 -0.2 0) translation=(-0.00209605 -0.02068154 0)
                  quadrant=all radius=0.0436277 length=0.09516871
              WrapCylinder BF_at_gastroc_r: translation=(-0.04087297 -0.06053134 0) quadrant=y radius=0.02982438
                  length=0.1421288
            Body patella_r: mass=0.07782013 mass_center=(0.0018 0.0264 0)
                inertia=(2.590995e-6 1.183552e-5 1.183552e-5 0 0 0) meshes=r_patella.vtp
            Body talus_r: mass=0.1414652 mass_center=(0 0 0) inertia=(0.00235061 0.00194928 0.00235061 0 0 0)
                meshes=r_talus.vtp
            Body calcn_r: mass=0.8907722 mass_center=(0.1495398 0.03012104 0)
                inertia=(0.0008678649 0.005533349 0.005533349 0 0 0) meshes=r_foot.vtp
            Body toes_r: mass=0.1757739 mass_center=(0.02764919 0.006835946 -0.01569759)
                inertia=(8.29351e-5 0.0001191995 0.0001191995 0 0 0) meshes=r_bofoot.vtp
            Body femur_l: mass=10.34539 mass_center=(0 -0.1706958 0) inertia=(0.1544212 0.04790113 0.1544212 0 0 0)
                meshes=l_femur.vtp
              WrapCylinder GasLat_at_condyles_l: translation=(0.005181902 -0.4116781 0) quadrant=all radius=0.02652892
                  length=0.1183916
              WrapCylinder GasMed_at_condyles_l: translation=(0.005181902 -0.4116781 0) quadrant=all radius=0.02550857
                  length=0.1183916
              WrapCylinder KnExt_at_fem_l: xyz_body_rotation=(0.0623366 -0.0507601 0)
                  translation=(0.003718823 -0.4043803 -0.002475698) quadrant=all radius=0.02552396 length=0.1182976
              WrapCylinder KnExtVL_at_fem_l: xyz_body_rotation=(0.0623366 -0.0507601 0)
                  translation=(0.001956977 -0.4043803 -0.002475698) quadrant=all radius=0.02552396 length=0.1182976
              WrapCylinder AB_at_femshaft_l: xyz_body_rotation=(-1.66157 -0.186644 0)
                  translation=(0.01517613 -0.1130558 -0.02766219) quadrant=all radius=0.01831198 length=0.07048341
              WrapCylinder AL_at_femshaft_l: xyz_body_rotation=(-1.77711 -0.136489 0)
                  translation=(0.03185077 -0.2328582 -0.01789335) quadrant=all radius=0.02225874 length=0.101327
              WrapCylinder AMprox_at_femshaft_l: xyz_body_rotation=(-1.61126 -0.18656 0)
                  translation=(0.00537155 -0.07319315 -0.03007501) quadrant=all radius=0.02342775 length=0.07039057
              WrapCylinder AMmid_at_femshaft_l: xyz_body_rotation=(-1.61139 -0.13656 0)
                  translation=(0.02384971 -0.1613688 -0.02436996) quadrant=all radius=0.02376583 length=0.1206065
              WrapCylinder AMdist_at_femshaft_l: xyz_body_rotation=(-1.71188 -0.186636 0)
                  translation=(0.03275636 -0.2618032 -0.0110869) quadrant=all radius=0.02417473 length=0.2018452
              WrapCylinder AMisch_at_condyles_l: xyz_body_rotation=(-1.71115 0.463363 0)
                  translation=(-0.02347516 -0.3783733 0.003734509) quadrant=all radius=0.04427133 length=0.2433575
              WrapCylinder PECT_at_femshaft_l: xyz_body_rotation=(-1.81295 -0.276344 0)
                  translation=(0.006307132 -0.08484876 -0.03603899) quadrant=all radius=0.01658476 length=0.05087907
            Body tibia_l: mass=3.563577 mass_center=(0 -0.1853541 0) inertia=(0.04796028 0.005256994 0.04796028 0 0 0)
                meshes=(l_tibia.vtp l_fibula.vtp)
              WrapCylinder GasLat_at_shank_l: xyz_body_rotation=(-2.96723 0.279725 -1.47812)
                  translation=(-0.007404112 -0.07346655 0.003536999) quadrant=-y radius=0.05503427 length=0.106443
              WrapCylinder GasMed_at_shank_l: xyz_body_rotation=(-2.96723 -0.0279725 -1.47812)
                  translation=(-0.007404112 -0.07346655 0.003536999) quadrant=-y radius=0.05887808 length=0.106947
              WrapCylinder GR_at_condyles_l: xyz_body_rotation=(0 0.4 0) translation=(-0.003001667 -0.01985583 0)
                  quadrant=all radius=0.03608064 length=0.1061333
              WrapCylinder SM_at_condyles_l: xyz_body_rotation=(0 0.1 0) translation=(-0.001000556 -0.01985583 0)
                  quadrant=all radius=0.03439785 length=0.1071132
              WrapCylinder ST_at_condyles_l: xyz_body_rotation=(0 0.2 0) translation=(-0.002001111 -0.02035222 0)
                  quadrant=all radius=0.04242039 length=0.10691
              WrapCylinder BF_at_gastroc_l: translation=(-0.03902167 -0.05956748 0) quadrant=all radius=0.02890347
                  length=0.1607727
            Body patella_l: mass=0.07782013 mass_center=(0.0018 0.0264 0)
                inertia=(2.590995e-6 1.183552e-5 1.183552e-5 0 0 0) meshes=l_patella.vtp
            Body talus_l: mass=0.1656123 mass_center=(0 0 0) inertia=(0.002818255 0.002897229 0.002818255 0 0 0)
                meshes=l_talus.vtp
            Body calcn_l: mass=0.9612778 mass_center=(0.1444385 0.03301861 0)
                inertia=(0.001046382 0.005657181 0.005657181 0 0 0) meshes=l_foot.vtp
            Body toes_l: mass=0.1965966 mass_center=(0.02789549 0.007406655 0.01606125)
                inertia=(0.0001028323 0.0001399124 0.0001399124 0 0 0) meshes=l_bofoot.vtp
            Body torso: mass=29.29225 mass_center=(-0.02960145 0.3261952 0) inertia=(1.733774 0.9788057 1.733774 0 0 0)
                meshes=(hat_spine.vtp hat_jaw.vtp hat_skull.vtp hat_ribs_scap.vtp)
            Body humerus_r: mass=2.174657 mass_center=(0 -0.1397928 0)
                inertia=(0.01059199 0.005907765 0.01059199 0 0 0) meshes=humerus_rv.vtp
            Body ulna_r: mass=0.6293473 mass_center=(0 -0.1302494 0)
                inertia=(0.003660125 0.0009006383 0.003660125 0 0 0) meshes=ulna_rv.vtp
            Body radius_r: mass=0.5537197 mass_center=(0 -0.112517 0)
                inertia=(0.002511008 0.0008070629 0.002511008 0 0 0) meshes=radius_rv.vtp
            Body hand_r: mass=0.5002431 mass_center=(0 -0.06899959 0)
                inertia=(0.001167936 0.0009471276 0.001167936 0 0 0)
                meshes=(pisiform_rvs.vtp lunate_rvs.vtp scaphoid_rvs.vtp triquetrum_rvs.vtp hamate_rvs.vtp capitate_rvs.vtp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)
            Body humerus_l: mass=1.951347 mass_center=(0 -0.1337807 0)
                inertia=(0.008762195 0.004970525 0.008762195 0 0 0) meshes=humerus_lv.vtp
            Body ulna_l: mass=0.6724995 mass_center=(0 -0.1264325 0)
                inertia=(0.003761527 0.001059426 0.003761527 0 0 0) meshes=ulna_lv.vtp
            Body radius_l: mass=0.6323472 mass_center=(0 -0.1130773 0)
                inertia=(0.002954429 0.001047324 0.002954429 0 0 0) meshes=radius_lv.vtp
            Body hand_l: mass=0.5002431 mass_center=(0 -0.06899959 0)
                inertia=(0.001167936 0.0009471276 0.001167936 0 0 0)
                meshes=(pisiform_lvs.vtp lunate_lvs.vtp scaphoid_lvs.vtp triquetrum_lvs.vtp hamate_lvs.vtp capitate_lvs.vtp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)
          JointSet:
            CustomJoint ground_pelvis: socket_parent_frame=ground_offset socket_child_frame=pelvis_offset
              Coordinate pelvis_tilt: default_value=0 range=(-3.141593 3.141593) clamped=true
              Coordinate pelvis_list: default_value=0 range=(-3.141593 3.141593) clamped=true
              Coordinate pelvis_rotation: default_value=0 range=(-3.141593 3.141593) clamped=true
              Coordinate pelvis_tx: default_value=0 range=(-5 5) clamped=true
              Coordinate pelvis_ty: default_value=0.94 range=(-1 2) clamped=true
              Coordinate pelvis_tz: default_value=0 range=(-3 3) clamped=true
              PhysicalOffsetFrame ground_offset: socket_parent=/ground translation=(0 0 0) [meters]
              PhysicalOffsetFrame pelvis_offset: socket_parent=/bodyset/pelvis translation=(0 0 0)
              SpatialTransform:
                TransformAxis rotation1: coordinates=pelvis_tilt axis=(0 0 1) LinearFunction(coefficients=1 0)
                TransformAxis rotation2: coordinates=pelvis_list axis=(1 0 0) LinearFunction(coefficients=1 0)
                TransformAxis rotation3: coordinates=pelvis_rotation axis=(0 1 0) LinearFunction(coefficients=1 0)
                TransformAxis translation1: coordinates=pelvis_tx axis=(1 0 0) LinearFunction(coefficients=1 0)
                TransformAxis translation2: coordinates=pelvis_ty axis=(0 1 0) LinearFunction(coefficients=1 0)
                TransformAxis translation3: coordinates=pelvis_tz axis=(0 0 1) LinearFunction(coefficients=1 0)
            CustomJoint hip_r: socket_parent_frame=pelvis_offset socket_child_frame=femur_r_offset
              Coordinate hip_flexion_r: default_value=7.262396e-9 range=(-0.5235988 2.094395) clamped=true
              Coordinate hip_adduction_r: default_value=-6.248872e-9 range=(-0.8726646 0.5235988) clamped=true
              Coordinate hip_rotation_r: default_value=0 range=(-0.6981317 0.6981317) clamped=true
              PhysicalOffsetFrame pelvis_offset: socket_parent=/bodyset/pelvis
                  translation=(-0.08120593 -0.09619874 0.07816872)
              PhysicalOffsetFrame femur_r_offset: socket_parent=/bodyset/femur_r translation=(0 0 0)
              SpatialTransform: axes_held_at_zero=(translation1 translation2 translation3)
                TransformAxis rotation1: coordinates=hip_flexion_r axis=(0 0 1) LinearFunction(coefficients=1 0)
                TransformAxis rotation2: coordinates=hip_adduction_r axis=(1 0 0) LinearFunction(coefficients=1 0)
                TransformAxis rotation3: coordinates=hip_rotation_r axis=(0 1 0) LinearFunction(coefficients=1 0)
            CustomJoint walker_knee_r: socket_parent_frame=femur_r_offset socket_child_frame=tibia_r_offset
              Coordinate knee_angle_r: default_value=0.0001098396 range=(0 2.443461) clamped=true
              PhysicalOffsetFrame femur_r_offset: socket_parent=/bodyset/femur_r
                  translation=(-0.004404904 -0.4047986 -0.001471733) orientation=(-1.64157 1.44618 1.5708) [radians]
              PhysicalOffsetFrame tibia_r_offset: socket_parent=/bodyset/tibia_r
                  translation=(-0.00847804 -0.003566103 -0.001406829) orientation=(-1.64157 1.44618 1.5708)
              SpatialTransform:
                TransformAxis rotation1: coordinates=knee_angle_r axis=(1 0 0) LinearFunction(coefficients=1 0)
                TransformAxis rotation2: coordinates=knee_angle_r axis=(0 0 1)
                  PolynomialFunction: coefficients=(0.01083209 -0.02521833 -0.03284781 0.07910001 -1.47e-8)
                TransformAxis rotation3: coordinates=knee_angle_r axis=(0 1 0)
                  PolynomialFunction: coefficients=(0.02516576 -0.1694801 0.3694993 -4.43e-8)
                TransformAxis translation1: coordinates=knee_angle_r axis=(1 0 0)
                  MultiplierFunction: scale=0.9765351
                    PolynomialFunction: coefficients=(0.0001590448 -0.00101515 0.001817511 2.64143e-5 -2.9e-9)
                TransformAxis translation2: coordinates=knee_angle_r axis=(0 1 0)
                  MultiplierFunction: scale=0.9882146
                    PolynomialFunction: coefficients=(-0.0005796878 0.005079766 -0.01144238 0.003936909 -4.323e-7)
                TransformAxis translation3: coordinates=knee_angle_r axis=(0 0 1)
                  MultiplierFunction: scale=0.8422539
                    PolynomialFunction: coefficients=(0.001208087 -0.004453611 0.0006116494 0.00626543 -6.882e-7)
            CustomJoint patellofemoral_r: socket_parent_frame=femur_r_offset socket_child_frame=patella_r_offset
              Coordinate knee_angle_r_beta: default_value=0.0001098396 range=(-99999.9 99999.9) clamped=false
              PhysicalOffsetFrame femur_r_offset: socket_parent=/bodyset/femur_r
                  translation=(-0.007900169 -0.403152 -0.002316198)
              PhysicalOffsetFrame patella_r_offset: socket_parent=/bodyset/patella_r translation=(0 0 0)
              SpatialTransform: axes_held_at_zero=(rotation2 rotation3)
                TransformAxis rotation1: coordinates=knee_angle_r_beta axis=(0 0 1)
                  SimmSpline: x=(0 0.174533 0.349066 0.523599 0.698132 0.872665 1.0472 1.22173 1.39626 1.5708 1.74533 1.91986 2.0944)
                      y=(0.00113686 -0.00629212 -0.105582 -0.253683 -0.414245 -0.579047 -0.747244 -0.91799 -1.09044 -1.26379 -1.43763 -1.61186 -1.78634)
                TransformAxis translation1: coordinates=knee_angle_r_beta axis=(1 0 0)
                  MultiplierFunction: scale=0.9765351
                    SimmSpline: x=(0 0.174533 0.349066 0.523599 0.698132 0.872665 1.0472 1.22173 1.39626 1.5708 1.74533 1.91986 2.0944)
                        y=(0.0524 0.0488 0.0437 0.0371 0.0296 0.0216 0.0136 0.0057 -0.0019 -0.0088 -0.0148 -0.0196 -0.0227)
                TransformAxis translation2: coordinates=knee_angle_r_beta axis=(0 1 0)
                  MultiplierFunction: scale=0.9882146
                    SimmSpline: x=(0 0.174533 0.349066 0.523599 0.698132 0.872665 1.0472 1.22173 1.39626 1.5708 1.74533 1.91986 2.0944)
                        y=(-0.0108 -0.019 -0.0263 -0.0322 -0.0367 -0.0395 -0.0408 -0.0404 -0.0384 -0.0349 -0.0301 -0.0245 -0.0187)
                TransformAxis translation3: axis=(0 0 1) MultiplierFunction(scale=0.8422539, Constant(value=0.00275))
            PinJoint ankle_r: socket_parent_frame=tibia_r_offset socket_child_frame=talus_r_offset
              Coordinate ankle_angle_r: default_value=0 range=(-0.8726646 0.8726646) clamped=true
              PhysicalOffsetFrame tibia_r_offset: socket_parent=/bodyset/tibia_r translation=(-0.01048025 -0.4035422 0)
                  orientation=(0.175895 -0.105208 0.0186622)
              PhysicalOffsetFrame talus_r_offset: socket_parent=/bodyset/talus_r translation=(0 0 0)
                  orientation=(0.175895 -0.105208 0.0186622)
            PinJoint subtalar_r: socket_parent_frame=talus_r_offset socket_child_frame=calcn_r_offset
              Coordinate subtalar_angle_r: default_value=1.851175e-13 range=(-0.6108652 0.6108652) clamped=true
              PhysicalOffsetFrame talus_r_offset: socket_parent=/bodyset/talus_r
                  translation=(-0.05245144 -0.06124096 0.00931565) orientation=(-1.76819 0.906223 1.8196)
              PhysicalOffsetFrame calcn_r_offset: socket_parent=/bodyset/calcn_r translation=(0 0 0)
                  orientation=(-1.76819 0.906223 1.8196)
            PinJoint mtp_r: socket_parent_frame=calcn_r_offset socket_child_frame=toes_r_offset
              Coordinate mtp_angle_r: default_value=0 range=(-0.5235988 0.5235988) clamped=true
              PhysicalOffsetFrame calcn_r_offset: socket_parent=/bodyset/calcn_r
                  translation=(0.2673772 -0.002008069 0.0009357127)
              PhysicalOffsetFrame toes_r_offset: socket_parent=/bodyset/toes_r translation=(0 0 0)
            CustomJoint hip_l: socket_parent_frame=pelvis_offset socket_child_frame=femur_l_offset
              Coordinate hip_flexion_l: default_value=7.262396e-9 range=(-0.5235988 2.094395) clamped=true
              Coordinate hip_adduction_l: default_value=-6.248872e-9 range=(-0.8726646 0.5235988) clamped=true
              Coordinate hip_rotation_l: default_value=0 range=(-0.6981317 0.6981317) clamped=true
              PhysicalOffsetFrame pelvis_offset: socket_parent=/bodyset/pelvis
                  translation=(-0.08120593 -0.09619874 -0.07816872)
              PhysicalOffsetFrame femur_l_offset: socket_parent=/bodyset/femur_l translation=(0 0 0)
              SpatialTransform: axes_held_at_zero=(translation1 translation2 translation3)
                TransformAxis rotation1: coordinates=hip_flexion_l axis=(0 0 1) LinearFunction(coefficients=1 0)
                TransformAxis rotation2: coordinates=hip_adduction_l axis=(1 0 0) LinearFunction(coefficients=-1 0)
                TransformAxis rotation3: coordinates=hip_rotation_l axis=(0 1 0) LinearFunction(coefficients=-1 0)
            CustomJoint walker_knee_l: socket_parent_frame=femur_l_offset socket_child_frame=tibia_l_offset
              Coordinate knee_angle_l: default_value=8.473224e-5 range=(0 2.443461) clamped=true
              PhysicalOffsetFrame femur_l_offset: socket_parent=/bodyset/femur_l
                  translation=(-0.004675001 -0.4113028 0.002068734) orientation=(1.64157 -1.44618 1.5708)
              PhysicalOffsetFrame tibia_l_offset: socket_parent=/bodyset/tibia_l
                  translation=(-0.008094036 -0.003509319 0.001591371) orientation=(1.64157 -1.44618 1.5708)
              SpatialTransform:
                TransformAxis rotation1: coordinates=knee_angle_l axis=(-1 0 0) LinearFunction(coefficients=1 0)
                TransformAxis rotation2: coordinates=knee_angle_l axis=(0 0 1)
                  PolynomialFunction: coefficients=(0.01083209 -0.02521833 -0.03284781 0.07910001 -1.47e-8)
                TransformAxis rotation3: coordinates=knee_angle_l axis=(0 1 0)
                  PolynomialFunction: coefficients=(-0.02516576 0.1694801 -0.3694993 4.43e-8)
                TransformAxis translation1: coordinates=knee_angle_l axis=(1 0 0)
                  MultiplierFunction: scale=1.03638
                    PolynomialFunction: coefficients=(0.0001590448 -0.00101515 0.001817511 2.64143e-5 -2.3e-9)
                TransformAxis translation2: coordinates=knee_angle_l axis=(0 1 0)
                  MultiplierFunction: scale=1.004093
                    PolynomialFunction: coefficients=(-0.0005796878 0.005079766 -0.01144238 0.003936909 -3.335e-7)
                TransformAxis translation3: coordinates=knee_angle_l axis=(0 0 1)
                  MultiplierFunction: scale=1.183916
                    PolynomialFunction: coefficients=(-0.001208087 0.004453611 -0.0006116494 -0.00626543 5.309e-7)
            CustomJoint patellofemoral_l: socket_parent_frame=femur_l_offset socket_child_frame=patella_l_offset
              Coordinate knee_angle_l_beta: default_value=8.473224e-5 range=(-99999.9 99999.9) clamped=false
              PhysicalOffsetFrame femur_l_offset: socket_parent=/bodyset/femur_l
                  translation=(-0.008384318 -0.4096297 0.003255768)
              PhysicalOffsetFrame patella_l_offset: socket_parent=/bodyset/patella_l translation=(0 0 0)
              SpatialTransform: axes_held_at_zero=(rotation2 rotation3)
                TransformAxis rotation1: coordinates=knee_angle_l_beta axis=(0 0 1)
                  SimmSpline: x=(0 0.174533 0.349066 0.523599 0.698132 0.872665 1.0472 1.22173 1.39626 1.5708 1.74533 1.91986 2.0944)
                      y=(0.00113686 -0.00629212 -0.105582 -0.253683 -0.414245 -0.579047 -0.747244 -0.91799 -1.09044 -1.26379 -1.43763 -1.61186 -1.78634)
                TransformAxis translation1: coordinates=knee_angle_l_beta axis=(1 0 0)
                  MultiplierFunction: scale=1.03638
                    SimmSpline: x=(0 0.174533 0.349066 0.523599 0.698132 0.872665 1.0472 1.22173 1.39626 1.5708 1.74533 1.91986 2.0944)
                        y=(0.0524 0.0488 0.0437 0.0371 0.0296 0.0216 0.0136 0.0057 -0.0019 -0.0088 -0.0148 -0.0196 -0.0227)
                TransformAxis translation2: coordinates=knee_angle_l_beta axis=(0 1 0)
                  MultiplierFunction: scale=1.004093
                    SimmSpline: x=(0 0.174533 0.349066 0.523599 0.698132 0.872665 1.0472 1.22173 1.39626 1.5708 1.74533 1.91986 2.0944)
                        y=(-0.0108 -0.019 -0.0263 -0.0322 -0.0367 -0.0395 -0.0408 -0.0404 -0.0384 -0.0349 -0.0301 -0.0245 -0.0187)
                TransformAxis translation3: axis=(0 0 1) MultiplierFunction(scale=1.183916, Constant(value=-0.00275))
            PinJoint ankle_l: socket_parent_frame=tibia_l_offset socket_child_frame=talus_l_offset
              Coordinate ankle_angle_l: default_value=0 range=(-0.8726646 0.8726646) clamped=true
              PhysicalOffsetFrame tibia_l_offset: socket_parent=/bodyset/tibia_l translation=(-0.01000556 -0.3971165 0)
                  orientation=(-0.175895 0.105208 0.0186622)
              PhysicalOffsetFrame talus_l_offset: socket_parent=/bodyset/talus_l translation=(0 0 0)
                  orientation=(-0.175895 0.105208 0.0186622)
            PinJoint subtalar_l: socket_parent_frame=talus_l_offset socket_child_frame=calcn_l_offset
              Coordinate subtalar_angle_l: default_value=0 range=(-0.6108652 0.6108652) clamped=true
              PhysicalOffsetFrame talus_l_offset: socket_parent=/bodyset/talus_l
                  translation=(-0.06207084 -0.05647018 -0.009994215) orientation=(1.76819 -0.906223 1.8196)
              PhysicalOffsetFrame calcn_l_offset: socket_parent=/bodyset/calcn_l translation=(0 0 0)
                  orientation=(1.76819 -0.906223 1.8196)
            PinJoint mtp_l: socket_parent_frame=calcn_l_offset socket_child_frame=toes_l_offset
              Coordinate mtp_angle_l: default_value=0 range=(-0.5235988 0.5235988) clamped=true
              PhysicalOffsetFrame calcn_l_offset: socket_parent=/bodyset/calcn_l
                  translation=(0.2582561 -0.002201241 -0.0009536955)
              PhysicalOffsetFrame toes_l_offset: socket_parent=/bodyset/toes_l translation=(0 0 0)
            CustomJoint back: socket_parent_frame=pelvis_offset socket_child_frame=torso_offset
              Coordinate lumbar_extension: default_value=0 range=(-1.570796 1.570796) clamped=true
              Coordinate lumbar_bending: default_value=0 range=(-1.570796 1.570796) clamped=true
              Coordinate lumbar_rotation: default_value=0 range=(-1.570796 1.570796) clamped=true
              PhysicalOffsetFrame pelvis_offset: socket_parent=/bodyset/pelvis translation=(-0.1453095 0.09988785 0)
              PhysicalOffsetFrame torso_offset: socket_parent=/bodyset/torso translation=(0 0 0)
              SpatialTransform: axes_held_at_zero=(translation1 translation2 translation3)
                TransformAxis rotation1: coordinates=lumbar_extension axis=(0 0 1) LinearFunction(coefficients=1 0)
                TransformAxis rotation2: coordinates=lumbar_bending axis=(1 0 0) LinearFunction(coefficients=1 0)
                TransformAxis rotation3: coordinates=lumbar_rotation axis=(0 1 0) LinearFunction(coefficients=1 0)
            CustomJoint acromial_r: socket_parent_frame=torso_offset socket_child_frame=humerus_r_offset
              Coordinate arm_flex_r: default_value=0 range=(-1.570796 1.570796) clamped=true
              Coordinate arm_add_r: default_value=-6.188182e-10 range=(-2.094395 1.570796) clamped=true
              Coordinate arm_rot_r: default_value=0 range=(-1.570796 1.570796) clamped=true
              PhysicalOffsetFrame torso_offset: socket_parent=/bodyset/torso
                  translation=(0.003113086 0.3786922 0.2044241)
              PhysicalOffsetFrame humerus_r_offset: socket_parent=/bodyset/humerus_r translation=(0 0 0)
              SpatialTransform: axes_held_at_zero=(translation1 translation2 translation3)
                TransformAxis rotation1: coordinates=arm_flex_r axis=(0 0 1) LinearFunction(coefficients=1 0)
                TransformAxis rotation2: coordinates=arm_add_r axis=(1 0 0) LinearFunction(coefficients=1 0)
                TransformAxis rotation3: coordinates=arm_rot_r axis=(0 1 0) LinearFunction(coefficients=1 0)
            PinJoint elbow_r: socket_parent_frame=humerus_r_offset socket_child_frame=ulna_r_offset
              Coordinate elbow_flex_r: default_value=0.0001098405 range=(0 2.618) clamped=true
              PhysicalOffsetFrame humerus_r_offset: socket_parent=/bodyset/humerus_r
                  translation=(0.01217989 -0.243273 -0.01387361) orientation=(-0.0228627 0.228018 0.0051689)
              PhysicalOffsetFrame ulna_r_offset: socket_parent=/bodyset/ulna_r translation=(0 0 0)
                  orientation=(-0.0228627 0.228018 0.0051689)
            PinJoint radioulnar_r: socket_parent_frame=ulna_r_offset socket_child_frame=radius_r_offset
              Coordinate pro_sup_r: default_value=0.000109842 range=(0 2.09) clamped=true
              PhysicalOffsetFrame ulna_r_offset: socket_parent=/bodyset/ulna_r
                  translation=(-0.007175266 -0.01405646 0.03440003) orientation=(-1.56884 0.056428 1.53614)
              PhysicalOffsetFrame radius_r_offset: socket_parent=/bodyset/radius_r translation=(0 0 0)
                  orientation=(-1.56884 0.056428 1.53614)
            CustomJoint acromial_l: socket_parent_frame=torso_offset socket_child_frame=humerus_l_offset
              Coordinate arm_flex_l: default_value=0 range=(-1.570796 1.570796) clamped=true
              Coordinate arm_add_l: default_value=-6.188182e-10 range=(-2.094395 1.570796) clamped=true
              Coordinate arm_rot_l: default_value=0 range=(-1.570796 1.570796) clamped=true
              PhysicalOffsetFrame torso_offset: socket_parent=/bodyset/torso
                  translation=(0.003113086 0.3786922 -0.2044241)
              PhysicalOffsetFrame humerus_l_offset: socket_parent=/bodyset/humerus_l translation=(0 0 0)
              SpatialTransform: axes_held_at_zero=(translation1 translation2 translation3)
                TransformAxis rotation1: coordinates=arm_flex_l axis=(0 0 1) LinearFunction(coefficients=1 0)
                TransformAxis rotation2: coordinates=arm_add_l axis=(-1 0 0) LinearFunction(coefficients=1 0)
                TransformAxis rotation3: coordinates=arm_rot_l axis=(0 -1 0) LinearFunction(coefficients=1 0)
            PinJoint elbow_l: socket_parent_frame=humerus_l_offset socket_child_frame=ulna_l_offset
              Coordinate elbow_flex_l: default_value=0.0001098405 range=(0 2.618) clamped=true
              PhysicalOffsetFrame humerus_l_offset: socket_parent=/bodyset/humerus_l
                  translation=(0.01087108 -0.2328106 0.01457457) orientation=(0.0228627 -0.228018 0.0051689)
              PhysicalOffsetFrame ulna_l_offset: socket_parent=/bodyset/ulna_l translation=(0 0 0)
                  orientation=(0.0228627 -0.228018 0.0051689)
            PinJoint radioulnar_l: socket_parent_frame=ulna_l_offset socket_child_frame=radius_l_offset
              Coordinate pro_sup_l: default_value=0.000109842 range=(0 2.09) clamped=true
              PhysicalOffsetFrame ulna_l_offset: socket_parent=/bodyset/ulna_l
                  translation=(-0.006959061 -0.01364454 -0.03904493) orientation=(1.56884 -0.056428 1.53614)
              PhysicalOffsetFrame radius_l_offset: socket_parent=/bodyset/radius_l translation=(0 0 0)
                  orientation=(1.56884 -0.056428 1.53614)
            WeldJoint radius_hand_l: socket_parent_frame=radius_l_offset socket_child_frame=hand_l_offset
              PhysicalOffsetFrame radius_l_offset: socket_parent=/bodyset/radius_l
                  translation=(-0.009048248 -0.2212675 -0.02154327) orientation=(1.5708 0 1.5708)
              PhysicalOffsetFrame hand_l_offset: socket_parent=/bodyset/hand_l translation=(0 0 0)
                  orientation=(1.5708 0 1.5708)
            WeldJoint radius_hand_r: socket_parent_frame=radius_r_offset socket_child_frame=hand_r_offset
              PhysicalOffsetFrame radius_r_offset: socket_parent=/bodyset/radius_r
                  translation=(-0.00822885 -0.220171 0.02084629) orientation=(-1.5708 0 -1.5708)
              PhysicalOffsetFrame hand_r_offset: socket_parent=/bodyset/hand_r translation=(0 0 0)
                  orientation=(-1.5708 0 -1.5708)
          ConstraintSet:
            CoordinateCouplerConstraint patellofemoral_knee_angle_r_con: independent_coordinate_names=knee_angle_r
                dependent_coordinate_name=knee_angle_r_beta scale_factor=1
                coupled_coordinates_function=LinearFunction(coefficients=1 0)
            CoordinateCouplerConstraint patellofemoral_knee_angle_l_con: independent_coordinate_names=knee_angle_l
                dependent_coordinate_name=knee_angle_l_beta scale_factor=1
                coupled_coordinates_function=LinearFunction(coefficients=1 0)
          ForceSet:
            CoordinateActuator lumbar_ext: coordinate=lumbar_extension optimal_force=10
            CoordinateActuator lumbar_bend: coordinate=lumbar_bending optimal_force=10
            CoordinateActuator lumbar_rot: coordinate=lumbar_rotation optimal_force=10
            CoordinateActuator shoulder_flex_r: coordinate=arm_flex_r optimal_force=10
            CoordinateActuator shoulder_add_r: coordinate=arm_add_r optimal_force=10
            CoordinateActuator shoulder_rot_r: coordinate=arm_rot_r optimal_force=10
            CoordinateActuator elbow_flex_r: coordinate=elbow_flex_r optimal_force=10
            CoordinateActuator pro_sup_r: coordinate=pro_sup_r optimal_force=10
            CoordinateActuator shoulder_flex_l: coordinate=arm_flex_l optimal_force=10
            CoordinateActuator shoulder_add_l: coordinate=arm_add_l optimal_force=10
            CoordinateActuator shoulder_rot_l: coordinate=arm_rot_l optimal_force=10
            CoordinateActuator elbow_flex_l: coordinate=elbow_flex_l optimal_force=10
            CoordinateActuator pro_sup_l: coordinate=pro_sup_l optimal_force=10
            ExpressionBasedCoordinateForce PassiveShoulderDampingX_r: coordinate=arm_flex_r
                expression=-2.44*exp(5.05*(q-1.81))+1.51*exp(-11.88*(q+0.50))-1.0*qdot
            ExpressionBasedCoordinateForce PassiveShoulderDampingY_r: coordinate=arm_add_r
                expression=-15.03*exp(20.94*(q-0.10))+5.03*exp(-14.93*(q+1.57))-1.0*qdot
            ExpressionBasedCoordinateForce PassiveShoulderDampingZ_r: coordinate=arm_rot_r
                expression=-0.43*exp(14.94*(q-0.15))+0.43*exp(-14.93*(q+0.15))-1.0*qdot
            ExpressionBasedCoordinateForce PassiveElbowDamping_r: coordinate=elbow_flex_r
                expression=6.09*exp(-6.94*(q-0.30))-11.03*exp(11.33*(q-2.40))-1.0*qdot
            ExpressionBasedCoordinateForce PassiveShoulderDampingX_l: coordinate=arm_flex_l
                expression=-2.44*exp(5.05*(q-1.81))+1.51*exp(-11.88*(q+0.50))-1.0*qdot
            ExpressionBasedCoordinateForce PassiveShoulderDampingY_l: coordinate=arm_add_l
                expression=-15.03*exp(20.94*(q-0.10))+5.03*exp(-14.93*(q+1.57))-1.0*qdot
            ExpressionBasedCoordinateForce PassiveShoulderDampingZ_l: coordinate=arm_rot_l
                expression=-0.43*exp(14.94*(q-0.15))+0.43*exp(-14.93*(q+0.15))-1.0*qdot
            ExpressionBasedCoordinateForce PassiveElbowDamping_l: coordinate=elbow_flex_l
                expression=6.09*exp(-6.94*(q-0.30))-11.03*exp(11.33*(q-2.40))-1.0*qdot
            ExpressionBasedCoordinateForce PassiveHipDampingX_r: coordinate=hip_flexion_r
                expression=-2.44*exp(5.05*(q-1.81))+1.51*exp(-21.88*(q+0.47))-0.1*qdot
            ExpressionBasedCoordinateForce PassiveHipDampingY_r: coordinate=hip_adduction_r
                expression=-0.03*exp(14.94*(q-0.50))+0.03*exp(-14.94*(q+0.50))-0.1*qdot
            ExpressionBasedCoordinateForce PassiveHipDampingZ_r: coordinate=hip_rotation_r
                expression=-0.03*exp(14.94*(q-0.92))+0.03*exp(-14.94*(q+0.92))-0.1*qdot
            ExpressionBasedCoordinateForce PassiveHipDampingX_l: coordinate=hip_flexion_l
                expression=-2.44*exp(5.05*(q-1.81))+1.51*exp(-21.88*(q+0.47))-0.1*qdot
            ExpressionBasedCoordinateForce PassiveHipDampingY_l: coordinate=hip_adduction_l
                expression=-0.03*exp(14.94*(q-0.50))+0.03*exp(-14.94*(q+0.50))-0.1*qdot
            ExpressionBasedCoordinateForce PassiveHipDampingZ_l: coordinate=hip_rotation_l
                expression=-0.03*exp(14.94*(q-0.92))+0.03*exp(-14.94*(q+0.92))-0.1*qdot
            ExpressionBasedCoordinateForce PassiveKneeDamping_r: coordinate=knee_angle_r
                expression=6.09*exp(33.94*(-q-0.13))-11.03*exp(-11.33*(-q+2.40))-0.1*qdot
            ExpressionBasedCoordinateForce PassiveKneeDamping_l: coordinate=knee_angle_l
                expression=6.09*exp(33.94*(-q-0.13))-11.03*exp(-11.33*(-q+2.40))-0.1*qdot
            ExpressionBasedBushingForce PassiveAnkleBushing_r: socket_frame1=/bodyset/tibia_r
                socket_frame2=/bodyset/calcn_r
                Mx_expression=9.52095038*theta_x-29.57608094*theta_x^2+169.01588105*theta_x^3
                My_expression=3.61796125*theta_y-10.1612135*theta_y^2+64.5279144*theta_y^3
                Mz_expression=5.98187224*theta_z+15.74951827*theta_z^2+33.6780792*theta_z^3 Fx_expression=0
                Fy_expression=0 Fz_expression=0 rotational_damping=(2 2 2) translational_damping=(0 0 0)
                moment_visual_scale=1 force_visual_scale=1 visual_aspect_ratio=1
              PhysicalOffsetFrame tibia_r_offset_bushing: socket_parent=/bodyset/tibia_r
                  translation=(-0.01048025 -0.4035422 0) orientation=(0.175895 -0.105208 0.0186622)
              PhysicalOffsetFrame calcn_r_offset_bushing: socket_parent=/bodyset/calcn_r
                  translation=(0.07293058 0.04211925 -0.006861893) orientation=(0.175895 -0.105208 0.0186622)
            ExpressionBasedBushingForce PassiveAnkleBushing_l: socket_frame1=/bodyset/tibia_l
                socket_frame2=/bodyset/calcn_l
                Mx_expression=9.52095038*theta_x+29.57608094*theta_x^2+169.01588105*theta_x^3
                My_expression=3.61796125*theta_y+10.1612135*theta_y^2+64.5279144*theta_y^3
                Mz_expression=5.98187224*theta_z+15.74951827*theta_z^2+33.6780792*theta_z^3 Fx_expression=0
                Fy_expression=0 Fz_expression=0 rotational_damping=(2 2 2) translational_damping=(0 0 0)
                moment_visual_scale=1 force_visual_scale=1 visual_aspect_ratio=1
              PhysicalOffsetFrame tibia_l_offset_bushing: socket_parent=/bodyset/tibia_l
                  translation=(-0.01000556 -0.3971165 0) orientation=(-0.175895 0.105208 0.0186622)
              PhysicalOffsetFrame calcn_l_offset_bushing: socket_parent=/bodyset/calcn_l
                  translation=(0.07044267 0.04617103 0.006993767) orientation=(-0.175895 0.105208 0.0186622)
            ExpressionBasedCoordinateForce PassiveAnkleDamping_r: coordinate=ankle_angle_r expression=-0.1*qdot
            ExpressionBasedCoordinateForce PassiveAnkleDamping_l: coordinate=ankle_angle_l expression=-0.1*qdot
            ExpressionBasedCoordinateForce PassiveSubtalarDamping_r: coordinate=subtalar_angle_r expression=-2.0*qdot
            ExpressionBasedCoordinateForce PassiveSubtalarDamping_l: coordinate=subtalar_angle_l expression=-2.0*qdot
            ExpressionBasedCoordinateForce PassiveToeDamping_r: coordinate=mtp_angle_r expression=-25.0*q-2.0*qdot
            ExpressionBasedCoordinateForce PassiveToeDamping_l: coordinate=mtp_angle_l expression=-25.0*q-2.0*qdot
            SmoothSphereHalfSpaceForce [values shared by the 12 below unless stated]: socket_half_space=/contactgeometryset/floor
                stiffness=3067776 [N/m^2] dissipation=2 [s/m] static_friction=0.8 dynamic_friction=0.8
                viscous_friction=0.5 transition_velocity=0.2 [m/s] hertz_smoothing=300 hunt_crossley_smoothing=50
            SmoothSphereHalfSpaceForce contactHeel_r: socket_sphere=/contactgeometryset/heel_r
            SmoothSphereHalfSpaceForce contactLateralRearfoot_r: socket_sphere=/contactgeometryset/lateralRearfoot_r
            SmoothSphereHalfSpaceForce contactLateralMidfoot_r: socket_sphere=/contactgeometryset/lateralMidfoot_r
            SmoothSphereHalfSpaceForce contactLateralToe_r: socket_sphere=/contactgeometryset/lateralToe_r
                stiffness=306777.6
            SmoothSphereHalfSpaceForce contactMedialToe_r: socket_sphere=/contactgeometryset/medialToe_r
            SmoothSphereHalfSpaceForce contactMedialMidfoot_r: socket_sphere=/contactgeometryset/medialMidfoot_r
            SmoothSphereHalfSpaceForce contactHeel_l: socket_sphere=/contactgeometryset/heel_l
            SmoothSphereHalfSpaceForce contactLateralRearfoot_l: socket_sphere=/contactgeometryset/lateralRearfoot_l
            SmoothSphereHalfSpaceForce contactLateralMidfoot_l: socket_sphere=/contactgeometryset/lateralMidfoot_l
            SmoothSphereHalfSpaceForce contactLateralToe_l: socket_sphere=/contactgeometryset/lateralToe_l
                stiffness=306777.6
            SmoothSphereHalfSpaceForce contactMedialToe_l: socket_sphere=/contactgeometryset/medialToe_l
            SmoothSphereHalfSpaceForce contactMedialMidfoot_l: socket_sphere=/contactgeometryset/medialMidfoot_l
            ActivationCoordinateActuator [values shared by the 13 below unless stated]: min_control=-1 max_control=1
                optimal_force=39.888
            ActivationCoordinateActuator torque_arm_flex_l: coordinate=arm_flex_l
            ActivationCoordinateActuator torque_arm_flex_r: coordinate=arm_flex_r
            ActivationCoordinateActuator torque_arm_add_l: coordinate=arm_add_l
            ActivationCoordinateActuator torque_arm_add_r: coordinate=arm_add_r
            ActivationCoordinateActuator torque_arm_rot_l: coordinate=arm_rot_l
            ActivationCoordinateActuator torque_arm_rot_r: coordinate=arm_rot_r
            ActivationCoordinateActuator torque_elbow_flex_l: coordinate=elbow_flex_l
            ActivationCoordinateActuator torque_elbow_flex_r: coordinate=elbow_flex_r
            ActivationCoordinateActuator torque_pro_sup_l: coordinate=pro_sup_l
            ActivationCoordinateActuator torque_pro_sup_r: coordinate=pro_sup_r
            ActivationCoordinateActuator torque_lumbar_extension: coordinate=lumbar_extension optimal_force=79.77601
            ActivationCoordinateActuator torque_lumbar_bending: coordinate=lumbar_bending optimal_force=79.77601
            ActivationCoordinateActuator torque_lumbar_rotation: coordinate=lumbar_rotation optimal_force=79.77601
            SpringGeneralizedForce passive_stiffness_lumbar_extension: coordinate=lumbar_extension stiffness=79.77601
                viscosity=2
            SpringGeneralizedForce passive_stiffness_lumbar_bending: coordinate=lumbar_bending stiffness=119.664
                viscosity=2
            SpringGeneralizedForce passive_stiffness_lumbar_rotation: coordinate=lumbar_rotation stiffness=39.888
                viscosity=2
            CoordinateActuator reserve_pelvis_tx: min_control=-1 max_control=1 coordinate=pelvis_tx optimal_force=20
            CoordinateActuator reserve_pelvis_ty: min_control=-1 max_control=1 coordinate=pelvis_ty optimal_force=20
            CoordinateActuator reserve_pelvis_tz: min_control=-1 max_control=1 coordinate=pelvis_tz optimal_force=20
            CoordinateActuator reserve_pelvis_list: min_control=-1 max_control=1 coordinate=pelvis_list
                optimal_force=200
            CoordinateActuator reserve_pelvis_tilt: min_control=-1 max_control=1 coordinate=pelvis_tilt
                optimal_force=200
            CoordinateActuator reserve_pelvis_rotation: min_control=-1 max_control=1 coordinate=pelvis_rotation
                optimal_force=200
            CoordinateActuator reserve_hip_adduction_r: min_control=-1 max_control=1 coordinate=hip_adduction_r
                optimal_force=200
            CoordinateActuator reserve_hip_rotation_r: min_control=-1 max_control=1 coordinate=hip_rotation_r
                optimal_force=200
            CoordinateActuator reserve_hip_flexion_r: min_control=-1 max_control=1 coordinate=hip_flexion_r
                optimal_force=200
            CoordinateActuator reserve_hip_adduction_l: min_control=-1 max_control=1 coordinate=hip_adduction_l
                optimal_force=200
            CoordinateActuator reserve_hip_rotation_l: min_control=-1 max_control=1 coordinate=hip_rotation_l
                optimal_force=200
            CoordinateActuator reserve_hip_flexion_l: min_control=-1 max_control=1 coordinate=hip_flexion_l
                optimal_force=200
            CoordinateActuator reserve_knee_angle_r: min_control=-1 max_control=1 coordinate=knee_angle_r
                optimal_force=200
            CoordinateActuator reserve_ankle_angle_r: min_control=-1 max_control=1 coordinate=ankle_angle_r
                optimal_force=200
            CoordinateActuator reserve_knee_angle_l: min_control=-1 max_control=1 coordinate=knee_angle_l
                optimal_force=200
            CoordinateActuator reserve_ankle_angle_l: min_control=-1 max_control=1 coordinate=ankle_angle_l
                optimal_force=200
            CoordinateActuator reserve_mtp_angle_r: min_control=-1 max_control=1 coordinate=mtp_angle_r
                optimal_force=200
            CoordinateActuator reserve_mtp_angle_l: min_control=-1 max_control=1 coordinate=mtp_angle_l
                optimal_force=200
            CoordinateActuator reserve_subtalar_angle_r: min_control=-1 max_control=1 coordinate=subtalar_angle_r
                optimal_force=200
            CoordinateActuator reserve_subtalar_angle_l: min_control=-1 max_control=1 coordinate=subtalar_angle_l
                optimal_force=200
            SpringGeneralizedForce mtp_spring_r: coordinate=mtp_angle_r stiffness=10.5 rest_length=0 viscosity=2
            SpringGeneralizedForce mtp_spring_l: coordinate=mtp_angle_l stiffness=10.5 rest_length=0 viscosity=2
            DeGrooteFregly2016Muscle [values shared by the 80 below unless stated]: min_control=0.01 max_control=1
                max_contraction_velocity=10 activation_time_constant=0.01 deactivation_time_constant=0.04
                default_activation=0.01 active_force_width_scale=1.5 fiber_damping=0.01
                tendon_strain_at_one_norm_force=0.049 ignore_passive_fiber_force=true
            DeGrooteFregly2016Muscle addbrev_r: max_isometric_force=625.8197 optimal_fiber_length=0.1031773
                tendon_slack_length=0.03547688 pennation_angle_at_optimal=0.1147809 [radians]
                ignore_tendon_compliance=true passive_fiber_strain_at_one_norm_force=0.5059595
              FunctionBasedPath path: coordinate_paths=(/jointset/hip_r/hip_flexion_r /jointset/hip_r/hip_adduction_r /jointset/hip_r/hip_rotation_r)
                length_function: MultivariatePolynomialFunction: coefficients=(0.1424571 -0.004754645 -0.005055087 0 0 0 -0.05786407 -0.002683281 0 0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)
                    dimension=3 order=5
            DeGrooteFregly2016Muscle addlong_r: max_isometric_force=916.8 optimal_fiber_length=0.1077373
                tendon_slack_length=0.1312357 pennation_angle_at_optimal=0.1377704 ignore_tendon_compliance=true
                passive_fiber_strain_at_one_norm_force=0.5013184
              FunctionBasedPath path: coordinate_paths=(/jointset/hip_r/hip_flexion_r /jointset/hip_r/hip_adduction_r /jointset/hip_r/hip_rotation_r)
                length_function: MultivariatePolynomialFunction: coefficients=(0.2400005 -0.005041852 0 0 0 0 -0.06260159 0 0 0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)
                    dimension=3 order=5
            DeGrooteFregly2016Muscle addmagDist_r: max_isometric_force=597.2951 optimal_fiber_length=0.1666387
                tendon_slack_length=0.08217271 pennation_angle_at_optimal=0.194705 ignore_tendon_compliance=true
                passive_fiber_strain_at_one_norm_force=0.7000001
              FunctionBasedPath path: coordinate_paths=(/jointset/hip_r/hip_flexion_r /jointset/hip_r/hip_adduction_r /jointset/hip_r/hip_rotation_r)
                length_function: MultivariatePolynomialFunction: coefficients=(0.2117391 0 -0.002131847 0 0 0 -0.05404375 0 0 0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)
                    dimension=3 order=5
            DeGrooteFregly2016Muscle addmagIsch_r: max_isometric_force=597.2951 optimal_fiber_length=0.1499233
                tendon_slack_length=0.2076495 pennation_angle_at_optimal=0.1680443 ignore_tendon_compliance=true
                passive_fiber_strain_at_one_norm_force=0.7000408
              FunctionBasedPath path: coordinate_paths=(/jointset/hip_r/hip_flexion_r /jointset/hip_r/hip_adduction_r /jointset/hip_r/hip_rotation_r)
                length_function: MultivariatePolynomialFunction: coefficients=(0.3235329 -0.005102586 0.001996255 0 0 0 -0.03774793 0 0 0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)
                    dimension=3 order=5
            DeGrooteFregly2016Muscle addmagMid_r: max_isometric_force=597.2951 optimal_fiber_length=0.1261865
                tendon_slack_length=0.04272902 pennation_angle_at_optimal=0.2073076 ignore_tendon_compliance=true
                passive_fiber_strain_at_one_norm_force=0.7000001
              FunctionBasedPath path: coordinate_paths=(/jointset/hip_r/hip_flexion_r /jointset/hip_r/hip_adduction_r /jointset/hip_r/hip_rotation_r)
                length_function: MultivariatePolynomialFunction: coefficients=(0.1387795 0 -0.004135003 0 0 0 -0.07036068 0 0 0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)
                    dimension=3 order=5
            DeGrooteFregly2016Muscle addmagProx_r: max_isometric_force=597.2951 optimal_fiber_length=0.1033919
                tendon_slack_length=0.03948094 pennation_angle_at_optimal=0.3114833 ignore_tendon_compliance=true
                passive_fiber_strain_at_one_norm_force=0.7000001
              FunctionBasedPath path: coordinate_paths=(/jointset/hip_r/hip_flexion_r /jointset/hip_r/hip_adduction_r /jointset/hip_r/hip_rotation_r)
                length_function: MultivariatePolynomialFunction: coefficients=(0.1216136 0.005455491 -0.007751947 0 0 0 -0.05286836 -0.00305555 0 0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)
                    dimension=3 order=5
            DeGrooteFregly2016Muscle bflh_r: max_isometric_force=1313.184 optimal_fiber_length=0.0947933
                tendon_slack_length=0.3229366 pennation_angle_at_optimal=0.1759182 ignore_tendon_compliance=true
                passive_fiber_strain_at_one_norm_force=0.7054016
              FunctionBasedPath path: coordinate_paths=(/jointset/hip_r/hip_flexion_r /jointset/hip_r/hip_adduction_r /jointset/hip_r/hip_rotation_r /jointset/walker_knee_r/knee_angle_r)
                length_function: MultivariatePolynomialFunction: coefficients=(0.4146212 -0.03298343 0 -0.0005872127 0 0 0.00745676 0.001159374 0 0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)
                    dimension=4 order=5
            DeGrooteFregly2016Muscle bfsh_r: max_isometric_force=557.1148 optimal_fiber_length=0.1094053
                tendon_slack_length=0.1049589 pennation_angle_at_optimal=0.2642232 ignore_tendon_compliance=true
                passive_fiber_strain_at_one_norm_force=0.6994891
              FunctionBasedPath path: coordinate_paths=/jointset/walker_knee_r/knee_angle_r
                length_function: MultivariatePolynomialFunction: coefficients=(0.2302954 -0.02343199 0 -0.001478959 0 0)
                    dimension=1 order=5
            DeGrooteFregly2016Muscle edl_r: max_isometric_force=603.4982 optimal_fiber_length=0.08123865
                tendon_slack_length=0.4324232 pennation_angle_at_optimal=0.2182582 ignore_tendon_compliance=true
                passive_fiber_strain_at_one_norm_force=0.7074931
              FunctionBasedPath path: coordinate_paths=/jointset/ankle_r/ankle_angle_r
                length_function: MultivariatePolynomialFunction: coefficients=(0.5124737 -0.03927 -0.004761183 0 0 0.004187692)
                    dimension=1 order=5
            DeGrooteFregly2016Muscle ehl_r: max_isometric_force=285.8675 optimal_fiber_length=0.08793741
                tendon_slack_length=0.3841916 pennation_angle_at_optimal=0.1972681 ignore_tendon_compliance=true
                passive_fiber_strain_at_one_norm_force=0.7147756
              FunctionBasedPath path: coordinate_paths=/jointset/ankle_r/ankle_angle_r
                length_function: MultivariatePolynomialFunction: coefficients=(0.4755009 -0.04259308 -0.005717877 0.002853075 0 0)
                    dimension=1 order=5
            DeGrooteFregly2016Muscle fdl_r: max_isometric_force=423.177 optimal_fiber_length=0.05260788
                tendon_slack_length=0.4467811 pennation_angle_at_optimal=0.2248391 ignore_tendon_compliance=true
                passive_fiber_strain_at_one_norm_force=0.6998542
              FunctionBasedPath path: coordinate_paths=/jointset/ankle_r/ankle_angle_r
                length_function: MultivariatePolynomialFunction: coefficients=(0.5008468 0.01132827 -0.007641844 0 0 0)
                    dimension=1 order=5
            DeGrooteFregly2016Muscle fhl_r: max_isometric_force=907.8393 optimal_fiber_length=0.06310509
                tendon_slack_length=0.4243005 pennation_angle_at_optimal=0.2580255 ignore_tendon_compliance=true
                passive_fiber_strain_at_one_norm_force=0.7001852
              FunctionBasedPath path: coordinate_paths=/jointset/ankle_r/ankle_angle_r
                length_function: MultivariatePolynomialFunction: coefficients=(0.4770137 0.01796083 -0.008067338 0 0 0)
                    dimension=1 order=5
            DeGrooteFregly2016Muscle gaslat_r: max_isometric_force=1575.059 optimal_fiber_length=0.07260708
                tendon_slack_length=0.3935514 pennation_angle_at_optimal=0.2102268
                passive_fiber_strain_at_one_norm_force=2 tendon_strain_at_one_norm_force=0.1
                tendon_compliance_dynamics_mode=implicit
              FunctionBasedPath path: coordinate_paths=(/jointset/walker_knee_r/knee_angle_r /jointset/ankle_r/ankle_angle_r)
                length_function: MultivariatePolynomialFunction: coefficients=(0.5289559 0.05367163 -0.009727654 -0.007781267 0.001733451 -4.884474e-5 -0.02773708 -0.0001867873 0.0007752692 0.0004124451 -0.0005768874 0.01294818 -0.0009894606 -0.0001708201 -0.0002634805 -0.01413563 0.001400188 -2.332013e-5 0.005494625 -0.0004597006 -0.0007180927)
                    dimension=2 order=5
            DeGrooteFregly2016Muscle gasmed_r: max_isometric_force=3115.515 optimal_fiber_length=0.06203857
                tendon_slack_length=0.406931 pennation_angle_at_optimal=0.1656816
                passive_fiber_strain_at_one_norm_force=2 tendon_strain_at_one_norm_force=0.1
                tendon_compliance_dynamics_mode=implicit
              FunctionBasedPath path: coordinate_paths=(/jointset/walker_knee_r/knee_angle_r /jointset/ankle_r/ankle_angle_r)
                length_function: MultivariatePolynomialFunction: coefficients=(0.5365857 0.0532191 -0.007551452 -0.007445185 0 0 -0.01253252 0 0 0 0 -0.007983034 0 0 0 0 0 0 0.0007074806 0 0)
                    dimension=2 order=5
            DeGrooteFregly2016Muscle glmax1_r: max_isometric_force=983.7836 optimal_fiber_length=0.1719552
                tendon_slack_length=0.1021203 pennation_angle_at_optimal=0.3540118 ignore_tendon_compliance=true
                passive_fiber_strain_at_one_norm_force=0.6999999
              FunctionBasedPath path: coordinate_paths=(/jointset/hip_r/hip_flexion_r /jointset/hip_r/hip_adduction_r /jointset/hip_r/hip_rotation_r)
                length_function: MultivariatePolynomialFunction: coefficients=(0.2080002 0.0231113 0.01736276 -0.004958978 -0.0008603466 0.002608913 0.01973359 0.02102084 -0.01848329 0.006803718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)
                    dimension=3 order=5
            DeGrooteFregly2016Muscle glmax2_r: max_isometric_force=1406.046 optimal_fiber_length=0.1814516
                tendon_slack_length=0.125976 pennation_angle_at_optimal=0.3673821 ignore_tendon_compliance=true
                passive_fiber_strain_at_one_norm_force=0.7000001
              FunctionBasedPath path: coordinate_paths=(/jointset/hip_r/hip_flexion_r /jointset/hip_r/hip_adduction_r /jointset/hip_r/hip_rotation_r)
                length_function: MultivariatePolynomialFunction: coefficients=(0.2328241 0.0242235 0.0227991 -0.01272134 -0.004560511 0.002806113 0.008127393 0.00385889 0.005045721 0.002813641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)
                    dimension=3 order=5
            DeGrooteFregly2016Muscle glmax3_r: max_isometric_force=947.7541 optimal_fiber_length=0.1852665
                tendon_slack_length=0.1142661 pennation_angle_at_optimal=0.3824161 ignore_tendon_compliance=true
                passive_fiber_strain_at_one_norm_force=0.7004988
              FunctionBasedPath path: coordinate_paths=(/jointset/hip_r/hip_flexion_r /jointset/hip_r/hip_adduction_r /jointset/hip_r/hip_rotation_r)
                length_function: MultivariatePolynomialFunction: coefficients=(0.2303513 0.02102237 0.009544434 -0.003986313 0 0 -0.0510352 -0.006712196 0.009026287 0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)
                    dimension=3 order=5
            DeGrooteFregly2016Muscle glmed1_r: max_isometric_force=1093.467 optimal_fiber_length=0.08994083
                tendon_slack_length=0.06877828 pennation_angle_at_optimal=0.3165559 ignore_tendon_compliance=true
                passive_fiber_strain_at_one_norm_force=0.7000001
              FunctionBasedPath path: coordinate_paths=(/jointset/hip_r/hip_flexion_r /jointset/hip_r/hip_adduction_r /jointset/hip_r/hip_rotation_r)
                length_function: MultivariatePolynomialFunction: coefficients=(0.1392722 -0.007565641 0.007514684 0 0 0 0.05756956 0.01531688 -0.024768 0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)
                    dimension=3 order=5
            DeGrooteFregly2016Muscle glmed2_r: max_isometric_force=765.0917 optimal_fiber_length=0.09897043
                tendon_slack_length=0.08889665 pennation_angle_at_optimal=0.3165559 ignore_tendon_compliance=true
                passive_fiber_strain_at_one_norm_force=0.6904088
              FunctionBasedPath path: coordinate_paths=(/jointset/hip_r/hip_flexion_r /jointset/hip_r/hip_adduction_r /jointset/hip_r/hip_rotation_r)
                length_function: MultivariatePolynomialFunction: coefficients=(0.1696914 0.01037613 0.003457797 0 0 0 0.0524338 0.01703748 -0.02533458 0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)
                    dimension=3 order=5
            DeGrooteFregly2016Muscle glmed3_r: max_isometric_force=871.1993 optimal_fiber_length=0.08986201
                tendon_slack_length=0.05568913 pennation_angle_at_optimal=0.3165559 ignore_tendon_compliance=true
                passive_fiber_strain_at_one_norm_force=0.6558113
              FunctionBasedPath path: coordinate_paths=(/jointset/hip_r/hip_flexion_r /jointset/hip_r/hip_adduction_r /jointset/hip_r/hip_rotation_r)
                length_function: MultivariatePolynomialFunction: coefficients=(0.1322339 0.02435792 0.0009481605 -0.004078369 0 0 0.04342758 0.01816 -0.02421748 0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)
                    dimension=3 order=5
            DeGrooteFregly2016Muscle glmin1_r: max_isometric_force=374.0459 optimal_fiber_length=0.09712465
                tendon_slack_length=0.02305665 pennation_angle_at_optimal=0.1745329 ignore_tendon_compliance=true
                passive_fiber_strain_at_one_norm_force=0.7000001
              FunctionBasedPath path: coordinate_paths=(/jointset/hip_r/hip_flexion_r /jointset/hip_r/hip_adduction_r /jointset/hip_r/hip_rotation_r)
                length_function: MultivariatePolynomialFunction: coefficients=(0.1072572 -0.01463174 0.01140953 0.003527763 0 0 0.05465406 0.00269784 -0.0259011 0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)
                    dimension=3 order=5
            DeGrooteFregly2016Muscle glmin2_r: max_isometric_force=394.8197 optimal_fiber_length=0.08058651
                tendon_slack_length=0.03756012 pennation_angle_at_optimal=0 ignore_tendon_compliance=true
                passive_fiber_strain_at_one_norm_force=0.6999804
              FunctionBasedPath path: coordinate_paths=(/jointset/hip_r/hip_flexion_r /jointset/hip_r/hip_adduction_r /jointset/hip_r/hip_rotation_r)
                length_function: MultivariatePolynomialFunction: coefficients=(0.1129208 0.003488483 0.006234413 0 0 0 0.0506395 -0.004830278 -0.02634109 0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)
                    dimension=3 order=5
            DeGrooteFregly2016Muscle glmin3_r: max_isometric_force=446.7738 optimal_fiber_length=0.03965951
                tendon_slack_length=0.05302915 pennation_angle_at_optimal=0.01745329 ignore_tendon_compliance=true
                passive_fiber_strain_at_one_norm_force=0.6990981
              FunctionBasedPath path: coordinate_paths=(/jointset/hip_r/hip_flexion_r /jointset/hip_r/hip_adduction_r /jointset/hip_r/hip_rotation_r)
                length_function: MultivariatePolynomialFunction: coefficients=(0.09099702 0.01469571 0 0 0.001925787 0 0.04215756 -0.002873397 -0.02093359 0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)
                    dimension=3 order=5
            DeGrooteFregly2016Muscle grac_r: max_isometric_force=281.3115 optimal_fiber_length=0.2203095
                tendon_slack_length=0.1663577 pennation_angle_at_optimal=0.1720016 ignore_tendon_compliance=true
                passive_fiber_strain_at_one_norm_force=0.7244614
              FunctionBasedPath path: coordinate_paths=(/jointset/hip_r/hip_flexion_r /jointset/hip_r/hip_adduction_r /jointset/hip_r/hip_rotation_r /jointset/walker_knee_r/knee_angle_r)
                length_function: MultivariatePolynomialFunction: coefficients=(0.4359466 -0.02644192 -0.009771919 0 0 0.0003794758 0.004992784 0.003458265 0 0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)
                    dimension=4 order=5
            DeGrooteFregly2016Muscle iliacus_r: max_isometric_force=1021.141 optimal_fiber_length=0.1283998
                tendon_slack_length=0.1157775 pennation_angle_at_optimal=0.279914 ignore_tendon_compliance=true
                passive_fiber_strain_at_one_norm_force=0.5020882
              FunctionBasedPath path: coordinate_paths=(/jointset/hip_r/hip_flexion_r /jointset/hip_r/hip_adduction_r /jointset/hip_r/hip_rotation_r)
                length_function: MultivariatePolynomialFunction: coefficients=(0.227049 -0.01071623 4.628439e-5 0.001777721 0.0003716885 -7.763709e-5 0.006532889 -0.002092555 -0.0005504232 0.0003497951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)
                    dimension=3 order=5
            DeGrooteFregly2016Muscle perbrev_r: max_isometric_force=521.2016 optimal_fiber_length=0.05417856
                tendon_slack_length=0.1760535 pennation_angle_at_optimal=0.2052361 ignore_tendon_compliance=true
                passive_fiber_strain_at_one_norm_force=0.6992207
              FunctionBasedPath path: coordinate_paths=/jointset/ankle_r/ankle_angle_r
                length_function: MultivariatePolynomialFunction: coefficients=(0.2338695 0.01042774 -0.00289605 0 0 0)
                    dimension=1 order=5
            DeGrooteFregly2016Muscle perlong_r: max_isometric_force=1115.371 optimal_fiber_length=0.05833645
                tendon_slack_length=0.3815075 pennation_angle_at_optimal=0.2479525 ignore_tendon_compliance=true
                passive_fiber_strain_at_one_norm_force=0.6966414
              FunctionBasedPath path: coordinate_paths=/jointset/ankle_r/ankle_angle_r
                length_function: MultivariatePolynomialFunction: coefficients=(0.46015 0.01209801 -0.002306366 0 0 0)
                    dimension=1 order=5
            DeGrooteFregly2016Muscle piri_r: max_isometric_force=1029.787 optimal_fiber_length=0.02883417
                tendon_slack_length=0.1274318 pennation_angle_at_optimal=0.1745329 ignore_tendon_compliance=true
                passive_fiber_strain_at_one_norm_force=0.7031405
              FunctionBasedPath path: coordinate_paths=(/jointset/hip_r/hip_flexion_r /jointset/hip_r/hip_adduction_r /jointset/hip_r/hip_rotation_r)
                length_function: MultivariatePolynomialFunction: coefficients=(0.1516734 0.02886571 -0.003938047 -0.002974842 0 0 0.02559162 0 -0.01592589 0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)
                    dimension=3 order=5
            DeGrooteFregly2016Muscle psoas_r: max_isometric_force=1426.79 optimal_fiber_length=0.13962
                tendon_slack_length=0.1188898 pennation_angle_at_optimal=0.2155251 ignore_tendon_compliance=true
                passive_fiber_strain_at_one_norm_force=0.5032605
              FunctionBasedPath path: coordinate_paths=(/jointset/hip_r/hip_flexion_r /jointset/hip_r/hip_adduction_r /jointset/hip_r/hip_rotation_r)
                length_function: MultivariatePolynomialFunction: coefficients=(0.2516849 -0.001979929 -0.003690063 0.001135138 0.00115426 0.0002562528 -0.003354444 -0.002670774 6.295576e-5 0.001556715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)
                    dimension=3 order=5
            DeGrooteFregly2016Muscle recfem_r: max_isometric_force=2191.741 optimal_fiber_length=0.07640991
                tendon_slack_length=0.4534289 pennation_angle_at_optimal=0.2170149 ignore_tendon_compliance=true
                passive_fiber_strain_at_one_norm_force=0.8997465
              FunctionBasedPath path: coordinate_paths=(/jointset/hip_r/hip_flexion_r /jointset/hip_r/hip_adduction_r /jointset/hip_r/hip_rotation_r /jointset/walker_knee_r/knee_angle_r)
                length_function: MultivariatePolynomialFunction: coefficients=(0.5155867 0.0490148 0 -0.003017599 0 0 0.001871896 0 0 0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)
                    dimension=4 order=5
            DeGrooteFregly2016Muscle sart_r: max_isometric_force=249.4131 optimal_fiber_length=0.4104516
                tendon_slack_length=0.1262926 pennation_angle_at_optimal=0.02613542 ignore_tendon_compliance=true
                passive_fiber_strain_at_one_norm_force=0.7021361
              FunctionBasedPath path: coordinate_paths=(/jointset/hip_r/hip_flexion_r /jointset/hip_r/hip_adduction_r /jointset/hip_r/hip_rotation_r /jointset/walker_knee_r/knee_angle_r)
                length_function: MultivariatePolynomialFunction: coefficients=(0.6018791 -0.01441066 -0.01316224 0.002208604 0 0 0.004055201 0 0 0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)
                    dimension=4 order=5
            DeGrooteFregly2016Muscle semimem_r: max_isometric_force=2200.987 optimal_fiber_length=0.08359046
                tendon_slack_length=0.325614 pennation_angle_at_optimal=0.2545615 ignore_tendon_compliance=true
                passive_fiber_strain_at_one_norm_force=0.7044745
              FunctionBasedPath path: coordinate_paths=(/jointset/hip_r/hip_flexion_r /jointset/hip_r/hip_adduction_r /jointset/hip_r/hip_rotation_r /jointset/walker_knee_r/knee_angle_r)
                length_function: MultivariatePolynomialFunction: coefficients=(0.4044123 -0.03664637 -0.005329555 0 0 0.0005221465 0 0 0 0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)
                    dimension=4 order=5
            DeGrooteFregly2016Muscle semiten_r: max_isometric_force=591.2951 optimal_fiber_length=0.187655
                tendon_slack_length=0.240353 pennation_angle_at_optimal=0.241295 ignore_tendon_compliance=true
                passive_fiber_strain_at_one_norm_force=0.7136122
              FunctionBasedPath path: coordinate_paths=(/jointset/hip_r/hip_flexion_r /jointset/hip_r/hip_adduction_r /jointset/hip_r/hip_rotation_r /jointset/walker_knee_r/knee_angle_r)
                length_function: MultivariatePolynomialFunction: coefficients=(0.4542504 -0.04449493 -0.007790011 0 0 0.0006833553 0 0 0 0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)
                    dimension=4 order=5
            DeGrooteFregly2016Muscle soleus_r: max_isometric_force=6194.843 optimal_fiber_length=0.04697853
                tendon_slack_length=0.3003957 pennation_angle_at_optimal=0.3814289
                passive_fiber_strain_at_one_norm_force=2 tendon_strain_at_one_norm_force=0.1
                tendon_compliance_dynamics_mode=implicit
              FunctionBasedPath path: coordinate_paths=/jointset/ankle_r/ankle_angle_r
                length_function: MultivariatePolynomialFunction: coefficients=(0.3846967 0.04970802 -0.01196926 -0.006385633 0 0)
                    dimension=1 order=5
            DeGrooteFregly2016Muscle tfl_r: max_isometric_force=411.2066 optimal_fiber_length=0.09605674
                tendon_slack_length=0.4545036 pennation_angle_at_optimal=0.05235988 ignore_tendon_compliance=true
                passive_fiber_strain_at_one_norm_force=0.6394004
              FunctionBasedPath path: coordinate_paths=(/jointset/hip_r/hip_flexion_r /jointset/hip_r/hip_adduction_r /jointset/hip_r/hip_rotation_r /jointset/walker_knee_r/knee_angle_r)
                length_function: MultivariatePolynomialFunction: coefficients=(0.5467258 0.01572782 0.001499731 0 -0.001022563 0 -0.00431858 0 0 0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)
                    dimension=4 order=5
            DeGrooteFregly2016Muscle tibant_r: max_isometric_force=1227.452 optimal_fiber_length=0.0795451
                tendon_slack_length=0.2800512 pennation_angle_at_optimal=0.1951828 ignore_tendon_compliance=true
                passive_fiber_strain_at_one_norm_force=0.7083715
              FunctionBasedPath path: coordinate_paths=/jointset/ankle_r/ankle_angle_r
                length_function: MultivariatePolynomialFunction: coefficients=(0.3615149 -0.04827262 -0.006221175 0.005058376 0 0)
                    dimension=1 order=5
            DeGrooteFregly2016Muscle tibpost_r: max_isometric_force=1730.154 optimal_fiber_length=0.04250275
                tendon_slack_length=0.3157118 pennation_angle_at_optimal=0.2264891 ignore_tendon_compliance=true
                passive_fiber_strain_at_one_norm_force=0.698029
              FunctionBasedPath path: coordinate_paths=/jointset/ankle_r/ankle_angle_r
                length_function: MultivariatePolynomialFunction: coefficients=(0.3807472 0.01234737 -0.007194567 0 0 0)
                    dimension=1 order=5
            DeGrooteFregly2016Muscle vasint_r: max_isometric_force=1697.361 optimal_fiber_length=0.1155551
                tendon_slack_length=0.2024683 pennation_angle_at_optimal=0.06309973 ignore_tendon_compliance=true
                passive_fiber_strain_at_one_norm_force=0.7074754
              FunctionBasedPath path: coordinate_paths=/jointset/walker_knee_r/knee_angle_r
                length_function: MultivariatePolynomialFunction: coefficients=(0.286357 0.04546111 0 -0.003318052 0 0)
                    dimension=1 order=5
            DeGrooteFregly2016Muscle vaslat_r: max_isometric_force=5148.767 optimal_fiber_length=0.1153361
                tendon_slack_length=0.217857 pennation_angle_at_optimal=0.2528673 ignore_tendon_compliance=true
                passive_fiber_strain_at_one_norm_force=0.711135
              FunctionBasedPath path: coordinate_paths=/jointset/walker_knee_r/knee_angle_r
                length_function: MultivariatePolynomialFunction: coefficients=(0.3005633 0.03994064 0.01804372 -0.02140358 0.005362896 0)
                    dimension=1 order=5
            DeGrooteFregly2016Muscle vasmed_r: max_isometric_force=2747.823 optimal_fiber_length=0.1086776
                tendon_slack_length=0.2054995 pennation_angle_at_optimal=0.4222225 ignore_tendon_compliance=true
                passive_fiber_strain_at_one_norm_force=0.706013
              FunctionBasedPath path: coordinate_paths=/jointset/walker_knee_r/knee_angle_r
                length_function: MultivariatePolynomialFunction: coefficients=(0.2753071 0.04412842 0 -0.003560036 0 0)
                    dimension=1 order=5
            DeGrooteFregly2016Muscle addbrev_l: max_isometric_force=625.8197 optimal_fiber_length=0.1077455
                tendon_slack_length=0.03704761 pennation_angle_at_optimal=0.1147809 ignore_tendon_compliance=true
                passive_fiber_strain_at_one_norm_force=0.5059595
              FunctionBasedPath path: coordinate_paths=(/jointset/hip_l/hip_flexion_l /jointset/hip_l/hip_adduction_l /jointset/hip_l/hip_rotation_l)
                length_function: MultivariatePolynomialFunction: coefficients=(0.142458 -0.004820235 -0.004327032 0 0 0 -0.057864 -0.002888198 0 0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)
                    dimension=3 order=5
            DeGrooteFregly2016Muscle addlong_l: max_isometric_force=916.8 optimal_fiber_length=0.1097565
                tendon_slack_length=0.1336953 pennation_angle_at_optimal=0.1377704 ignore_tendon_compliance=true
                passive_fiber_strain_at_one_norm_force=0.5013184
              FunctionBasedPath path: coordinate_paths=(/jointset/hip_l/hip_flexion_l /jointset/hip_l/hip_adduction_l /jointset/hip_l/hip_rotation_l)
                length_function: MultivariatePolynomialFunction: coefficients=(0.2399972 -0.005009632 0 0 0 0 -0.06284021 0 0 0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)
                    dimension=3 order=5
            DeGrooteFregly2016Muscle addmagDist_l: max_isometric_force=597.2951 optimal_fiber_length=0.1712863
                tendon_slack_length=0.08446453 pennation_angle_at_optimal=0.194705 ignore_tendon_compliance=true
                passive_fiber_strain_at_one_norm_force=0.7000001
              FunctionBasedPath path: coordinate_paths=(/jointset/hip_l/hip_flexion_l /jointset/hip_l/hip_adduction_l /jointset/hip_l/hip_rotation_l)
                length_function: MultivariatePolynomialFunction: coefficients=(0.2117538 0 -0.001985146 0 0 0 -0.05374742 0 0 0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)
                    dimension=3 order=5
            DeGrooteFregly2016Muscle addmagIsch_l: max_isometric_force=597.2951 optimal_fiber_length=0.1525686
                tendon_slack_length=0.2113133 pennation_angle_at_optimal=0.1680443 ignore_tendon_compliance=true
                passive_fiber_strain_at_one_norm_force=0.7000408
              FunctionBasedPath path: coordinate_paths=(/jointset/hip_l/hip_flexion_l /jointset/hip_l/hip_adduction_l /jointset/hip_l/hip_rotation_l)
                length_function: MultivariatePolynomialFunction: coefficients=(0.323425 -0.005172299 0.002261918 0 0 0 -0.03778402 0 0 0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)
                    dimension=3 order=5
            DeGrooteFregly2016Muscle addmagMid_l: max_isometric_force=597.2951 optimal_fiber_length=0.1337033
                tendon_slack_length=0.04527434 pennation_angle_at_optimal=0.2073076 ignore_tendon_compliance=true
                passive_fiber_strain_at_one_norm_force=0.7000001
              FunctionBasedPath path: coordinate_paths=(/jointset/hip_l/hip_flexion_l /jointset/hip_l/hip_adduction_l /jointset/hip_l/hip_rotation_l)
                length_function: MultivariatePolynomialFunction: coefficients=(0.1386302 0 -0.004119628 0 0 0 -0.07049037 0 0 0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)
                    dimension=3 order=5
            DeGrooteFregly2016Muscle addmagProx_l: max_isometric_force=597.2951 optimal_fiber_length=0.1115231
                tendon_slack_length=0.04258588 pennation_angle_at_optimal=0.3114833 ignore_tendon_compliance=true
                passive_fiber_strain_at_one_norm_force=0.7000001
              FunctionBasedPath path: coordinate_paths=(/jointset/hip_l/hip_flexion_l /jointset/hip_l/hip_adduction_l /jointset/hip_l/hip_rotation_l)
                length_function: MultivariatePolynomialFunction: coefficients=(0.1215686 0.005159089 -0.007458929 0 0 0 -0.05272385 -0.002963992 0 0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)
                    dimension=3 order=5
            DeGrooteFregly2016Muscle bflh_l: max_isometric_force=1313.184 optimal_fiber_length=0.09623072
                tendon_slack_length=0.3278341 pennation_angle_at_optimal=0.1759182 ignore_tendon_compliance=true
                passive_fiber_strain_at_one_norm_force=0.7054016
              FunctionBasedPath path: coordinate_paths=(/jointset/hip_l/hip_flexion_l /jointset/hip_l/hip_adduction_l /jointset/hip_l/hip_rotation_l /jointset/walker_knee_l/knee_angle_l)
                length_function: MultivariatePolynomialFunction: coefficients=(0.4146494 -0.03380419 0.004251565 -0.004792145 0 0.0007099115 0.007226948 0.00125305 0 0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)
                    dimension=4 order=5
            DeGrooteFregly2016Muscle bfsh_l: max_isometric_force=557.1148 optimal_fiber_length=0.1105752
                tendon_slack_length=0.1060812 pennation_angle_at_optimal=0.2642232 ignore_tendon_compliance=true
                passive_fiber_strain_at_one_norm_force=0.6994891
              FunctionBasedPath path: coordinate_paths=/jointset/walker_knee_l/knee_angle_l
                length_function: MultivariatePolynomialFunction: coefficients=(0.2303112 -0.02310327 0 -0.002134176 0 0.0002180052)
                    dimension=1 order=5
            DeGrooteFregly2016Muscle edl_l: max_isometric_force=603.4982 optimal_fiber_length=0.07764839
                tendon_slack_length=0.4133127 pennation_angle_at_optimal=0.2182582 ignore_tendon_compliance=true
                passive_fiber_strain_at_one_norm_force=0.7074931
              FunctionBasedPath path: coordinate_paths=/jointset/ankle_l/ankle_angle_l
                length_function: MultivariatePolynomialFunction: coefficients=(0.5124651 -0.03926354 -0.004669559 0 0 0.003980652)
                    dimension=1 order=5
            DeGrooteFregly2016Muscle ehl_l: max_isometric_force=285.8675 optimal_fiber_length=0.08395862
                tendon_slack_length=0.3668086 pennation_angle_at_optimal=0.1972681 ignore_tendon_compliance=true
                passive_fiber_strain_at_one_norm_force=0.7147756
              FunctionBasedPath path: coordinate_paths=/jointset/ankle_l/ankle_angle_l
                length_function: MultivariatePolynomialFunction: coefficients=(0.4754938 -0.04261554 -0.005642802 0.002925036 0 0)
                    dimension=1 order=5
            DeGrooteFregly2016Muscle fdl_l: max_isometric_force=423.177 optimal_fiber_length=0.05061098
                tendon_slack_length=0.4298221 pennation_angle_at_optimal=0.2248391 ignore_tendon_compliance=true
                passive_fiber_strain_at_one_norm_force=0.6998542
              FunctionBasedPath path: coordinate_paths=/jointset/ankle_l/ankle_angle_l
                length_function: MultivariatePolynomialFunction: coefficients=(0.5008459 0.01131229 -0.007622558 0 0 0)
                    dimension=1 order=5
            DeGrooteFregly2016Muscle fhl_l: max_isometric_force=907.8393 optimal_fiber_length=0.0607702
                tendon_slack_length=0.4086014 pennation_angle_at_optimal=0.2580255 ignore_tendon_compliance=true
                passive_fiber_strain_at_one_norm_force=0.7001852
              FunctionBasedPath path: coordinate_paths=/jointset/ankle_l/ankle_angle_l
                length_function: MultivariatePolynomialFunction: coefficients=(0.4770128 0.01793772 -0.008044274 0 0 0)
                    dimension=1 order=5
            DeGrooteFregly2016Muscle gaslat_l: max_isometric_force=1575.059 optimal_fiber_length=0.07025839
                tendon_slack_length=0.3808208 pennation_angle_at_optimal=0.2102268
                passive_fiber_strain_at_one_norm_force=2 tendon_strain_at_one_norm_force=0.1
                tendon_compliance_dynamics_mode=implicit
              FunctionBasedPath path: coordinate_paths=(/jointset/walker_knee_l/knee_angle_l /jointset/ankle_l/ankle_angle_l)
                length_function: MultivariatePolynomialFunction: coefficients=(0.5295217 0.05366187 -0.009664985 -0.008049812 0.001822755 1.972871e-5 -0.02769459 -0.0004499221 0.0006285959 0.0009946347 -0.0005635343 0.01326258 -0.0006549621 -0.0002094701 -0.0005523806 -0.01424437 0.001313952 3.130202e-5 0.005285841 -0.0004498141 -0.0006134922)
                    dimension=2 order=5
            DeGrooteFregly2016Muscle gasmed_l: max_isometric_force=3115.515 optimal_fiber_length=0.06088405
                tendon_slack_length=0.3993581 pennation_angle_at_optimal=0.1656816
                passive_fiber_strain_at_one_norm_force=2 tendon_strain_at_one_norm_force=0.1
                tendon_compliance_dynamics_mode=implicit
              FunctionBasedPath path: coordinate_paths=(/jointset/walker_knee_l/knee_angle_l /jointset/ankle_l/ankle_angle_l)
                length_function: MultivariatePolynomialFunction: coefficients=(0.5365708 0.05321057 -0.00746863 -0.0074644 0 0 -0.01259536 0 0 0 0 -0.00783191 0 0 0 0 0 0 0.0006571739 0 0)
                    dimension=2 order=5
            DeGrooteFregly2016Muscle glmax1_l: max_isometric_force=983.7836 optimal_fiber_length=0.1761455
                tendon_slack_length=0.1046089 pennation_angle_at_optimal=0.3540118 ignore_tendon_compliance=true
                passive_fiber_strain_at_one_norm_force=0.6999999
              FunctionBasedPath path: coordinate_paths=(/jointset/hip_l/hip_flexion_l /jointset/hip_l/hip_adduction_l /jointset/hip_l/hip_rotation_l)
                length_function: MultivariatePolynomialFunction: coefficients=(0.208111 0.02311827 0.01723021 -0.007295912 -0.00246835 0.009573238 0.01963173 0.02079039 -0.01285359 0.001951051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)
                    dimension=3 order=5
            DeGrooteFregly2016Muscle glmax2_l: max_isometric_force=1406.046 optimal_fiber_length=0.1841111
                tendon_slack_length=0.1278224 pennation_angle_at_optimal=0.3673821 ignore_tendon_compliance=true
                passive_fiber_strain_at_one_norm_force=0.7000001
              FunctionBasedPath path: coordinate_paths=(/jointset/hip_l/hip_flexion_l /jointset/hip_l/hip_adduction_l /jointset/hip_l/hip_rotation_l)
                length_function: MultivariatePolynomialFunction: coefficients=(0.232869 0.02407502 0.02284482 -0.01234077 -0.002793489 0.003931855 0.008386215 0.002811957 0.004358153 0.001728503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)
                    dimension=3 order=5
            DeGrooteFregly2016Muscle glmax3_l: max_isometric_force=947.7541 optimal_fiber_length=0.1921926
                tendon_slack_length=0.118538 pennation_angle_at_optimal=0.3824161 ignore_tendon_compliance=true
                passive_fiber_strain_at_one_norm_force=0.7004988
              FunctionBasedPath path: coordinate_paths=(/jointset/hip_l/hip_flexion_l /jointset/hip_l/hip_adduction_l /jointset/hip_l/hip_rotation_l)
                length_function: MultivariatePolynomialFunction: coefficients=(0.230364 0.02118983 0.008621934 -0.005390081 0 0 -0.05081631 -0.006817599 0.008923839 0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)
                    dimension=3 order=5
            DeGrooteFregly2016Muscle glmed1_l: max_isometric_force=1093.467 optimal_fiber_length=0.09195318
                tendon_slack_length=0.07031713 pennation_angle_at_optimal=0.3165559 ignore_tendon_compliance=true
                passive_fiber_strain_at_one_norm_force=0.7000001
              FunctionBasedPath path: coordinate_paths=(/jointset/hip_l/hip_flexion_l /jointset/hip_l/hip_adduction_l /jointset/hip_l/hip_rotation_l)
                length_function: MultivariatePolynomialFunction: coefficients=(0.1392082 -0.007828385 0.008115855 0 0 0 0.05770712 0.01510015 -0.02707378 0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)
                    dimension=3 order=5
            DeGrooteFregly2016Muscle glmed2_l: max_isometric_force=765.0917 optimal_fiber_length=0.1019769
                tendon_slack_length=0.09159708 pennation_angle_at_optimal=0.3165559 ignore_tendon_compliance=true
                passive_fiber_strain_at_one_norm_force=0.6904088
              FunctionBasedPath path: coordinate_paths=(/jointset/hip_l/hip_flexion_l /jointset/hip_l/hip_adduction_l /jointset/hip_l/hip_rotation_l)
                length_function: MultivariatePolynomialFunction: coefficients=(0.1697128 0.01064902 0.001881295 0 0 0 0.05256934 0.01697489 -0.02695495 0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)
                    dimension=3 order=5
            DeGrooteFregly2016Muscle glmed3_l: max_isometric_force=871.1993 optimal_fiber_length=0.09503439
                tendon_slack_length=0.05889455 pennation_angle_at_optimal=0.3165559 ignore_tendon_compliance=true
                passive_fiber_strain_at_one_norm_force=0.6558113
              FunctionBasedPath path: coordinate_paths=(/jointset/hip_l/hip_flexion_l /jointset/hip_l/hip_adduction_l /jointset/hip_l/hip_rotation_l)
                length_function: MultivariatePolynomialFunction: coefficients=(0.1322999 0.02351552 0 0 0 0 0.04347662 0.01864401 -0.02514965 0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)
                    dimension=3 order=5
            DeGrooteFregly2016Muscle glmin1_l: max_isometric_force=374.0459 optimal_fiber_length=0.09936197
                tendon_slack_length=0.02358777 pennation_angle_at_optimal=0.1745329 ignore_tendon_compliance=true
                passive_fiber_strain_at_one_norm_force=0.7000001
              FunctionBasedPath path: coordinate_paths=(/jointset/hip_l/hip_flexion_l /jointset/hip_l/hip_adduction_l /jointset/hip_l/hip_rotation_l)
                length_function: MultivariatePolynomialFunction: coefficients=(0.1072371 -0.01452393 0.01177008 0.00476995 0 0 0.05468489 0.003439756 -0.02713822 -0.007286811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)
                    dimension=3 order=5
            DeGrooteFregly2016Muscle glmin2_l: max_isometric_force=394.8197 optimal_fiber_length=0.08351407
                tendon_slack_length=0.03892461 pennation_angle_at_optimal=0 ignore_tendon_compliance=true
                passive_fiber_strain_at_one_norm_force=0.6999804
              FunctionBasedPath path: coordinate_paths=(/jointset/hip_l/hip_flexion_l /jointset/hip_l/hip_adduction_l /jointset/hip_l/hip_rotation_l)
                length_function: MultivariatePolynomialFunction: coefficients=(0.1130214 0.003657332 0.006109058 0 0 0 0.0503025 -0.004601656 -0.02432581 0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)
                    dimension=3 order=5
            DeGrooteFregly2016Muscle glmin3_l: max_isometric_force=446.7738 optimal_fiber_length=0.04341457
                tendon_slack_length=0.05805007 pennation_angle_at_optimal=0.01745329 ignore_tendon_compliance=true
                passive_fiber_strain_at_one_norm_force=0.6990981
              FunctionBasedPath path: coordinate_paths=(/jointset/hip_l/hip_flexion_l /jointset/hip_l/hip_adduction_l /jointset/hip_l/hip_rotation_l)
                length_function: MultivariatePolynomialFunction: coefficients=(0.0910149 0.01464538 0 0 0 0 0.04207691 -0.002567951 -0.0208049 0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)
                    dimension=3 order=5
            DeGrooteFregly2016Muscle grac_l: max_isometric_force=281.3115 optimal_fiber_length=0.2227246
                tendon_slack_length=0.1681813 pennation_angle_at_optimal=0.1720016 ignore_tendon_compliance=true
                passive_fiber_strain_at_one_norm_force=0.7244614
              FunctionBasedPath path: coordinate_paths=(/jointset/hip_l/hip_flexion_l /jointset/hip_l/hip_adduction_l /jointset/hip_l/hip_rotation_l /jointset/walker_knee_l/knee_angle_l)
                length_function: MultivariatePolynomialFunction: coefficients=(0.436002 -0.026504 -0.009800622 0 0 0.0003630384 0.005412339 0.002924632 0 0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)
                    dimension=4 order=5
            DeGrooteFregly2016Muscle iliacus_l: max_isometric_force=1021.141 optimal_fiber_length=0.1293811
                tendon_slack_length=0.1166623 pennation_angle_at_optimal=0.279914 ignore_tendon_compliance=true
                passive_fiber_strain_at_one_norm_force=0.5020882
              FunctionBasedPath path: coordinate_paths=(/jointset/hip_l/hip_flexion_l /jointset/hip_l/hip_adduction_l /jointset/hip_l/hip_rotation_l)
                length_function: MultivariatePolynomialFunction: coefficients=(0.227284 -0.01060671 2.41919e-5 0.001200117 0.0001107735 0.0007687186 0.006446845 -0.0007093399 -3.088276e-5 -0.0004209227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)
                    dimension=3 order=5
            DeGrooteFregly2016Muscle perbrev_l: max_isometric_force=521.2016 optimal_fiber_length=0.05003764
                tendon_slack_length=0.1625976 pennation_angle_at_optimal=0.2052361 ignore_tendon_compliance=true
                passive_fiber_strain_at_one_norm_force=0.6992207
              FunctionBasedPath path: coordinate_paths=/jointset/ankle_l/ankle_angle_l
                length_function: MultivariatePolynomialFunction: coefficients=(0.2338683 0.01040106 -0.002867264 0 0 0)
                    dimension=1 order=5
            DeGrooteFregly2016Muscle perlong_l: max_isometric_force=1115.371 optimal_fiber_length=0.05567395
                tendon_slack_length=0.3640953 pennation_angle_at_optimal=0.2479525 ignore_tendon_compliance=true
                passive_fiber_strain_at_one_norm_force=0.6966414
              FunctionBasedPath path: coordinate_paths=/jointset/ankle_l/ankle_angle_l
                length_function: MultivariatePolynomialFunction: coefficients=(0.4601482 0.0120583 -0.002262752 0 0 0)
                    dimension=1 order=5
            DeGrooteFregly2016Muscle piri_l: max_isometric_force=1029.787 optimal_fiber_length=0.03044748
                tendon_slack_length=0.1345618 pennation_angle_at_optimal=0.1745329 ignore_tendon_compliance=true
                passive_fiber_strain_at_one_norm_force=0.7031405
              FunctionBasedPath path: coordinate_paths=(/jointset/hip_l/hip_flexion_l /jointset/hip_l/hip_adduction_l /jointset/hip_l/hip_rotation_l)
                length_function: MultivariatePolynomialFunction: coefficients=(0.1515721 0.02847053 -0.003169575 -0.002900693 0 0 0.02559224 0.002114519 -0.01369066 0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)
                    dimension=3 order=5
            DeGrooteFregly2016Muscle psoas_l: max_isometric_force=1426.79 optimal_fiber_length=0.1407703
                tendon_slack_length=0.1198693 pennation_angle_at_optimal=0.2155251 ignore_tendon_compliance=true
                passive_fiber_strain_at_one_norm_force=0.5032605
              FunctionBasedPath path: coordinate_paths=(/jointset/hip_l/hip_flexion_l /jointset/hip_l/hip_adduction_l /jointset/hip_l/hip_rotation_l)
                length_function: MultivariatePolynomialFunction: coefficients=(0.2518971 -0.00197405 -0.003328114 0.0005409105 -0.0001738027 5.792701e-5 -0.003414954 -0.001970807 0.0002587032 0.002699847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)
                    dimension=3 order=5
            DeGrooteFregly2016Muscle recfem_l: max_isometric_force=2191.741 optimal_fiber_length=0.07740762
                tendon_slack_length=0.4593485 pennation_angle_at_optimal=0.2170149 ignore_tendon_compliance=true
                passive_fiber_strain_at_one_norm_force=0.8997465
              FunctionBasedPath path: coordinate_paths=(/jointset/hip_l/hip_flexion_l /jointset/hip_l/hip_adduction_l /jointset/hip_l/hip_rotation_l /jointset/walker_knee_l/knee_angle_l)
                length_function: MultivariatePolynomialFunction: coefficients=(0.515645 0.04917356 0 -0.003156564 0 0 0.001790872 0 0 0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)
                    dimension=4 order=5
            DeGrooteFregly2016Muscle sart_l: max_isometric_force=249.4131 optimal_fiber_length=0.4167367
                tendon_slack_length=0.1282265 pennation_angle_at_optimal=0.02613542 ignore_tendon_compliance=true
                passive_fiber_strain_at_one_norm_force=0.7021361
              FunctionBasedPath path: coordinate_paths=(/jointset/hip_l/hip_flexion_l /jointset/hip_l/hip_adduction_l /jointset/hip_l/hip_rotation_l /jointset/walker_knee_l/knee_angle_l)
                length_function: MultivariatePolynomialFunction: coefficients=(0.6018733 -0.0145011 -0.01284562 0.00202809 0 0 0.004044142 0 0 0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)
                    dimension=4 order=5
            DeGrooteFregly2016Muscle semimem_l: max_isometric_force=2200.987 optimal_fiber_length=0.0848294
                tendon_slack_length=0.3304401 pennation_angle_at_optimal=0.2545615 ignore_tendon_compliance=true
                passive_fiber_strain_at_one_norm_force=0.7044745
              FunctionBasedPath path: coordinate_paths=(/jointset/hip_l/hip_flexion_l /jointset/hip_l/hip_adduction_l /jointset/hip_l/hip_rotation_l /jointset/walker_knee_l/knee_angle_l)
                length_function: MultivariatePolynomialFunction: coefficients=(0.4042616 -0.03650536 -0.005334893 0 0 0.0004984053 -0.001116959 0 0 0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)
                    dimension=4 order=5
            DeGrooteFregly2016Muscle semiten_l: max_isometric_force=591.2951 optimal_fiber_length=0.1895959
                tendon_slack_length=0.2428389 pennation_angle_at_optimal=0.241295 ignore_tendon_compliance=true
                passive_fiber_strain_at_one_norm_force=0.7136122
              FunctionBasedPath path: coordinate_paths=(/jointset/hip_l/hip_flexion_l /jointset/hip_l/hip_adduction_l /jointset/hip_l/hip_rotation_l /jointset/walker_knee_l/knee_angle_l)
                length_function: MultivariatePolynomialFunction: coefficients=(0.4541925 -0.0443295 -0.007945453 0 0 0.0006648315 0 0.0007714723 0 0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)
                    dimension=4 order=5
            DeGrooteFregly2016Muscle soleus_l: max_isometric_force=6194.843 optimal_fiber_length=0.04547638
                tendon_slack_length=0.2907904 pennation_angle_at_optimal=0.3814289
                passive_fiber_strain_at_one_norm_force=2 tendon_strain_at_one_norm_force=0.1
                tendon_compliance_dynamics_mode=implicit
              FunctionBasedPath path: coordinate_paths=/jointset/ankle_l/ankle_angle_l
                length_function: MultivariatePolynomialFunction: coefficients=(0.3846892 0.04970675 -0.01188348 -0.006414943 0 0)
                    dimension=1 order=5
            DeGrooteFregly2016Muscle tfl_l: max_isometric_force=411.2066 optimal_fiber_length=0.09724814
                tendon_slack_length=0.4601408 pennation_angle_at_optimal=0.05235988 ignore_tendon_compliance=true
                passive_fiber_strain_at_one_norm_force=0.6394004
              FunctionBasedPath path: coordinate_paths=(/jointset/hip_l/hip_flexion_l /jointset/hip_l/hip_adduction_l /jointset/hip_l/hip_rotation_l /jointset/walker_knee_l/knee_angle_l)
                length_function: MultivariatePolynomialFunction: coefficients=(0.5467181 0.01654536 0 0 -0.0006167339 0 -0.004400939 0 0 0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)
                    dimension=4 order=5
            DeGrooteFregly2016Muscle tibant_l: max_isometric_force=1227.452 optimal_fiber_length=0.0754391
                tendon_slack_length=0.2655954 pennation_angle_at_optimal=0.1951828 ignore_tendon_compliance=true
                passive_fiber_strain_at_one_norm_force=0.7083715
              FunctionBasedPath path: coordinate_paths=/jointset/ankle_l/ankle_angle_l
                length_function: MultivariatePolynomialFunction: coefficients=(0.3615035 -0.04829431 -0.006095759 0.005107289 0 0)
                    dimension=1 order=5
            DeGrooteFregly2016Muscle tibpost_l: max_isometric_force=1730.154 optimal_fiber_length=0.04073724
                tendon_slack_length=0.3025975 pennation_angle_at_optimal=0.2264891 ignore_tendon_compliance=true
                passive_fiber_strain_at_one_norm_force=0.698029
              FunctionBasedPath path: coordinate_paths=/jointset/ankle_l/ankle_angle_l
                length_function: MultivariatePolynomialFunction: coefficients=(0.3807463 0.01233004 -0.007174949 0 0 0)
                    dimension=1 order=5
            DeGrooteFregly2016Muscle vasint_l: max_isometric_force=1697.361 optimal_fiber_length=0.1178507
                tendon_slack_length=0.2064906 pennation_angle_at_optimal=0.06309973 ignore_tendon_compliance=true
                passive_fiber_strain_at_one_norm_force=0.7074754
              FunctionBasedPath path: coordinate_paths=/jointset/walker_knee_l/knee_angle_l
                length_function: MultivariatePolynomialFunction: coefficients=(0.286368 0.0452631 0 -0.003169961 0 0)
                    dimension=1 order=5
            DeGrooteFregly2016Muscle vaslat_l: max_isometric_force=5148.767 optimal_fiber_length=0.1182655
                tendon_slack_length=0.2233904 pennation_angle_at_optimal=0.2528673 ignore_tendon_compliance=true
                passive_fiber_strain_at_one_norm_force=0.711135
              FunctionBasedPath path: coordinate_paths=/jointset/walker_knee_l/knee_angle_l
                length_function: MultivariatePolynomialFunction: coefficients=(0.3005808 0.04010165 0.01675967 -0.01957424 0.004678097 0)
                    dimension=1 order=5
            DeGrooteFregly2016Muscle vasmed_l: max_isometric_force=2747.823 optimal_fiber_length=0.1108152
                tendon_slack_length=0.2095415 pennation_angle_at_optimal=0.4222225 ignore_tendon_compliance=true
                passive_fiber_strain_at_one_norm_force=0.706013
              FunctionBasedPath path: coordinate_paths=/jointset/walker_knee_l/knee_angle_l
                length_function: MultivariatePolynomialFunction: coefficients=(0.2753309 0.043836 0 -0.003338509 0 0)
                    dimension=1 order=5
            ObjectGroup right_leg
            ObjectGroup left_leg
            ObjectGroup hip_add_r
            ObjectGroup hip_abd_r
            ObjectGroup hip_flex_r
            ObjectGroup hip_ext_r
            ObjectGroup hip_inrot_r
            ObjectGroup hip_exrot_r
            ObjectGroup knee_flex_r
            ObjectGroup knee_ext_r
            ObjectGroup ankle_df_r
            ObjectGroup ankle_pf_r
            ObjectGroup everter_r
            ObjectGroup inverter_r
            ObjectGroup hip_add_l
            ObjectGroup hip_abd_l
            ObjectGroup hip_flex_l
            ObjectGroup hip_ext_l
            ObjectGroup hip_exrot_l
            ObjectGroup hip_inrot_l
            ObjectGroup knee_flex_l
            ObjectGroup knee_ext_l
            ObjectGroup ankle_df_l
            ObjectGroup ankle_pf_l
            ObjectGroup everter_l
            ObjectGroup inverter_l
          MarkerSet:
            Marker RShoulder: torso (-0.01823058 0.4272687 0.228676)
            Marker LShoulder: torso (-0.01484583 0.4471332 -0.2005074)
            Marker C7: torso (-0.100146 0.4064356 -0.01552701)
            Marker LClavicle: torso (0.09409146 0.4078968 -0.05870163)
            Marker RBiceps: humerus_r (0.05508275 -0.1913935 0.005938273)
            Marker RElbow: humerus_r (0.02655545 -0.2792072 0.0647867)
            Marker RMElbow: humerus_r (0.01147508 -0.2717616 -0.06202124)
            Marker RForearm: ulna_r (0.008092388 -0.105201 0.01183553)
            Marker RWrist: radius_r (-0.0252243 -0.2122625 0.01609958)
            Marker LBiceps: humerus_l (0.04572953 -0.1417839 -0.02578702)
            Marker LElbow: humerus_l (0.01545179 -0.2491363 -0.06631001)
            Marker LMElbow: humerus_l (0.006310653 -0.2236228 0.06051593)
            Marker LForearm: radius_l (0.01607318 -0.09274289 -0.03343898)
            Marker LWrist: radius_l (-0.03216161 -0.2210438 -0.009437768)
            Marker RASI: pelvis (0.01261036 0.04588091 0.1287725)
            Marker LASI: pelvis (0.01696305 0.06023466 -0.1276863)
            Marker RPSI: pelvis (-0.2293198 0.04770604 0.04919397)
            Marker LPSI: pelvis (-0.2242435 0.05587249 -0.04599324)
            Marker Pelvis_RightThigh_score: femur_r (-0.010934 0.05318227 0.01608464)
            Marker RTH1: femur_r (0.06942227 -0.3108 0.0565449)
            Marker RTH2: femur_r (0.004678197 -0.233892 0.08320659)
            Marker RTHI: femur_r (0.07439919 -0.236453 0.07384461)
            Marker RTH3: femur_r (-0.000325224 -0.3099416 0.06972385)
            Marker RKNE: femur_r (0.01128037 -0.4207913 0.06562728)
            Marker RSH1: tibia_r (0.0404418 -0.3171385 0.06140736)
            Marker RSH2: tibia_r (-0.04601085 -0.2526004 0.07301808)
            Marker RTIB: tibia_r (0.02934412 -0.2468022 0.08476285)
            Marker RANK: tibia_r (0.01466499 -0.4032576 0.04959754)
            Marker RMAnkle: tibia_r (0.03732429 -0.3874761 -0.03902296)
            Marker RTOE: toes_r (0.02511317 0.0292019 -0.00855525)
            Marker RMT5: calcn_r (0.2352768 -8.516782e-5 0.06794089)
            Marker RHEE: calcn_r (0.02001732 -0.008539955 -0.01088316)
            Marker RD1M: calcn_r (0.2373227 0.01075967 -0.05027156)
            Marker RSTL: calcn_r (0.08189643 -0.005984833 -0.05187135)
            Marker RLCA: calcn_r (0.093262 0.004064084 0.05270758) fixed=true
            Marker LTH1: femur_l (0.06086444 -0.2911722 -0.1127532)
            Marker LTH2: femur_l (-0.01525482 -0.2145147 -0.1303264)
            Marker LTH3: femur_l (-0.01472317 -0.2924844 -0.1105069)
            Marker LTHI: femur_l (0.05951177 -0.2142614 -0.1345762)
            Marker LKNE: femur_l (0.004188155 -0.4261612 -0.1007035)
            Marker LSH1: tibia_l (0.04696589 -0.2698248 -0.07129491)
            Marker LSH2: tibia_l (-0.03871891 -0.211547 -0.09515265)
            Marker LSH3: tibia_l (-0.02365228 -0.2847458 -0.07636827)
            Marker LTIB: tibia_l (0.03212307 -0.1984231 -0.1021467)
            Marker LANK: tibia_l (0.01774276 -0.3921432 -0.05978026)
            Marker LMAnkle: tibia_l (0.04618264 -0.37354 0.04168908)
            Marker LTOE: toes_l (0.02340321 0.03021225 0.008804409)
            Marker LHEE: calcn_l (0.01985996 0.00106568 0.01533083)
            Marker LD1M: calcn_l (0.2236859 0.01351166 0.04723945)
            Marker LSTL: calcn_l (0.08339827 0.007716925 0.05854632)
            Marker LLCA: calcn_l (0.08954118 0.006339916 -0.05301115) fixed=true
            Marker LMT5: calcn_l (0.2273778 0.001988024 -0.06397207)
          ContactGeometrySet:
            ContactHalfSpace floor: socket_frame=/ground orientation=(0 0 -1.570796)
            ContactSphere heel_r: socket_frame=/bodyset/calcn_r location=(0.0146421 -0.01 -0.0122799) radius=0.035
            ContactSphere lateralRearfoot_r: socket_frame=/bodyset/calcn_r location=(0.0849291 -0.01 0.0338649)
                radius=0.035
            ContactSphere lateralMidfoot_r: socket_frame=/bodyset/calcn_r location=(0.153362 -0.01 0.0594829)
                radius=0.035
            ContactSphere lateralToe_r: socket_frame=/bodyset/toes_r location=(0.023014 -0.01 0.0670461) radius=0.035
            ContactSphere medialToe_r: socket_frame=/bodyset/toes_r location=(0.074363 -0.01 -0.026039) radius=0.035
            ContactSphere medialMidfoot_r: socket_frame=/bodyset/calcn_r location=(0.203637 -0.01 -0.0398688)
                radius=0.035
            ContactSphere heel_l: socket_frame=/bodyset/calcn_l location=(0.0146421 -0.01 0.0122799) radius=0.035
            ContactSphere lateralRearfoot_l: socket_frame=/bodyset/calcn_l location=(0.0849291 -0.01 -0.0338649)
                radius=0.035
            ContactSphere lateralMidfoot_l: socket_frame=/bodyset/calcn_l location=(0.153362 -0.01 -0.0594829)
                radius=0.035
            ContactSphere lateralToe_l: socket_frame=/bodyset/toes_l location=(0.023014 -0.01 -0.0670461) radius=0.035
            ContactSphere medialToe_l: socket_frame=/bodyset/toes_l location=(0.074363 -0.01 0.026039) radius=0.035
            ContactSphere medialMidfoot_l: socket_frame=/bodyset/calcn_l location=(0.203637 -0.01 0.0398688)
                radius=0.035
      MocoInitialBounds time_initial_bounds: bounds=0
      MocoFinalBounds time_final_bounds: bounds=0.7681667
      state_infos:
        MocoVariableInfo /jointset/ankle_r/ankle_angle_r/value: bounds=(-0.6981317 0.5235988) initial_bounds=-0.4011065
            final_bounds=-0.421424
        MocoVariableInfo /jointset/ground_pelvis/pelvis_tx/value: bounds=(-5 10) initial_bounds=-0.2329831
            final_bounds=2.3045
        MocoVariableInfo /jointset/walker_knee_r/knee_angle_r/value: bounds=(0 2.094395) initial_bounds=0.7849242
            final_bounds=0.649895
        MocoVariableInfo /jointset/ground_pelvis/pelvis_tilt/value: bounds=(-1.570796 1.570796)
            initial_bounds=-0.2154819 final_bounds=-0.230347
        MocoVariableInfo /jointset/back/lumbar_extension/value: bounds=(-0.5235988 0.5235988)
            initial_bounds=-0.06591957 final_bounds=-0.04523797
        MocoVariableInfo /jointset/mtp_l/mtp_angle_l/value: bounds=(-0.5235988 1.047198) initial_bounds=0.07863355
            final_bounds=0.06464288
        MocoVariableInfo /jointset/ankle_l/ankle_angle_l/value: bounds=(-0.6981317 0.5235988) initial_bounds=0.1855854
            final_bounds=0.1708747
        MocoVariableInfo /jointset/ground_pelvis/pelvis_tz/value: bounds=(-2 2) initial_bounds=0.02446177
            final_bounds=0.02541825
        MocoVariableInfo /jointset/ground_pelvis/pelvis_list/value: bounds=(-1.570796 1.570796)
            initial_bounds=-0.07681372 final_bounds=-0.08505555
        MocoVariableInfo /jointset/ground_pelvis/pelvis_ty/value: bounds=(0 1.5) initial_bounds=0.9729445
            final_bounds=0.978637
        MocoVariableInfo /jointset/hip_r/hip_rotation_r/value: bounds=(-0.7853982 0.7853982) initial_bounds=-0.3583926
            final_bounds=-0.3652155
        MocoVariableInfo /jointset/hip_r/hip_adduction_r/value: bounds=(-0.5235988 0.5235988)
            initial_bounds=-0.008233512 final_bounds=0.01503187
        MocoVariableInfo /jointset/ground_pelvis/pelvis_rotation/value: bounds=(-1.570796 1.570796)
            initial_bounds=0.07477448 final_bounds=0.06594534
        MocoVariableInfo /jointset/walker_knee_l/knee_angle_l/value: bounds=(0 2.094395) initial_bounds=0.2661179
            final_bounds=0.2551923
        MocoVariableInfo /jointset/ground_pelvis/pelvis_tz/speed: bounds=(-2 2) initial_bounds=-0.04813119
            final_bounds=-0.005618124
        MocoVariableInfo /jointset/back/lumbar_bending/value: bounds=(-0.5235988 0.5235988) initial_bounds=-0.04070027
            final_bounds=-0.02241606
        MocoVariableInfo /jointset/ground_pelvis/pelvis_tx/speed: bounds=(-5 5) initial_bounds=3.003914
            final_bounds=2.996892
        MocoVariableInfo /jointset/hip_r/hip_flexion_r/value: bounds=(-0.5235988 2.094395) initial_bounds=-0.1436462
            final_bounds=-0.1618012
        MocoVariableInfo /jointset/mtp_r/mtp_angle_r/value: bounds=(-0.5235988 1.047198) initial_bounds=0.1663856
            final_bounds=0.132977
        MocoVariableInfo /jointset/back/lumbar_rotation/value: bounds=(-0.5235988 0.5235988) initial_bounds=0.2106206
            final_bounds=0.2323296
        MocoVariableInfo /jointset/ground_pelvis/pelvis_ty/speed: bounds=(-3 3) initial_bounds=-0.3937108
            final_bounds=-0.0137592
        MocoVariableInfo /jointset/hip_l/hip_flexion_l/value: bounds=(-0.5235988 2.094395) initial_bounds=0.6563635
            final_bounds=0.676202
        MocoVariableInfo /jointset/hip_l/hip_adduction_l/value: bounds=(-0.5235988 0.5235988)
            initial_bounds=-0.06525401 final_bounds=-0.08087378
        MocoVariableInfo /jointset/hip_l/hip_rotation_l/value: bounds=(-0.7853982 0.7853982) initial_bounds=-0.09800575
            final_bounds=-0.1044849
      state_infos_pattern:
        MocoVariableInfo /jointset/.*/speed: bounds=(-50 50)
        MocoVariableInfo .*/activation: bounds=(0.01 1)
        MocoVariableInfo .*torque.*/activation: bounds=(-1 1)
        MocoVariableInfo .*reserve.*/activation: bounds=(-1 1)
        MocoVariableInfo .*tendon_force: bounds=(0.01 1.8)
      control_infos_pattern:
        MocoVariableInfo /forceset/.*: bounds=(0.01 1)
        MocoVariableInfo /forceset/torque.*: bounds=(-1 1)
        MocoVariableInfo /forceset/reserve.*: bounds=(-1 1)
      goals:
        MocoStateTrackingGoal state_tracking: weight=2.857143 allow_unused_references=true
            scale_weights_with_range=false
          TableProcessor reference
          MocoWeightSet state_weights:
            MocoWeight /jointset/ground_pelvis/pelvis_tilt/value: weight=34.48382
            MocoWeight /jointset/ground_pelvis/pelvis_tilt/speed: weight=0.3448382
            MocoWeight /jointset/ground_pelvis/pelvis_list/value: weight=20.11008
            MocoWeight /jointset/ground_pelvis/pelvis_list/speed: weight=0.2011008
            MocoWeight /jointset/ground_pelvis/pelvis_rotation/value: weight=15.94246
            MocoWeight /jointset/ground_pelvis/pelvis_rotation/speed: weight=0.1594246
            MocoWeight /jointset/ground_pelvis/pelvis_tx/value: weight=1.499937
            MocoWeight /jointset/ground_pelvis/pelvis_tx/speed: weight=0.01499937
            MocoWeight /jointset/ground_pelvis/pelvis_ty/value: weight=0
            MocoWeight /jointset/ground_pelvis/pelvis_ty/speed: weight=0.3391874
            MocoWeight /jointset/ground_pelvis/pelvis_tz/value: weight=142.5906
            MocoWeight /jointset/ground_pelvis/pelvis_tz/speed: weight=1.425906
            MocoWeight /jointset/hip_r/hip_flexion_r/value: weight=2.860046
            MocoWeight /jointset/hip_r/hip_flexion_r/speed: weight=0.02860046
            MocoWeight /jointset/hip_r/hip_adduction_r/value: weight=11.54053
            MocoWeight /jointset/hip_r/hip_adduction_r/speed: weight=0.1154053
            MocoWeight /jointset/hip_r/hip_rotation_r/value: weight=13.78943
            MocoWeight /jointset/hip_r/hip_rotation_r/speed: weight=0.1378943
            MocoWeight /jointset/walker_knee_r/knee_angle_r/value: weight=7.928398
            MocoWeight /jointset/walker_knee_r/knee_angle_r/speed: weight=0.05946298
            MocoWeight /jointset/patellofemoral_r/knee_angle_r_beta/value: weight=0
            MocoWeight /jointset/patellofemoral_r/knee_angle_r_beta/speed: weight=0
            MocoWeight /jointset/ankle_r/ankle_angle_r/value: weight=15.54957
            MocoWeight /jointset/ankle_r/ankle_angle_r/speed: weight=0.1166217
            MocoWeight /jointset/subtalar_r/subtalar_angle_r/value: weight=11.37713
            MocoWeight /jointset/subtalar_r/subtalar_angle_r/speed: weight=0.1137713
            MocoWeight /jointset/mtp_r/mtp_angle_r/value: weight=63.17411
            MocoWeight /jointset/mtp_r/mtp_angle_r/speed: weight=0.4738058
            MocoWeight /jointset/hip_l/hip_flexion_l/value: weight=2.870464
            MocoWeight /jointset/hip_l/hip_flexion_l/speed: weight=0.02870464
            MocoWeight /jointset/hip_l/hip_adduction_l/value: weight=9.447698
            MocoWeight /jointset/hip_l/hip_adduction_l/speed: weight=0.09447698
            MocoWeight /jointset/hip_l/hip_rotation_l/value: weight=9.399914
            MocoWeight /jointset/hip_l/hip_rotation_l/speed: weight=0.09399914
            MocoWeight /jointset/walker_knee_l/knee_angle_l/value: weight=7.894742
            MocoWeight /jointset/walker_knee_l/knee_angle_l/speed: weight=0.05921057
            MocoWeight /jointset/patellofemoral_l/knee_angle_l_beta/value: weight=0
            MocoWeight /jointset/patellofemoral_l/knee_angle_l_beta/speed: weight=0
            MocoWeight /jointset/ankle_l/ankle_angle_l/value: weight=19.17332
            MocoWeight /jointset/ankle_l/ankle_angle_l/speed: weight=0.1437999
            MocoWeight /jointset/subtalar_l/subtalar_angle_l/value: weight=11.26384
            MocoWeight /jointset/subtalar_l/subtalar_angle_l/speed: weight=0.1126384
            MocoWeight /jointset/mtp_l/mtp_angle_l/value: weight=65.65916
            MocoWeight /jointset/mtp_l/mtp_angle_l/speed: weight=0.4924437
            MocoWeight /jointset/back/lumbar_extension/value: weight=13.86979
            MocoWeight /jointset/back/lumbar_extension/speed: weight=0
            MocoWeight /jointset/back/lumbar_bending/value: weight=8.308815
            MocoWeight /jointset/back/lumbar_bending/speed: weight=0
            MocoWeight /jointset/back/lumbar_rotation/value: weight=4.935234
            MocoWeight /jointset/back/lumbar_rotation/speed: weight=0
            MocoWeight /jointset/acromial_r/arm_flex_r/value: weight=5.436228
            MocoWeight /jointset/acromial_r/arm_flex_r/speed: weight=0.05436228
            MocoWeight /jointset/acromial_r/arm_add_r/value: weight=10.53542
            MocoWeight /jointset/acromial_r/arm_add_r/speed: weight=0.1053542
            MocoWeight /jointset/acromial_r/arm_rot_r/value: weight=8.535124
            MocoWeight /jointset/acromial_r/arm_rot_r/speed: weight=0.08535124
            MocoWeight /jointset/elbow_r/elbow_flex_r/value: weight=5.77635
            MocoWeight /jointset/elbow_r/elbow_flex_r/speed: weight=0.0577635
            MocoWeight /jointset/radioulnar_r/pro_sup_r/value: weight=21.38999
            MocoWeight /jointset/radioulnar_r/pro_sup_r/speed: weight=0.2138999
            MocoWeight /jointset/acromial_l/arm_flex_l/value: weight=4.1542
            MocoWeight /jointset/acromial_l/arm_flex_l/speed: weight=0.041542
            MocoWeight /jointset/acromial_l/arm_add_l/value: weight=7.893661
            MocoWeight /jointset/acromial_l/arm_add_l/speed: weight=0.07893661
            MocoWeight /jointset/acromial_l/arm_rot_l/value: weight=6.738494
            MocoWeight /jointset/acromial_l/arm_rot_l/speed: weight=0.06738494
            MocoWeight /jointset/elbow_l/elbow_flex_l/value: weight=8.742113
            MocoWeight /jointset/elbow_l/elbow_flex_l/speed: weight=0.08742113
            MocoWeight /jointset/radioulnar_l/pro_sup_l/value: weight=56.96617
            MocoWeight /jointset/radioulnar_l/pro_sup_l/speed: weight=0.5696617
        MocoControlGoal control_effort: weight=0.1984127 divide_by_displacement=true
          MocoWeightSet control_weights:
            MocoWeight /forceset/reserve_pelvis_tx: weight=50
            MocoWeight /forceset/reserve_pelvis_ty: weight=50
            MocoWeight /forceset/reserve_pelvis_tz: weight=50
            MocoWeight /forceset/reserve_pelvis_list: weight=50
            MocoWeight /forceset/reserve_pelvis_tilt: weight=50
            MocoWeight /forceset/reserve_pelvis_rotation: weight=50
            MocoWeight /forceset/reserve_hip_adduction_r: weight=50
            MocoWeight /forceset/reserve_hip_rotation_r: weight=50
            MocoWeight /forceset/reserve_hip_flexion_r: weight=50
            MocoWeight /forceset/reserve_hip_adduction_l: weight=50
            MocoWeight /forceset/reserve_hip_rotation_l: weight=50
            MocoWeight /forceset/reserve_hip_flexion_l: weight=50
            MocoWeight /forceset/reserve_knee_angle_r: weight=50
            MocoWeight /forceset/reserve_ankle_angle_r: weight=50
            MocoWeight /forceset/reserve_knee_angle_l: weight=50
            MocoWeight /forceset/reserve_ankle_angle_l: weight=50
            MocoWeight /forceset/reserve_mtp_angle_r: weight=50
            MocoWeight /forceset/reserve_mtp_angle_l: weight=50
            MocoWeight /forceset/reserve_subtalar_angle_r: weight=50
            MocoWeight /forceset/reserve_subtalar_angle_l: weight=50
        MocoAverageSpeedGoal avg_speed: desired_average_speed=3 [m/s]
        MocoOrientationTrackingGoal torso_orientation_goal: weight=10 frame_paths=/bodyset/torso
          TableProcessor states_reference
        MocoAngularVelocityTrackingGoal torso_angular_velocity_goal: weight=1 frame_paths=/bodyset/torso
          TableProcessor states_reference
        MocoOrientationTrackingGoal feet_orientation_goal: weight=10 frame_paths=(/bodyset/calcn_r /bodyset/calcn_l)
          TableProcessor states_reference
        MocoAngularVelocityTrackingGoal feet_speed_goal: weight=0.1 frame_paths=(/bodyset/calcn_r /bodyset/calcn_l)
          TableProcessor states_reference
        MocoInitialActivationGoal initial_activation
        MocoContactTrackingGoal contact: weight=7500
            external_loads_file=/home/lisca/biomec/data/20250306_dataset/results_pool/averages/sub04_strirt_cond00000_speed03000_grf_move_averages.xml
            normalize_tracking_error=true
          contact_groups:
            MocoContactTrackingGoalGroup: contact_force_paths=(forceset/contactHeel_r forceset/contactLateralRearfoot_r forceset/contactLateralMidfoot_r forceset/contactLateralToe_r forceset/contactMedialToe_r forceset/contactMedialMidfoot_r)
                external_force_name=ExternalForce_2 alternative_frame_paths=(/bodyset/calcn_r /bodyset/toes_r)
            MocoContactTrackingGoalGroup: contact_force_paths=(forceset/contactHeel_l forceset/contactLateralRearfoot_l forceset/contactLateralMidfoot_l forceset/contactLateralToe_l forceset/contactMedialToe_l forceset/contactMedialMidfoot_l)
                external_force_name=ExternalForce_1 alternative_frame_paths=(/bodyset/calcn_l /bodyset/toes_l)
      path_constraints: MocoFrameDistanceConstraint distance_constraint: projection=vector projection_vector=(0 0 1)
        frame_pairs:
          MocoFrameDistanceConstraintPair: frame1_path=bodyset/calcn_l frame2_path=bodyset/calcn_r
              minimum_distance=0.05 [meters] maximum_distance=Inf
          MocoFrameDistanceConstraintPair: frame1_path=bodyset/toes_l frame2_path=bodyset/toes_r minimum_distance=0.05
              maximum_distance=Inf
          MocoFrameDistanceConstraintPair: frame1_path=bodyset/calcn_l frame2_path=bodyset/toes_r minimum_distance=0.05
              maximum_distance=Inf
          MocoFrameDistanceConstraintPair: frame1_path=bodyset/toes_l frame2_path=bodyset/calcn_r minimum_distance=0.05
              maximum_distance=Inf
  MocoCasADiSolver solver:
    num_mesh_intervals: 4
    multibody_dynamics_mode: explicit
    optim_solver: ipopt
    optim_max_iterations: 5000
    optim_convergence_tolerance: 0.01
    optim_constraint_tolerance: 0.01
    scale_variables_using_bounds: true
    optim_finite_difference_scheme: forward
    parallel: 28
    minimize_implicit_auxiliary_derivatives: true
    implicit_auxiliary_derivatives_weight: 166.6667
    MocoBounds implicit_auxiliary_derivative_bounds: bounds=(-100 100)
