# OpenSim document version 20302
IKTaskSet:
  IKMarkerTask C_28: apply=true weight=20
  IKMarkerTask LASI: apply=true weight=20
  IKMarkerTask RASI: apply=true weight=20
  IKMarkerTask LPSI: apply=true weight=5
  IKMarkerTask RPSI: apply=true weight=5
  IKMarkerTask LTHI: apply=true weight=1
  IKMarkerTask LKNE: apply=true weight=10
  IKMarkerTask LTIB: apply=true weight=1
  IKMarkerTask LANK: apply=true weight=10
  IKMarkerTask LHEE: apply=true weight=10
  IKMarkerTask LTOE: apply=true weight=10
  IKMarkerTask RTHI: apply=true weight=1
  IKMarkerTask RKNE: apply=true weight=10
  IKMarkerTask RTIB: apply=true weight=1
  IKMarkerTask RANK: apply=true weight=10
  IKMarkerTask RHEE: apply=true weight=10
  IKMarkerTask RTOE: apply=true weight=10
  IKMarkerTask L_ToeLat: apply=true weight=10
  IKMarkerTask R_ToeLat: apply=true weight=10
  IKMarkerTask L_AnkMed: apply=true weight=10
  IKMarkerTask R_AnkMed: apply=true weight=10
  IKMarkerTask L_TibAntSup: apply=true weight=10
  IKMarkerTask R_TibAntSup: apply=true weight=10
  IKMarkerTask L_TibPostSup: apply=true weight=10
  IKMarkerTask R_TibPostSup: apply=true weight=10
  IKMarkerTask L_FemAntInf: apply=true weight=10
  IKMarkerTask R_FemPostSup: apply=true weight=10
  IKMarkerTask L_FemAntSup: apply=true weight=10
  IKMarkerTask R_FemAntSup: apply=true weight=10
