# OpenSim document version 40500
MarkerSet:
  Marker RShoulder: torso (-0.001369502 0.4331764 0.1668551) fixed=true
  Marker LShoulder: torso (-0.0001479558 0.4340449 -0.1682384) fixed=true
  Marker LClavicle: torso (0.06001048 0.3988199 -0.02934716) fixed=true
  Marker RBiceps: humerus_r (0.0494266 -0.2134142 0.009335888)
  Marker RElbow: humerus_r (0.01240887 -0.3138289 0.03492811) fixed=true
  Marker RMElbow: humerus_r (0 -0.3141147 -0.0434917) fixed=true
  Marker RForearm: radius_r (0.005902111 -0.1330065 0.04807742)
  Marker RWrist: radius_r (-0.03295266 -0.2401653 0.006878553)
  Marker LBiceps: humerus_l (0.03091412 -0.1774577 -0.02991671)
  Marker LElbow: humerus_l (0.01322742 -0.3134507 -0.03417211) fixed=true
  Marker LMElbow: humerus_l (0 -0.3141147 0.0434917) fixed=true
  Marker LForearm: radius_l (-0.001229544 -0.1267803 -0.05356229)
  Marker LWrist: radius_l (-0.03221424 -0.2391484 -0.006393874)
  Marker RASI: pelvis (0.0140215 0.03461817 0.1355426) fixed=true
  Marker LASI: pelvis (0.01211335 0.03297939 -0.1362051) fixed=true
  Marker S2: pelvis (-0.2076678 0.02163451 0.001689314) fixed=true
  Marker RPSI: pelvis (-0.2013958 0.01064373 0.05118224)
  Marker LPSI: pelvis (-0.2054527 0.006648139 -0.03299402)
  Marker RTH1: femur_r (0.06609537 -0.1481522 0.09894977)
  Marker RTH2: femur_r (-0.04256604 -0.1581046 0.1241814)
  Marker RTHI: femur_r (-0.04752491 -0.2794275 0.08751113)
  Marker RKNE: femur_r (-0.001578751 -0.3936643 0.04960325) fixed=true
  Marker RMKnee: femur_r (0.005243464 -0.3904532 -0.05261382) fixed=true
  Marker RSH1: tibia_r (0.00618929 -0.1006936 0.05709899)
  Marker RSH2: tibia_r (0.009111262 -0.2113075 0.06512998)
  Marker RSH3: tibia_r (-0.07577712 -0.1079866 0.06171218)
  Marker RTIB: tibia_r (-0.0727502 -0.2261306 0.06421453)
  Marker RANK: tibia_r (-0.006798863 -0.4377476 0.05842767) fixed=true
  Marker RMAnkle: tibia_r (0.006981052 -0.44052 -0.04313838) fixed=true
  Marker RTOE: calcn_r (0.2670065 0.04160679 -0.02209616) fixed=true
  Marker RMT5: calcn_r (0.1835039 0.02155641 0.06722229) fixed=true
  Marker RHEE: calcn_r (-0.02184655 0.0228202 -0.01241861) fixed=true
  Marker RD1M: calcn_r (0.2130067 0.0256068 -0.05409612) fixed=true
  Marker RMT5: calcn_r (0.1835039 0.02155641 0.06722229) fixed=true
  Marker RMTB5: calcn_r (0.1215272 0.02004242 0.06262285) fixed=true
  Marker RMTB1: calcn_r (0.159661 0.0469721 -0.04667304) fixed=true
  Marker RSTL: calcn_r (0.07392763 0.03989341 -0.05613798)
  Marker RLCA: calcn_r (0.04842152 0.03293369 0.04749994)
  Marker LTH1: femur_l (0.1047622 -0.1328653 -0.06137889)
  Marker LTH2: femur_l (0.09793556 -0.2587879 -0.03892303)
  Marker LTH3: femur_l (0.01233661 -0.1276965 -0.1211917)
  Marker LTHI: femur_l (-0.01353609 -0.2538284 -0.08732385)
  Marker LKNE: femur_l (-0.00146749 -0.392773 -0.04900244) fixed=true
  Marker LMKnee: femur_l (0.005243464 -0.3904532 0.05261382) fixed=true
  Marker LSH1: tibia_l (0.02613386 -0.1072382 -0.04295203)
  Marker LSH2: tibia_l (-0.06789269 -0.1008819 -0.06446122)
  Marker LTIB: tibia_l (-0.07087587 -0.2153663 -0.06141118)
  Marker LANK: tibia_l (-0.005851133 -0.4376387 -0.05853443) fixed=true
  Marker LMAnkle: tibia_l (0.006981052 -0.44052 0.04313838) fixed=true
  Marker LTOE: calcn_l (0.2665793 0.04086229 0.02156331) fixed=true
  Marker LHEE: calcn_l (-0.02180087 0.02267972 0.01190861) fixed=true
  Marker LD1M: calcn_l (0.213007 0.025607 0.054096) fixed=true
  Marker LMTB1: calcn_l (0.159661 0.046972 0.046673) fixed=true
  Marker LMTB5: calcn_l (0.121527 0.020042 -0.062623) fixed=true
  Marker LSTL: calcn_l (0.073928 0.039893 0.056138)
  Marker LLCA: calcn_l (0.048422 0.032934 -0.0475)
  Marker LMT5: calcn_l (0.1835466 0.02201737 -0.0670269) fixed=true
  Marker RHJC: femur_r (0 0 0) fixed=true
  Marker LHJC: femur_l (0 0 0) fixed=true
  Marker LAPX2: toes_l (0.07675636 0.01690227 -0.01368001) fixed=true
  Marker LAPX1: toes_l (0.08456092 0.01431277 0.01561621) fixed=true
  Marker RAPX2: toes_r (0.076756 0.016902 0.01368) fixed=true
  Marker RAPX1: toes_r (0.084561 0.014313 -0.015616) fixed=true
  Marker LMTB4: calcn_l (0.1468609 0.03337806 -0.03705989)
  Marker LMTS1: calcn_l (0.189101 0.04197849 0.02583133)
  Marker RMTS1: calcn_r (0.189101 0.041978 -0.025831)
  Marker RMTB4: calcn_r (0.146861 0.033378 0.03706)
