# OpenSim document version 20302
IKTaskSet:
  IKMarkerTask LClavicle: apply=true weight=30
  IKMarkerTask C7: apply=true weight=30
  IKMarkerTask LShoulder: apply=true weight=25
  IKMarkerTask LBiceps: apply=true weight=5
  IKMarkerTask LElbow: apply=true weight=30
  IKMarkerTask LMElbow: apply=false weight=5
  IKMarkerTask LForearm: apply=true weight=25
  IKMarkerTask LWrist: apply=true weight=25
  IKMarkerTask RShoulder: apply=true weight=25
  IKMarkerTask RBiceps: apply=true weight=5
  IKMarkerTask RElbow: apply=true weight=30
  IKMarkerTask RMElbow: apply=false weight=5
  IKMarkerTask RForearm: apply=true weight=25
  IKMarkerTask RWrist: apply=true weight=25
  IKMarkerTask LASI: apply=true weight=50
  IKMarkerTask RASI: apply=true weight=50
  IKMarkerTask LPSI: apply=true weight=50
  IKMarkerTask RPSI: apply=true weight=50
  IKMarkerTask LKNE: apply=true weight=50
  IKMarkerTask LTIB: apply=true weight=50
  IKMarkerTask LANK: apply=true weight=100
  IKMarkerTask LHEE: apply=true weight=100
  IKMarkerTask LTOE: apply=true weight=100
  IKMarkerTask RKNE: apply=true weight=50
  IKMarkerTask RANK: apply=true weight=100
  IKMarkerTask RHEE: apply=true weight=100
  IKMarkerTask RTOE: apply=true weight=100
  IKMarkerTask LMT5: apply=true weight=100
  IKMarkerTask LD1M: apply=true weight=100
  IKMarkerTask RMT5: apply=true weight=100
  IKMarkerTask RD1M: apply=true weight=100
  IKMarkerTask LLCA: apply=true weight=100
  IKMarkerTask LSTL: apply=true weight=100
  IKMarkerTask RLCA: apply=true weight=100
  IKMarkerTask RSTL: apply=true weight=100
  IKMarkerTask LMAnkle: apply=false weight=0
  IKMarkerTask RMAnkle: apply=false weight=0
  IKMarkerTask LSH1: apply=true weight=50
  IKMarkerTask RSH1: apply=true weight=50
  IKMarkerTask LSH2: apply=true weight=50
  IKMarkerTask RSH2: apply=true weight=50
  IKMarkerTask LSH3: apply=true weight=50
  IKMarkerTask LTH1: apply=true weight=50
  IKMarkerTask RTH1: apply=true weight=50
  IKMarkerTask LTH2: apply=true weight=50
  IKMarkerTask RTH2: apply=true weight=50
  IKMarkerTask LTH3: apply=true weight=50
  IKMarkerTask RTH3: apply=true weight=50
  IKMarkerTask RTHI: apply=true weight=50
  IKMarkerTask RTIB: apply=true weight=50
  IKMarkerTask LTHI: apply=true weight=50
