# OpenSim document version 40500
# Was specific to subject 4
# Markers in the model.
MarkerSet:
  Marker RShoulder: torso (-0.001369502 0.4331764 0.1668551) fixed=true
  Marker LShoulder: torso (-0.0001479558 0.4340449 -0.1682384) fixed=true
  Marker LClavicle: torso (0.06001048 0.3988199 -0.02934716) fixed=true
  Marker C7: torso (-0.0885555 0.370487 -0.0139988)
  Marker RBiceps: humerus_r (0.0494266 -0.2134142 0.009335888)
  Marker RElbow: humerus_r (0.01240887 -0.3138289 0.03492811) fixed=true
  Marker RMElbow: humerus_r (0 -0.3141147 -0.0434917) fixed=true
  Marker RForearm: radius_r (0.005902111 -0.1330065 0.04807742)
  Marker RWrist: radius_r (-0.03295266 -0.2401653 0.006878553) fixed=true
  Marker LBiceps: humerus_l (0.03091412 -0.1774577 -0.02991671)
  Marker LElbow: humerus_l (0.01322742 -0.3134507 -0.03417211) fixed=true
  Marker LMElbow: humerus_l (0 -0.3141147 0.0434917) fixed=true
  Marker LForearm: radius_l (-0.001229544 -0.1267803 -0.05356229)
  Marker LWrist: radius_l (-0.03221424 -0.2391484 -0.006393874) fixed=true
  Marker RASI: pelvis (0.0140215 0.03461817 0.1355426) fixed=true
  Marker LASI: pelvis (0.01211335 0.03297939 -0.1362051) fixed=true
  Marker S2: pelvis (-0.2076678 0.02163451 0.001689314) fixed=true
  Marker RPSI: pelvis (-0.2013958 0.01064373 0.05118224)
  Marker LPSI: pelvis (-0.2054527 0.006648139 -0.03299402)
  Marker RTH1: femur_r (0.06609537 -0.1481522 0.09894977)
  Marker RTH2: femur_r (-0.04256604 -0.1581046 0.1241814)
  Marker RTHI: femur_r (-0.04752491 -0.2794275 0.08751113)
  Marker RTH3: femur_r (0.06609537 -0.2794275 0.08751113)
  Marker RKNE: femur_r (-0.00146749 -0.40655 0.0490024) fixed=true
  Marker RMKnee: femur_r (0.0363989 -0.397572 -0.0546579) fixed=true
  Marker RSH1: tibia_r (0.00618929 -0.1006936 0.05709899)
  Marker RSH2: tibia_r (0.009111262 -0.2113075 0.06512998)
  Marker RTIB: tibia_r (-0.0727502 -0.2261306 0.06421453)
  Marker RANK: tibia_r (-0.00585129 -0.398469 0.0585344) fixed=true
  Marker RMAnkle: tibia_r (0.00268396 -0.388801 -0.0380002) fixed=true
  Marker RTOE: toes_r (0.0663789 0.0162282 -0.0215633) fixed=true
  Marker RMT5: calcn_r (0.166592 0.00611292 0.0670269) fixed=true
  Marker RHEE: calcn_r (-0.019787 0.02059 -0.0119086) fixed=true
  Marker RD1M: calcn_r (0.173364 0.00375067 -0.0538855) fixed=true
  Marker RSTL: calcn_r (0.0433532 0.00722061 -0.0561391) fixed=true
  Marker RLCA: calcn_r (0.0407032 0.0066103 0.0623107) fixed=true
  Marker LTH1: femur_l (0.1047622 -0.1328653 -0.06137889)
  Marker LTH2: femur_l (0.09793556 -0.2587879 -0.03892303)
  Marker LTH3: femur_l (0.01233661 -0.1276965 -0.1211917)
  Marker LTHI: femur_l (-0.01353609 -0.2538284 -0.08732385)
  Marker LKNE: femur_l (-0.00146749 -0.40655 -0.0490024) fixed=true
  Marker LMKnee: femur_l (0.0363989 -0.397572 0.0546579) fixed=true
  Marker LSH1: tibia_l (0.0178766 -0.273091 -0.064464)
  Marker LSH2: tibia_l (-0.0903794 -0.177216 -0.0644639)
  Marker LSH3: tibia_l (-0.0903796 -0.264286 -0.0644639)
  Marker LTIB: tibia_l (0.0178761 -0.179097 -0.0644639)
  Marker LANK: tibia_l (-0.00585129 -0.398469 -0.0585344) fixed=true
  Marker LMAnkle: tibia_l (-0.00132387 -0.37487 0.0380004) fixed=true
  Marker LTOE: toes_l (0.0663789 0.0162282 0.0215633) fixed=true
  Marker LHEE: calcn_l (-0.019787 0.02059 0.0119086) fixed=true
  Marker LD1M: calcn_l (0.173364 0.00375067 0.0538855) fixed=true
  Marker LSTL: calcn_l (0.0377392 0.0111601 0.0561388) fixed=true
  Marker LLCA: calcn_l (0.0377392 0.00843901 -0.0623107) fixed=true
  Marker LMT5: calcn_l (0.166592 0.00611292 -0.0670269) fixed=true
  Marker Pelvis_RightThigh_score: femur_r (0 0 0) fixed=true
  Marker Pelvis_LeftThigh_score: femur_l (0 0 0) fixed=true
